# OpenSim document version 40600
ScaleTool Static01:
  mass: 0.2833 [kg]
  height: -1
  age: -1
  GenericModelMaker:
    model_file: c:\Users\hpb7kr\Documents\GitHub\RatHindlimb\models\osim\FinalBilateral_millard_tsl_gait.osim
    marker_set_file: c:\Users\hpb7kr\Documents\GitHub\RatHindlimb\models\osim\rat_hindlimb_bilateral_markerset.xml
  ModelScaler:
    apply: true
    scaling_order: measurements manualScale
    marker_file: Static01.trc
    time_range: 0 3.375
    preserve_mass_distribution: false
    output_model_file: c:\Users\hpb7kr\Documents\GitHub\RatHindlimb\data\BAA\BAA01\Baseline\Static01_scaled.osim
    output_scale_file: c:\Users\hpb7kr\Documents\GitHub\RatHindlimb\data\BAA\BAA01\Baseline\Static01_scale.xml
    MeasurementSet:
      Measurement spine: apply=true
        MarkerPair: markers=(TAIL SPL6)
        BodyScale spine: axes=(X Y Z)
      Measurement pelvis_length: apply=true
        MarkerPair: markers=(RASI RHIP)
        MarkerPair: markers=(LASI LHIP)
        MarkerPair: markers=(SPL6 TAIL)
        BodyScale pelvis_r: axes=(X Y)
        BodyScale pelvis_l: axes=(X Y)
      Measurement pelvis_width: apply=true
        MarkerPair: markers=(RHIP LHIP)
        BodyScale pelvis_r: axes=Z
        BodyScale pelvis_l: axes=Z
      Measurement foot_r: apply=true
        MarkerPair: markers=(RANK RTOE)
        BodyScale foot_r: axes=(X Y Z)
      Measurement foot_l: apply=true
        MarkerPair: markers=(LANK LTOE)
        BodyScale foot_l: axes=(X Y Z)
    ScaleSet:
      Scale: scales=(0.990836 0.990836 0.990836) segment=femur_r apply=true
      Scale: scales=(1.04571 1.04571 1.04571) segment=tibia_r apply=true
      Scale: scales=(1.00656 1.00656 1.00656) segment=femur_l apply=true
      Scale: scales=(1.04571 1.04571 1.04571) segment=tibia_l apply=true
  MarkerPlacer:
    apply: true
    marker_file: Static01.trc
    time_range: 0 3.375
    output_model_file: Static01_marker.osim
    max_marker_movement: -1
    IKTaskSet:
      IKMarkerTask RASI: apply=true weight=1
      IKMarkerTask RHIP: apply=true weight=1
      IKMarkerTask RKNE: apply=true weight=0.1
      IKMarkerTask RANK: apply=true weight=1
      IKMarkerTask RTOE: apply=true weight=1
      IKMarkerTask TAIL: apply=true weight=1
      IKMarkerTask SPL6: apply=true weight=1
      IKMarkerTask LASI: apply=true weight=1
      IKMarkerTask LHIP: apply=true weight=1
      IKMarkerTask LKNE: apply=true weight=0.1
      IKMarkerTask LANK: apply=true weight=1
      IKMarkerTask LTOE: apply=true weight=1
