# OpenSim document version 40500
Model /home/hudson/RatHindlimb/data/BAA/BAA01/Baseline/Static01_scaled:
  gravity: 0 -9.80665 0
  publications: List of publications related to model...
  length_units: m
  force_units: N
  credits:
    Utilizes simplified knee joint from "rat_hindlimb_0.2 SimpleKneeOptimized_Osim4_4.osim" to address the scaling issue. -Xiao 20161007
  Ground:
    PhysicalOffsetFrame FP1: socket_parent=.. translation=(-0.09525 -0.025 0) [meters]
      Brick FP1_geom: scale_factors=(1 1 1) half_lengths=(0.03125 0.026 0.056)
    PhysicalOffsetFrame FP2: socket_parent=.. translation=(-0.03175 -0.025 0)
      Brick FP2_geom: scale_factors=(1 1 1) half_lengths=(0.03125 0.026 0.056)
    PhysicalOffsetFrame FP3: socket_parent=.. translation=(0.03175 -0.025 0)
      Brick FP3_geom: scale_factors=(1 1 1) half_lengths=(0.03125 0.026 0.056)
    PhysicalOffsetFrame FP4: socket_parent=.. translation=(0.09525 -0.025 0)
      Brick FP4_geom: scale_factors=(1 1 1) half_lengths=(0.03125 0.026 0.056)
    PhysicalOffsetFrame WW: socket_parent=.. translation=(0 -0.025 0)
      Brick WW_geom: scale_factors=(1 1 1) half_lengths=(0.45 0.025 0.05715)
  BodySet:
    Body spine: mass=0.1038669 [kg] mass_center=(0 0 0) inertia=(3.343734e-6 3.343734e-6 3.343734e-6 0 0 0)
        meshes=rat_spine.vtp
    Body pelvis_r: mass=0.01386175 mass_center=(0 0 0) inertia=(1.861553e-6 1.774141e-6 1.861553e-6 0 0 0)
        meshes=rat_pelvis_r.vtp
      WrapCylinder hip_r_cylinder_small: xyz_body_rotation=(0 1.48353 0)
          translation=(0.007904995 0.001580999 -0.004163349) quadrant=-x radius=0.004286848 length=0.04749654
      WrapCylinder hip_r_cylinder_small2: xyz_body_rotation=(0 1.48353 0)
          translation=(0.007904995 0.0007904995 -0.004163349) quadrant=all radius=0.004286848 length=0.04749654
      WrapCylinder hip_r_cylinder_large2: xyz_body_rotation=(0 1.48353 0)
          translation=(0.007904995 0.003161998 0.002775566) quadrant=-x radius=0.002143424 length=0.04749654
    Body femur_r: mass=0.005765257 mass_center=(-0.002767096 -0.01774788 1)
        inertia=(5.328841e-7 4.044278e-7 6.971559e-7 0 0 0) meshes=rat_femur_r.vtp
      WrapCylinder femur_r_prox: xyz_body_rotation=(0 0.436332 0) translation=(0.0009908355 -0.005945013 0) quadrant=-x
          radius=0.004557843 length=0.04954178
      WrapCylinder femur_r_prox2: xyz_body_rotation=(0 0.436332 0) translation=(0.0009908355 -0.005945013 0)
          quadrant=all radius=0.004557843 length=0.04954178
      WrapTorus femur_r_dist: xyz_body_rotation=(1.72489 0 0.0977454)
          translation=(0.005380237 -0.02975479 -0.0004557843) quadrant=all inner_radius=0.003963342
          outer_radius=0.005945013
      WrapCylinder femur_r_shaft_large: xyz_body_rotation=(1.72489 0 -0.785398)
          translation=(-0.0006341347 -0.01545208 0.001833046) quadrant=y radius=0.002675256 length=0.03029975
      WrapCylinder femur_r_shaft_small: xyz_body_rotation=(1.72489 0 0.0977454)
          translation=(-0.0006341347 -0.01495666 0.001833046) quadrant=all radius=0.001783504 length=0.02930891
    Body tibia_r: mass=0.00391398 mass_center=(-0.0006208146 0.02761909 1)
        inertia=(4.96367e-7 1.397108e-7 4.987719e-7 0 0 0) meshes=rat_tibia_r.vtp
      WrapSphere tibia_r_prox: translation=(0.0006483407 0.03618159 -0.001045711) quadrant=all radius=0.005228554
      WrapCylinder tibia_r_shaft: xyz_body_rotation=(1.5708 0 0) translation=(0 0.02520163 0) quadrant=all
          radius=0.003659988 length=0.02948905
      WrapCylinder tibia_r_shaft2: xyz_body_rotation=(1.5708 0 0) translation=(0 0.02520163 0) quadrant=-y
          radius=0.003659988 length=0.02948905
      WrapSphere ankle_r_sphere: translation=(0.001244396 0.002436506 0.0001568566) quadrant=all radius=0.002614277
      WrapTorus ankle_r_torus: xyz_body_rotation=(1.5708 0 0) translation=(0.001244396 0.002436506 0.0001568566)
          quadrant=all inner_radius=0.001045711 outer_radius=0.004182843
    Body foot_r: mass=0.001502868 mass_center=(-0.0005630473 -0.007272615 1)
        inertia=(3.150385e-8 4.247624e-9 2.985042e-8 0 0 0) meshes=rat_foot_r.vtp
    Body pelvis_l: mass=0.01386175 mass_center=(0 0 0) inertia=(1.861553e-6 1.774141e-6 1.861553e-6 0 0 0)
        meshes=rat_pelvis_l.vtp
      WrapCylinder hip_l_cylinder_small: xyz_body_rotation=(0 -1.48353 0)
          translation=(0.007904995 0.001580999 0.004163349) quadrant=-x radius=0.004286848 length=0.04749654
      WrapCylinder hip_l_cylinder_small2: xyz_body_rotation=(0 -1.48353 0)
          translation=(0.007904995 0.0007904995 0.004163349) quadrant=all radius=0.004286848 length=0.04749654
      WrapCylinder hip_l_cylinder_large2: xyz_body_rotation=(0 -1.48353 0)
          translation=(0.007904995 0.003161998 -0.002775566) quadrant=-x radius=0.002143424 length=0.04749654
    Body femur_l: mass=0.005765257 mass_center=(-0.002811019 -0.01774788 -0.0005589998)
        inertia=(5.499353e-7 4.173686e-7 7.194635e-7 0 0 0) meshes=rat_femur_l.vtp
      WrapCylinder femur_l_prox: xyz_body_rotation=(0 -0.436332 0) translation=(0.001006563 -0.006039377 -6.942528e-18)
          quadrant=-x radius=0.00463019 length=0.05032815
      WrapCylinder femur_l_prox2: xyz_body_rotation=(0 -0.436332 0) translation=(0.001006563 -0.006039378 0)
          quadrant=all radius=0.00463019 length=0.05032815
      WrapTorus femur_l_dist: xyz_body_rotation=(-1.72489 0 0.0977454)
          translation=(0.005465637 -0.03022709 0.000463019) quadrant=all inner_radius=0.004026252
          outer_radius=0.006039378
      WrapCylinder femur_l_shaft_large: xyz_body_rotation=(-1.72489 0 -0.785398)
          translation=(-0.0006442004 -0.01569735 -0.001862142) quadrant=y radius=0.00271772 length=0.0307807
      WrapCylinder femur_l_shaft_small: xyz_body_rotation=(-1.72489 0 0.0977454)
          translation=(-0.0006442004 -0.01519407 -0.001862142) quadrant=all radius=0.001811814 length=0.02977414
    Body tibia_l: mass=0.00391398 mass_center=(-0.0006208146 0.02761909 -0.0003749825)
        inertia=(4.96367e-7 1.397108e-7 4.987719e-7 0 0 0) meshes=rat_tibia_l.vtp
      WrapSphere tibia_l_prox: translation=(0.0006483407 0.03618159 0.001045711) quadrant=all radius=0.005228554
      WrapCylinder tibia_l_shaft: xyz_body_rotation=(-1.5708 0 0) translation=(0 0.02520163 0) quadrant=all
          radius=0.003659988 length=0.02948905
      WrapCylinder tibia_l_shaft2: xyz_body_rotation=(-1.5708 0 0) translation=(0 0.02520163 0) quadrant=-y
          radius=0.003659988 length=0.02948905
      WrapSphere ankle_l_sphere: translation=(0.001244396 0.002436506 -0.0001568566) quadrant=all radius=0.002614277
      WrapTorus ankle_l_torus: xyz_body_rotation=(-1.5708 0 0) translation=(0.001244396 0.002436506 -0.0001568566)
          quadrant=all inner_radius=0.001045711 outer_radius=0.004182843
    Body foot_l: mass=0.001502868 mass_center=(-0.0005630473 -0.007272615 -0.0001286379)
        inertia=(3.150385e-8 4.247624e-9 2.985042e-8 0 0 0) meshes=rat_foot_l.vtp
  JointSet:
    CustomJoint ground_spine: socket_parent_frame=ground_offset socket_child_frame=spine_offset
      Coordinate sacrum_pitch: default_value=0.5235988 range=(-1.570796 1.570796) clamped=true
      Coordinate sacrum_roll: default_value=0 range=(-1.570796 1.570796) clamped=true
      Coordinate sacrum_yaw: default_value=0 range=(-3.1416 3.1416) clamped=true
      Coordinate sacrum_x: default_value=0 range=(-0.5 0.5) clamped=true
      Coordinate sacrum_y: default_value=0.05 range=(-0.2 0.2) clamped=true
      Coordinate sacrum_z: default_value=0 range=(-0.1 0.2) clamped=true
      PhysicalOffsetFrame ground_offset: socket_parent=/ground translation=(0 0 0)
      PhysicalOffsetFrame spine_offset: socket_parent=/bodyset/spine translation=(0 0 0)
      SpatialTransform:
        TransformAxis rotation1: coordinates=sacrum_pitch axis=(0 0 1) LinearFunction(coefficients=1 0)
        TransformAxis rotation2: coordinates=sacrum_roll axis=(1 0 0) LinearFunction(coefficients=1 0)
        TransformAxis rotation3: coordinates=sacrum_yaw axis=(0 1 0) LinearFunction(coefficients=1 0)
        TransformAxis translation1: coordinates=sacrum_x axis=(1 0 0) LinearFunction(coefficients=1 0)
        TransformAxis translation2: coordinates=sacrum_y axis=(0 1 0) LinearFunction(coefficients=1 0)
        TransformAxis translation3: coordinates=sacrum_z axis=(0 0 1) LinearFunction(coefficients=1 0)
    CustomJoint sacroiliac_r: socket_parent_frame=spine_offset socket_child_frame=pelvis_r_offset
      Coordinate sacroiliac_r_flx: default_value=0.06457718 range=(-0.02301246 0.1515205) clamped=true locked=true
      PhysicalOffsetFrame spine_offset: socket_parent=/bodyset/spine translation=(0.004485565 -0.002691339 0.008971131)
      PhysicalOffsetFrame pelvis_r_offset: socket_parent=/bodyset/pelvis_r translation=(0 0 0)
      SpatialTransform: axes_held_at_zero=(rotation2 rotation3 translation1 translation2 translation3)
        TransformAxis rotation1: coordinates=sacroiliac_r_flx axis=(0 0 1) LinearFunction(coefficients=1 0)
    CustomJoint hip_r: socket_parent_frame=pelvis_r_offset socket_child_frame=femur_r_offset
      Coordinate hip_r_flx: default_value=0.6981317 range=(-0.8726646 1.22173) clamped=true
      Coordinate hip_r_add: default_value=-0.1745329 range=(-0.8726646 0.3490659) clamped=true
      Coordinate hip_r_int: default_value=0 range=(-0.8726646 0.6981317) clamped=true
      PhysicalOffsetFrame pelvis_r_offset: socket_parent=/bodyset/pelvis_r translation=(0 0 0)
      PhysicalOffsetFrame femur_r_offset: socket_parent=/bodyset/femur_r translation=(0 0 0)
      SpatialTransform: axes_held_at_zero=(translation1 translation2 translation3)
        TransformAxis rotation1: coordinates=hip_r_flx axis=(0 0 1) LinearFunction(coefficients=1 0)
        TransformAxis rotation2: coordinates=hip_r_add axis=(1 0 0) LinearFunction(coefficients=1 0)
        TransformAxis rotation3: coordinates=hip_r_int axis=(0 1 0) LinearFunction(coefficients=1 0)
    CustomJoint knee_r: socket_parent_frame=femur_r_offset socket_child_frame=tibia_r_offset
      Coordinate knee_r_flx: default_value=-2.094395 range=(-2.617994 -0.3490659) clamped=true
      PhysicalOffsetFrame femur_r_offset: socket_parent=/bodyset/femur_r translation=(0 0 0)
      PhysicalOffsetFrame tibia_r_offset: socket_parent=/bodyset/tibia_r
          translation=(-0.0005960552 0.0417864 0.003990642)
      SpatialTransform:
        TransformAxis rotation1: coordinates=knee_r_flx axis=(0 0 1) LinearFunction(coefficients=1 0)
        TransformAxis rotation2: coordinates=knee_r_flx axis=(1 0 0)
          SimmSpline: x=(-2.61799 -2.44346 -2.26893 -2.0944 -1.91986 -1.74533 -1.5708 -1.39626 -1.22173 -1.0472 -0.872665 -0.698132 -0.523599 -0.349066)
              y=(-0.0872665 -0.0750492 -0.0645772 -0.0523599 -0.0401426 -0.0296706 -0.0174533 -0.00523599 0.00523599 0.0174533 0.0296706 0.0401426 0.0523599 0.0645772)
        TransformAxis rotation3: coordinates=knee_r_flx axis=(0 1 0)
          SimmSpline: x=(-2.61799 -2.44346 -2.26893 -2.0944 -1.91986 -1.74533 -1.5708 -1.39626 -1.22173 -1.0472 -0.872665 -0.698132 -0.523599 -0.349066)
              y=(0.261799 0.261799 0.261799 0.261799 0.261799 0.261799 0.261799 0.261799 0.261799 0.261799 0.261799 0.261799 0.261799 0.261799)
        TransformAxis translation1: coordinates=knee_r_flx axis=(1 0 0)
          MultiplierFunction: scale=0.9908355
            SimmSpline: x=(-2.61799 -2.44346 -2.26893 -2.0944 -1.91986 -1.74533 -1.5708 -1.39626 -1.22173 -1.0472 -0.872665 -0.698132 -0.523599 -0.349066)
                y=(-0.00523853 -0.00464648 -0.00404257 -0.00347254 -0.00297965 -0.00259079 -0.00229943 -0.00211001 -0.00199564 -0.00193207 -0.00187048 -0.00177935 -0.00163827 -0.0014134)
        TransformAxis translation2: coordinates=knee_r_flx axis=(0 1 0)
          MultiplierFunction: scale=0.9908355
            SimmSpline: x=(-2.61799 -2.44346 -2.26893 -2.0944 -1.91986 -1.74533 -1.5708 -1.39626 -1.22173 -1.0472 -0.872665 -0.698132 -0.523599 -0.349066)
                y=(-0.0341684 -0.0342539 -0.0341856 -0.0339723 -0.0336511 -0.0332785 -0.0328898 -0.0325504 -0.0322825 -0.0321161 -0.0320632 -0.0321105 -0.0322397 -0.0324144)
        TransformAxis translation3: coordinates=knee_r_flx axis=(0 0 1)
          MultiplierFunction: scale=0.9908355
            SimmSpline: x=(-2.61799 -2.44346 -2.26893 -2.0944 -1.91986 -1.74533 -1.5708 -1.39626 -1.22173 -1.0472 -0.872665 -0.698132 -0.523599 -0.349066)
                y=(0.00260302 0.00280341 0.00285365 0.00290375 0.00289358 0.00277318 0.00270235 0.00261105 0.0024695 0.00241714 0.0024041 0.0023809 0.00249641 0.00269104)
    CustomJoint ankle_r: socket_parent_frame=tibia_r_offset socket_child_frame=foot_r_offset
      Coordinate ankle_r_flx: default_value=0.8726646 range=(-0.5235988 1.047198) clamped=true
      Coordinate ankle_r_add: default_value=-0.08726646 range=(-0.08726646 0.6108652) clamped=true locked=true
      Coordinate ankle_r_int: default_value=0 range=(-0.8726646 0.2617994) clamped=true locked=true
      PhysicalOffsetFrame tibia_r_offset: socket_parent=/bodyset/tibia_r translation=(0 0 0)
      PhysicalOffsetFrame foot_r_offset: socket_parent=/bodyset/foot_r translation=(0 0 0)
      SpatialTransform:
        TransformAxis rotation1: coordinates=ankle_r_flx axis=(0 0 1) LinearFunction(coefficients=1 0)
        TransformAxis rotation2: coordinates=ankle_r_add axis=(1 0 0) LinearFunction(coefficients=1 0)
        TransformAxis rotation3: coordinates=ankle_r_int axis=(0 1 0) LinearFunction(coefficients=1 0)
        TransformAxis translation1: coordinates=ankle_r_flx axis=(1 0 0)
          MultiplierFunction: scale=1.045711
            SimmSpline: x=(-0.523599 -0.349066 -0.174533 0 0.174533 0.349066 0.523599 0.698132 0.872665 1.0472)
                y=(0 0 0 0 0 0 0 0 0 0)
        TransformAxis translation2: coordinates=ankle_r_flx axis=(0 1 0)
          MultiplierFunction: scale=1.045711
            SimmSpline: x=(-0.523599 -0.349066 -0.174533 0 0.174533 0.349066 0.523599 0.698132 0.872665 1.0472)
                y=(0 0 0 0 0 0 0 0 0 0)
        TransformAxis translation3: coordinates=ankle_r_flx axis=(0 0 1)
          MultiplierFunction: scale=1.045711
            SimmSpline: x=(-0.523599 -0.349066 -0.174533 0 0.174533 0.349066 0.523599 0.698132 0.872665 1.0472)
                y=(0 0 0 0 0 0 0 0 0 0)
    CustomJoint sacroiliac_l: socket_parent_frame=spine_offset socket_child_frame=pelvis_l_offset
      Coordinate sacroiliac_l_flx: default_value=0.06457718 range=(-0.02617994 0.148353) clamped=true locked=true
      PhysicalOffsetFrame spine_offset: socket_parent=/bodyset/spine
          translation=(0.004485565 -0.002691339 -0.008971131)
      PhysicalOffsetFrame pelvis_l_offset: socket_parent=/bodyset/pelvis_l translation=(0 0 0)
      SpatialTransform: axes_held_at_zero=(rotation2 rotation3 translation1 translation2 translation3)
        TransformAxis rotation1: coordinates=sacroiliac_l_flx axis=(0 0 1) LinearFunction(coefficients=1 0)
    CustomJoint hip_l: socket_parent_frame=pelvis_l_offset socket_child_frame=femur_l_offset
      Coordinate hip_l_flx: default_value=0.6981317 range=(-0.8726646 1.22173) clamped=true
      Coordinate hip_l_add: default_value=-0.1745329 range=(-0.8726646 0.3490659) clamped=true
      Coordinate hip_l_int: default_value=0 range=(-0.8726646 0.6981317) clamped=true
      PhysicalOffsetFrame pelvis_l_offset: socket_parent=/bodyset/pelvis_l translation=(0 0 0)
      PhysicalOffsetFrame femur_l_offset: socket_parent=/bodyset/femur_l translation=(0 0 0)
      SpatialTransform: axes_held_at_zero=(translation1 translation2 translation3)
        TransformAxis rotation1: coordinates=hip_l_flx axis=(0 0 1) LinearFunction(coefficients=1 0)
        TransformAxis rotation2: coordinates=hip_l_add axis=(1 0 0) LinearFunction(coefficients=-1 0)
        TransformAxis rotation3: coordinates=hip_l_int axis=(0 1 0) LinearFunction(coefficients=-1 0)
    CustomJoint knee_l: socket_parent_frame=femur_l_offset socket_child_frame=tibia_l_offset
      Coordinate knee_l_flx: default_value=-2.094395 range=(-2.617994 -0.3490659) clamped=true
      PhysicalOffsetFrame femur_l_offset: socket_parent=/bodyset/femur_l translation=(0 0 0)
      PhysicalOffsetFrame tibia_l_offset: socket_parent=/bodyset/tibia_l
          translation=(-0.0005960552 0.0417864 -0.003990642)
      SpatialTransform:
        TransformAxis rotation1: coordinates=knee_l_flx axis=(0 0 1) LinearFunction(coefficients=1 0)
        TransformAxis rotation2: coordinates=knee_l_flx axis=(1 0 0)
          SimmSpline: x=(-2.61799 -2.44346 -2.26893 -2.0944 -1.91986 -1.74533 -1.5708 -1.39626 -1.22173 -1.0472 -0.872665 -0.698132 -0.523599 -0.349066)
              y=(0.0872665 0.0750492 0.0645772 0.0523599 0.0401426 0.0296706 0.0174533 0.00523599 -0.00523599 -0.0174533 -0.0296706 -0.0401426 -0.0523599 -0.0645772)
        TransformAxis rotation3: coordinates=knee_l_flx axis=(0 1 0)
          SimmSpline: x=(-2.61799 -2.44346 -2.26893 -2.0944 -1.91986 -1.74533 -1.5708 -1.39626 -1.22173 -1.0472 -0.872665 -0.698132 -0.523599 -0.349066)
              y=(-0.261799 -0.261799 -0.261799 -0.261799 -0.261799 -0.261799 -0.261799 -0.261799 -0.261799 -0.261799 -0.261799 -0.261799 -0.261799 -0.261799)
        TransformAxis translation1: coordinates=knee_l_flx axis=(1 0 0)
          MultiplierFunction: scale=1.006563
            SimmSpline: x=(-2.61799 -2.44346 -2.26893 -2.0944 -1.91986 -1.74533 -1.5708 -1.39626 -1.22173 -1.0472 -0.872665 -0.698132 -0.523599 -0.349066)
                y=(-0.00523853 -0.00464648 -0.00404257 -0.00347254 -0.00297965 -0.00259079 -0.00229943 -0.00211001 -0.00199564 -0.00193207 -0.00187048 -0.00177935 -0.00163827 -0.0014134)
        TransformAxis translation2: coordinates=knee_l_flx axis=(0 1 0)
          MultiplierFunction: scale=1.006563
            SimmSpline: x=(-2.61799 -2.44346 -2.26893 -2.0944 -1.91986 -1.74533 -1.5708 -1.39626 -1.22173 -1.0472 -0.872665 -0.698132 -0.523599 -0.349066)
                y=(-0.0341684 -0.0342539 -0.0341856 -0.0339723 -0.0336511 -0.0332785 -0.0328898 -0.0325504 -0.0322825 -0.0321161 -0.0320632 -0.0321105 -0.0322397 -0.0324144)
        TransformAxis translation3: coordinates=knee_l_flx axis=(0 0 1)
          MultiplierFunction: scale=1.006563
            SimmSpline: x=(-2.61799 -2.44346 -2.26893 -2.0944 -1.91986 -1.74533 -1.5708 -1.39626 -1.22173 -1.0472 -0.872665 -0.698132 -0.523599 -0.349066)
                y=(-0.00260302 -0.00280341 -0.00285365 -0.00290375 -0.00289358 -0.00277318 -0.00270235 -0.00261105 -0.0024695 -0.00241714 -0.0024041 -0.0023809 -0.00249641 -0.00269104)
    CustomJoint ankle_l: socket_parent_frame=tibia_l_offset socket_child_frame=foot_l_offset
      Coordinate ankle_l_flx: default_value=0.8726646 range=(-0.5235988 1.047198) clamped=true
      Coordinate ankle_l_add: default_value=-0.08726646 range=(-0.08726646 0.6108652) clamped=true locked=true
      Coordinate ankle_l_int: default_value=0 range=(-0.8726646 0.2617994) clamped=true locked=true
      PhysicalOffsetFrame tibia_l_offset: socket_parent=/bodyset/tibia_l translation=(0 0 0)
      PhysicalOffsetFrame foot_l_offset: socket_parent=/bodyset/foot_l translation=(0 0 0)
      SpatialTransform: axes_held_at_zero=(translation1 translation2 translation3)
        TransformAxis rotation1: coordinates=ankle_l_flx axis=(0 0 1) LinearFunction(coefficients=1 0)
        TransformAxis rotation2: coordinates=ankle_l_add axis=(1 0 0) LinearFunction(coefficients=-1 0)
        TransformAxis rotation3: coordinates=ankle_l_int axis=(0 1 0) LinearFunction(coefficients=-1 0)
  ForceSet:
    Millard2012EquilibriumMuscle [values shared by the 76 below unless stated]: min_control=0.01 max_control=1
        fiber_damping=0.1 default_activation=0.05 minimum_activation=0.01
      ActiveForceLengthCurve: minimum_value=0
      ForceVelocityCurve: concentric_slope_at_vmax=0 concentric_slope_near_vmax=0.25 isometric_slope=5
          eccentric_slope_at_vmax=0 eccentric_slope_near_vmax=0.15 max_eccentric_velocity_force_multiplier=1.4
      FiberForceLengthCurve
      TendonForceLengthCurve
    Millard2012EquilibriumMuscle R_BFa: max_isometric_force=3.4 optimal_fiber_length=0.03679056
        tendon_slack_length=0.2240885 pennation_angle_at_optimal=0.00698132 [radians]
      PathPoint P1: spine (-0.002153071 0.004037009 0.00278105)
      PathPoint P2: femur_r (-9.908355e-5 -0.02992323 0.001585337)
      PathWrap: wrap_object=hip_r_cylinder_large2 method=hybrid
      PathWrap pathwrap_0: wrap_object=femur_r_prox method=hybrid
    Millard2012EquilibriumMuscle R_BFp: max_isometric_force=12.5 optimal_fiber_length=0.03533818
        tendon_slack_length=0.00832967 pennation_angle_at_optimal=0.127409
      PathPoint P1: pelvis_r (-0.01035554 0.001897199 -0.002127934)
      PathPoint P2: tibia_r (0.003659988 0.02499249 0.002718848)
      PathWrap: wrap_object=femur_r_prox method=hybrid
      PathWrap pathwrap_0: wrap_object=tibia_r_shaft method=hybrid
    Millard2012EquilibriumMuscle R_CF: max_isometric_force=2.1 optimal_fiber_length=0.03564963
        tendon_slack_length=0.002160711 pennation_angle_at_optimal=0
      PathPoint P1: spine (-0.003498741 0.005651812 0.003139896)
      PathPoint P2: femur_r (-0.002477089 -0.02595989 -0.001981671)
      PathWrap: wrap_object=hip_r_cylinder_small method=hybrid
      PathWrap pathwrap_0: wrap_object=femur_r_prox method=hybrid
    Millard2012EquilibriumMuscle R_STp: max_isometric_force=3.4 optimal_fiber_length=0.03750487
        tendon_slack_length=0.01275465 pennation_angle_at_optimal=0.00698132
      PathPoint P1: spine (-0.005023833 0.003678164 0.003319318)
      PathPoint P2: tibia_r (0.004914841 0.02415592 0)
      PathWrap: wrap_object=femur_r_prox2 method=hybrid
      PathWrap pathwrap_0: wrap_object=tibia_r_shaft2 method=hybrid
      PathWrap pathwrap_1: wrap_object=hip_r_cylinder_small method=hybrid
    Millard2012EquilibriumMuscle R_STa: max_isometric_force=12.5 optimal_fiber_length=0.03543228
        tendon_slack_length=0.007866006 pennation_angle_at_optimal=0.127409
      PathPoint P1: pelvis_r (-0.01146224 0.0009485995 -0.0008326699)
      PathPoint P2: tibia_r (0.004914841 0.02415592 0)
      PathWrap: wrap_object=femur_r_prox method=hybrid
      PathWrap pathwrap_0: wrap_object=tibia_r_shaft2 method=hybrid
    Millard2012EquilibriumMuscle R_SM: max_isometric_force=10.3 optimal_fiber_length=0.03315253
        tendon_slack_length=0.00962849 pennation_angle_at_optimal=0
      PathPoint P1: pelvis_r (-0.01082984 -0.0008695495 -0.003423198)
      PathPoint P2: tibia_r (0.002300564 0.03659988 -0.002718848)
      PathWrap: wrap_object=tibia_r_shaft2 method=hybrid
    Millard2012EquilibriumMuscle R_QF: max_isometric_force=3 optimal_fiber_length=0.009145052
        tendon_slack_length=0.002817779 pennation_angle_at_optimal=0.05061455
      PathPoint P1: pelvis_r (-0.008379295 -0.0005533497 -0.002220453)
      PathPoint P2: femur_r (-0.002873423 -0.004359676 0.001089919)
      PathWrap: wrap_object=femur_r_shaft_small method=hybrid
    Millard2012EquilibriumMuscle R_TFL: max_isometric_force=2.9 optimal_fiber_length=0.01301878
        tendon_slack_length=0.002169866 pennation_angle_at_optimal=0.148353
      PathPoint P1: pelvis_r (0.01683764 0.0004742997 0.002405491)
      PathPoint P2: femur_r (0.005647762 -0.01763687 0.00307159)
    Millard2012EquilibriumMuscle R_GMa: max_isometric_force=9.3 optimal_fiber_length=0.0174535
        tendon_slack_length=0.01012849 pennation_angle_at_optimal=0.2111848
      PathPoint P1: spine (0.01812168 0.005023833 0.003678164)
      PathPoint P2: femur_r (-0.001486253 -0.009710188 0.006341347)
      PathWrap: wrap_object=hip_r_cylinder_large2 method=hybrid
    Millard2012EquilibriumMuscle R_GMe: max_isometric_force=18.8 optimal_fiber_length=0.01626055
        tendon_slack_length=0.006150365 pennation_angle_at_optimal=0.2199115
      PathPoint P1: pelvis_r (0.01596809 0.003161998 -9.251887e-5)
      PathPoint P2: femur_r (-0.002675256 -0.003269757 0.006341347)
      PathWrap: wrap_object=hip_r_cylinder_small2 method=hybrid
      PathWrap pathwrap_0: wrap_object=femur_r_shaft_large method=hybrid
    Millard2012EquilibriumMuscle R_GMi: max_isometric_force=7.4 optimal_fiber_length=0.009525466
        tendon_slack_length=0.004318822 pennation_angle_at_optimal=0.286234
      PathPoint P1: pelvis_r (0.01027649 0.0007114496 0.0003700755)
      PathPoint P2: femur_r (-0.0003963342 -9.908355e-5 0.004756011)
    Millard2012EquilibriumMuscle R_Pir: max_isometric_force=11.2 optimal_fiber_length=0.008844454
        tendon_slack_length=0.005048576 pennation_angle_at_optimal=0.286234
      PathPoint P1: pelvis_r (0.009011695 0.003320098 -0.0006476321)
      PathPoint P2: femur_r (-0.00138717 0.000891752 0.003963342)
    Millard2012EquilibriumMuscle R_GP: max_isometric_force=2.4 optimal_fiber_length=0.02774949
        tendon_slack_length=0.01111987 pennation_angle_at_optimal=0.05759587
      PathPoint P1: pelvis_r (-0.01169939 -0.004347747 -0.005828689)
      PathPoint P2: tibia_r (0.005123983 0.02781591 -0.001882279)
      PathWrap: wrap_object=tibia_r_shaft2 method=hybrid
    Millard2012EquilibriumMuscle R_GA: max_isometric_force=1.6 optimal_fiber_length=0.02968591
        tendon_slack_length=0.00629045 pennation_angle_at_optimal=0
      PathPoint P1: pelvis_r (-0.005138247 -0.004663947 -0.005643651)
      PathPoint P2: tibia_r (0.003346275 0.03022104 -0.001777708)
      PathWrap: wrap_object=tibia_r_shaft2 method=hybrid
    Millard2012EquilibriumMuscle R_AL: max_isometric_force=1 optimal_fiber_length=0.01586968
        tendon_slack_length=0.005547527 pennation_angle_at_optimal=0.1692969
      PathPoint P1: pelvis_r (-0.003557248 -0.003952498 -0.0049035)
      PathPoint P2: femur_r (-0.001585337 -0.0168442 0.001089919)
    Millard2012EquilibriumMuscle R_AM: max_isometric_force=3 optimal_fiber_length=0.02729125
        tendon_slack_length=0.008307996 pennation_angle_at_optimal=0
      PathPoint P1: pelvis_r (-0.004822047 -0.004189648 -0.005181057)
      PathPoint P2: femur_r (-0.0005945013 -0.02972507 -0.00307159)
    Millard2012EquilibriumMuscle R_AB: max_isometric_force=12.2 optimal_fiber_length=0.02080085
        tendon_slack_length=0.00562337 pennation_angle_at_optimal=0.2251475
      PathPoint P1: pelvis_r (-0.008458345 -0.004584897 -0.006106246)
      PathPoint P2: femur_r (-0.001585337 -0.0162497 0.003467924)
    Millard2012EquilibriumMuscle R_Pec: max_isometric_force=3.7 optimal_fiber_length=0.008293522
        tendon_slack_length=0.003815749 pennation_angle_at_optimal=0.09773844
      PathPoint P1: pelvis_r (0.0007114496 -0.002687698 -0.003053123)
      PathPoint P2: femur_r (-0.001783504 -0.01060194 0.001882587)
    Millard2012EquilibriumMuscle R_IP: max_isometric_force=16.3 optimal_fiber_length=0.01523899
        tendon_slack_length=0.03154358 pennation_angle_at_optimal=0.1500983
      PathPoint P1: spine (0.04817497 0.004485565 0.002691339)
      PathPoint P2: femur_r (-0.002080755 -0.005251428 9.908355e-5)
    Millard2012EquilibriumMuscle R_OE: max_isometric_force=7.2 optimal_fiber_length=0.00488167
        tendon_slack_length=0.004367448 pennation_angle_at_optimal=0.2984513
      PathPoint P1: pelvis_r (-0.007035446 -0.002134349 -0.002868085)
      PathPoint P2: femur_r (-0.001585337 0.0004954178 0.003467924)
    Millard2012EquilibriumMuscle R_OI: max_isometric_force=3 optimal_fiber_length=0.003668525
        tendon_slack_length=0.003605065 pennation_angle_at_optimal=0.1221731
      PathPoint P1: pelvis_r (-0.004980147 0.003794398 -0.002405491)
      PathPoint P2: femur_r (-0.001882587 0.0006935849 0.002378005)
    Millard2012EquilibriumMuscle R_GS: max_isometric_force=0.4 optimal_fiber_length=0.005446496
        tendon_slack_length=0.0001215628 pennation_angle_at_optimal=0.1884956
      PathPoint P1: pelvis_r (0.002292449 0.001106699 -0.002035415)
      PathPoint P2: femur_r (-0.001089919 0.001486253 0.002378005)
    Millard2012EquilibriumMuscle R_GI: max_isometric_force=2.9 optimal_fiber_length=0.003519248
        tendon_slack_length=0.002831204 pennation_angle_at_optimal=0.3298672
      PathPoint P1: pelvis_r (-0.004426797 0.001897199 -0.001202745)
      PathPoint P2: femur_r (-0.00307159 -0.0006935849 0.002080755)
    Millard2012EquilibriumMuscle R_RF: max_isometric_force=16.5 optimal_fiber_length=0.01203209
        tendon_slack_length=0.0304709 pennation_angle_at_optimal=0.1972222
      PathPoint P1: pelvis_r (0.003557248 -7.904995e-5 0.001387783)
      PathPoint P2: tibia_r (0.002718848 0.03921416 0.0005228554)
      PathWrap: wrap_object=femur_r_dist method=hybrid
      PathWrap pathwrap_0: wrap_object=femur_r_shaft_small method=hybrid
    Millard2012EquilibriumMuscle R_VL: max_isometric_force=14.9 optimal_fiber_length=0.01931526
        tendon_slack_length=0.0243289 pennation_angle_at_optimal=0.2548181
      PathPoint P1: femur_r (-0.001089919 -0.003567008 0.005548679)
      PathPoint P2: tibia_r (0.002718848 0.03921416 0.0005228554)
      PathWrap: wrap_object=femur_r_dist method=hybrid
      PathWrap pathwrap_0: wrap_object=femur_r_shaft_small method=hybrid
    Millard2012EquilibriumMuscle R_VI: max_isometric_force=2.6 optimal_fiber_length=0.01126495
        tendon_slack_length=0.02266692 pennation_angle_at_optimal=0.2495821
      PathPoint P1: femur_r (0.0007926684 -0.01149369 0.003170674)
      PathPoint P2: tibia_r (0.002718848 0.03921416 0.0005228554)
      PathWrap: wrap_object=femur_r_dist method=hybrid
      PathWrap pathwrap_0: wrap_object=femur_r_shaft_small method=hybrid
    Millard2012EquilibriumMuscle R_VM: max_isometric_force=6.1 optimal_fiber_length=0.01524131
        tendon_slack_length=0.02313255 pennation_angle_at_optimal=0.2024582
      PathPoint P1: femur_r (-0.0001981671 -0.007332183 0.001189003)
      PathPoint P2: tibia_r (0.002718848 0.03921416 0.0005228554)
      PathWrap: wrap_object=femur_r_dist method=hybrid
      PathWrap pathwrap_0: wrap_object=femur_r_shaft_small method=hybrid
    Millard2012EquilibriumMuscle R_MG: max_isometric_force=11.7 optimal_fiber_length=0.01497635
        tendon_slack_length=0.02888093 pennation_angle_at_optimal=0.2373648
      PathPoint P1: femur_r (-0.002675256 -0.02754523 -0.002080755)
      PathPoint P2: foot_r (-0.004162631 0.0004162631 0.001040658)
    Millard2012EquilibriumMuscle R_LG: max_isometric_force=18.3 optimal_fiber_length=0.01289326
        tendon_slack_length=0.03020026 pennation_angle_at_optimal=0.1675516
      PathPoint P1: femur_r (-0.002972507 -0.02813973 0.00168442)
      PathPoint P2: foot_r (-0.004162631 0.0004162631 0.001040658)
    Millard2012EquilibriumMuscle R_Pla: max_isometric_force=5.6 optimal_fiber_length=0.01288612
        tendon_slack_length=0.03041038 pennation_angle_at_optimal=0.1972222
      PathPoint P1: femur_r (-0.002278922 -0.02724798 0.001089919)
      PathPoint P2: foot_r (-0.004162631 0.0004162631 0.001040658)
    Millard2012EquilibriumMuscle R_Sol: max_isometric_force=1.4 optimal_fiber_length=0.01630726
        tendon_slack_length=0.02298349 pennation_angle_at_optimal=0.07679449
      PathPoint P1: tibia_r (-0.003450846 0.03503131 0.002509706)
      PathPoint P2: foot_r (-0.004162631 0.0004162631 0.001040658)
    Millard2012EquilibriumMuscle R_TA: max_isometric_force=8.6 optimal_fiber_length=0.01558571
        tendon_slack_length=0.02181105 pennation_angle_at_optimal=0.164061
      PathPoint P1: tibia_r (0.003450846 0.03513588 0.002718848)
      PathPoint P2: foot_r (0.004995158 -0.002289447 -0.0007284605)
      PathWrap: wrap_object=ankle_r_sphere method=hybrid
      PathWrap pathwrap_0: wrap_object=ankle_r_torus method=hybrid
    Millard2012EquilibriumMuscle R_EDL: max_isometric_force=2.2 optimal_fiber_length=0.01401562
        tendon_slack_length=0.02897707 pennation_angle_at_optimal=0.1850049
      PathPoint P1: tibia_r (0.001254853 0.04099186 0.00292799)
      PathPoint P2: foot_r (0.003538237 -0.001769118 0.001144724)
      PathWrap: wrap_object=ankle_r_sphere method=hybrid
      PathWrap pathwrap_0: wrap_object=ankle_r_torus method=hybrid
    Millard2012EquilibriumMuscle R_TP: max_isometric_force=3.6 optimal_fiber_length=0.005541144
        tendon_slack_length=0.03285388 pennation_angle_at_optimal=0.09948377
      PathPoint P1: tibia_r (-0.001568566 0.0354496 0.0001045711)
      PathPoint P2: foot_r (-0.0007284605 -0.001769118 -0.001144724)
      PathWrap: wrap_object=ankle_r_sphere method=hybrid
      PathWrap pathwrap_0: wrap_object=ankle_r_torus method=hybrid
    Millard2012EquilibriumMuscle R_FDL: max_isometric_force=11.1 optimal_fiber_length=0.009200413
        tendon_slack_length=0.03152662 pennation_angle_at_optimal=0.1937316
      PathPoint P1: tibia_r (-0.002614277 0.03701816 0)
      PathPoint P2: foot_r (-0.0007284605 -0.001769118 -0.001144724)
      PathWrap: wrap_object=ankle_r_sphere method=hybrid
      PathWrap pathwrap_0: wrap_object=ankle_r_torus method=hybrid
    Millard2012EquilibriumMuscle R_FHL: max_isometric_force=0.2 optimal_fiber_length=0.005645694
        tendon_slack_length=0.03270194 pennation_angle_at_optimal=0.02268928
      PathPoint P1: tibia_r (-0.001568566 0.0354496 0.0001045711)
      PathPoint P2: foot_r (-0.0007284605 -0.001769118 -0.001144724)
      PathWrap: wrap_object=ankle_r_sphere method=hybrid
      PathWrap pathwrap_0: wrap_object=ankle_r_torus method=hybrid
    Millard2012EquilibriumMuscle R_Per: max_isometric_force=7.7 optimal_fiber_length=0.009202203
        tendon_slack_length=0.03038411 pennation_angle_at_optimal=0.1099557
      PathPoint P1: tibia_r (-0.001986851 0.03691359 0.003032561)
      PathPoint P2: foot_r (0.002913842 -0.002809776 0.001769118)
      PathWrap: wrap_object=ankle_r_sphere method=hybrid
      PathWrap pathwrap_0: wrap_object=ankle_r_torus method=hybrid
    Millard2012EquilibriumMuscle R_Pop: max_isometric_force=2.9 optimal_fiber_length=0.006614874
        tendon_slack_length=0.009640983 pennation_angle_at_optimal=0.2426008
      PathPoint P1: femur_r (-0.002378005 -0.03051773 0.00168442)
      PathPoint P2: tibia_r (0.0006274265 0.02833876 -0.002405135)
      PathWrap: wrap_object=tibia_r_prox method=hybrid
    Millard2012EquilibriumMuscle L_BFa: max_isometric_force=3.4 optimal_fiber_length=0.03717849
        tendon_slack_length=0.005752182 pennation_angle_at_optimal=0.00698132
      PathPoint P1: spine (-0.002153071 0.004037009 -0.00278105)
      PathPoint P2: femur_l (-0.0001006563 -0.0303982 -0.001610501)
      PathWrap: wrap_object=hip_l_cylinder_large2 method=hybrid
      PathWrap pathwrap_0: wrap_object=femur_l_prox method=hybrid
    Millard2012EquilibriumMuscle L_BFp: max_isometric_force=12.5 optimal_fiber_length=0.03580154
        tendon_slack_length=0.005854007 pennation_angle_at_optimal=0.127409
      PathPoint P1: pelvis_l (-0.01035554 0.001897199 0.002127934)
      PathPoint P2: tibia_l (0.003659988 0.02499249 -0.002718848)
      PathWrap: wrap_object=femur_l_prox method=hybrid
      PathWrap pathwrap_0: wrap_object=tibia_l_shaft method=hybrid
    Millard2012EquilibriumMuscle L_CF: max_isometric_force=2.1 optimal_fiber_length=0.03603236
        tendon_slack_length=0.002183908 pennation_angle_at_optimal=0
      PathPoint P1: spine (-0.003498741 0.005651812 -0.003139896)
      PathPoint R_CF-P2: femur_l (-0.002516408 -0.02637195 0.002013126)
      PathWrap: wrap_object=hip_l_cylinder_small method=hybrid
      PathWrap pathwrap_0: wrap_object=femur_l_prox method=hybrid
    Millard2012EquilibriumMuscle L_STp: max_isometric_force=3.4 optimal_fiber_length=0.03789781
        tendon_slack_length=0.0111547 pennation_angle_at_optimal=0.00698132
      PathPoint P1: spine (-0.005023833 0.003678164 -0.003319318)
      PathPoint P2: tibia_l (0.004914841 0.02415592 0)
      PathWrap: wrap_object=femur_l_prox2 method=hybrid
      PathWrap pathwrap_0: wrap_object=tibia_l_shaft2 method=hybrid
      PathWrap pathwrap_1: wrap_object=hip_l_cylinder_small method=hybrid
    Millard2012EquilibriumMuscle L_STa: max_isometric_force=12.5 optimal_fiber_length=0.03588905
        tendon_slack_length=0.005787421 pennation_angle_at_optimal=0.127409
      PathPoint P1: pelvis_l (-0.01146224 0.0009485995 0.0008326699)
      PathPoint P2: tibia_l (0.004914841 0.02415592 0)
      PathWrap: wrap_object=femur_l_prox method=hybrid
      PathWrap pathwrap_0: wrap_object=tibia_l_shaft2 method=hybrid
    Millard2012EquilibriumMuscle L_SM: max_isometric_force=10.3 optimal_fiber_length=0.03360868
        tendon_slack_length=0.001602491 pennation_angle_at_optimal=0
      PathPoint P1: pelvis_l (-0.01082984 -0.0008695495 0.003423198)
      PathPoint P2: tibia_l (0.002300564 0.03659988 0.002718848)
      PathWrap: wrap_object=tibia_l_shaft2 method=hybrid
    Millard2012EquilibriumMuscle L_QF: max_isometric_force=3 optimal_fiber_length=0.009187852
        tendon_slack_length=5.117088e-5 pennation_angle_at_optimal=0.05061455
      PathPoint P1: pelvis_l (-0.008379295 -0.0005533497 0.002220453)
      PathPoint P2: femur_l (-0.002919033 -0.004428878 -0.001107219)
      PathWrap: wrap_object=femur_l_shaft_small method=hybrid
    Millard2012EquilibriumMuscle L_TFL: max_isometric_force=2.9 optimal_fiber_length=0.01318461
        tendon_slack_length=0.006705208 pennation_angle_at_optimal=0.148353
      PathPoint P1: pelvis_l (0.01683764 0.0004742997 -0.002405491)
      PathPoint P2: femur_l (0.00573741 -0.01791682 -0.003120346)
    Millard2012EquilibriumMuscle L_GMa: max_isometric_force=9.3 optimal_fiber_length=0.0175321
        tendon_slack_length=0.009235213 pennation_angle_at_optimal=0.2111848
      PathPoint P1: spine (0.01812168 0.005023833 -0.003678164)
      PathPoint P2: femur_l (-0.001509845 -0.009864318 -0.006442004)
      PathWrap: wrap_object=hip_l_cylinder_large2 method=hybrid
    Millard2012EquilibriumMuscle L_GMe: max_isometric_force=18.8 optimal_fiber_length=0.01632502
        tendon_slack_length=0.004366245 pennation_angle_at_optimal=0.2199115
      PathPoint P1: pelvis_l (0.01596809 0.003161998 9.251887e-5)
      PathPoint P2: femur_l (-0.00271772 -0.003321658 -0.006442004)
      PathWrap: wrap_object=hip_l_cylinder_small2 method=hybrid
      PathWrap pathwrap_0: wrap_object=femur_l_shaft_large method=hybrid
    Millard2012EquilibriumMuscle L_GMi: max_isometric_force=7.4 optimal_fiber_length=0.009556455
        tendon_slack_length=0.002561778 pennation_angle_at_optimal=0.286234
      PathPoint P1: pelvis_l (0.01027649 0.0007114496 -0.0003700755)
      PathPoint P2: femur_l (-0.0004026252 -0.0001006563 -0.004831503)
    Millard2012EquilibriumMuscle L_Pir: max_isometric_force=11.2 optimal_fiber_length=0.00888025
        tendon_slack_length=0.003027781 pennation_angle_at_optimal=0.286234
      PathPoint P1: pelvis_l (0.009011695 0.003320098 0.0006476321)
      PathPoint P2: femur_l (-0.001409188 0.0009059068 -0.004026252)
    Millard2012EquilibriumMuscle L_GP: max_isometric_force=2.4 optimal_fiber_length=0.02816729
        tendon_slack_length=0.009239288 pennation_angle_at_optimal=0.05759587
      PathPoint P1: pelvis_l (-0.01169939 -0.004347747 0.005828689)
      PathPoint P2: tibia_l (0.005123983 0.02781591 0.001882279)
      PathWrap: wrap_object=tibia_l_shaft2 method=hybrid
    Millard2012EquilibriumMuscle L_GA: max_isometric_force=1.6 optimal_fiber_length=0.03018389
        tendon_slack_length=0.005491896 pennation_angle_at_optimal=0
      PathPoint P1: pelvis_l (-0.005138247 -0.004663947 0.005643651)
      PathPoint P2: tibia_l (0.003346275 0.03022104 0.001777708)
      PathWrap: wrap_object=tibia_l_shaft2 method=hybrid
    Millard2012EquilibriumMuscle L_AL: max_isometric_force=1 optimal_fiber_length=0.01608351
        tendon_slack_length=0.001230488 pennation_angle_at_optimal=0.1692969
      PathPoint P1: pelvis_l (-0.003557248 -0.003952498 0.0049035)
      PathPoint P2: femur_l (-0.001610501 -0.01711157 -0.001107219)
    Millard2012EquilibriumMuscle L_AM: max_isometric_force=3 optimal_fiber_length=0.02769263
        tendon_slack_length=0.001713628 pennation_angle_at_optimal=0
      PathPoint P1: pelvis_l (-0.004822047 -0.004189648 0.005181057)
      PathPoint P2: femur_l (-0.0006039378 -0.03019689 0.003120346)
    Millard2012EquilibriumMuscle L_AB: max_isometric_force=12.2 optimal_fiber_length=0.02101403
        tendon_slack_length=1.216769e-6 pennation_angle_at_optimal=0.2251475
      PathPoint P1: pelvis_l (-0.008458345 -0.004584897 0.006106246)
      PathPoint P2: femur_l (-0.001610501 -0.01650763 -0.003522971)
    Millard2012EquilibriumMuscle L_Pec: max_isometric_force=3.7 optimal_fiber_length=0.00842435
        tendon_slack_length=0.00302509 pennation_angle_at_optimal=0.09773844
      PathPoint P1: pelvis_l (0.0007114496 -0.002687698 0.003053123)
      PathPoint P2: femur_l (-0.001811814 -0.01077022 -0.00191247)
    Millard2012EquilibriumMuscle L_IP: max_isometric_force=16.3 optimal_fiber_length=0.01523721
        tendon_slack_length=0.03119822 pennation_angle_at_optimal=0.1500983
      PathPoint P1: spine (0.04817497 0.004485565 -0.002691339)
      PathPoint P2: femur_l (-0.002113782 -0.005334784 -0.0001006563)
    Millard2012EquilibriumMuscle L_OE: max_isometric_force=7.2 optimal_fiber_length=0.004893641
        tendon_slack_length=0.003893512 pennation_angle_at_optimal=0.2984513
      PathPoint P1: pelvis_l (-0.007035446 -0.002134349 0.002868085)
      PathPoint P2: femur_l (-0.001610501 0.0005032815 -0.003522971)
    Millard2012EquilibriumMuscle L_OI: max_isometric_force=3 optimal_fiber_length=0.003675757
        tendon_slack_length=0.002947098 pennation_angle_at_optimal=0.1221731
      PathPoint P1: pelvis_l (-0.004980147 0.003794398 0.002405491)
      PathPoint P2: femur_l (-0.00191247 0.0007045942 -0.002415751)
    Millard2012EquilibriumMuscle L_GS: max_isometric_force=0.4 optimal_fiber_length=0.005487846
        tendon_slack_length=0.0001224857 pennation_angle_at_optimal=0.1884956
      PathPoint P1: pelvis_l (0.002292449 0.001106699 0.002035415)
      PathPoint P2: femur_l (-0.001107219 0.001509845 -0.002415751)
    Millard2012EquilibriumMuscle L_GI: max_isometric_force=2.9 optimal_fiber_length=0.003538653
        tendon_slack_length=0.001728179 pennation_angle_at_optimal=0.3298672
      PathPoint P1: pelvis_l (-0.004426797 0.001897199 0.001202745)
      PathPoint P2: femur_l (-0.003120346 -0.0007045942 -0.002113782)
    Millard2012EquilibriumMuscle L_RF: max_isometric_force=16.5 optimal_fiber_length=0.012218
        tendon_slack_length=0.02898313 pennation_angle_at_optimal=0.1972222
      PathPoint P1: pelvis_l (0.003557248 -7.904995e-5 -0.001387783)
      PathPoint P2: tibia_l (0.002718848 0.03921416 -0.0005228554)
      PathWrap: wrap_object=femur_l_dist method=hybrid
      PathWrap pathwrap_0: wrap_object=femur_l_shaft_small method=hybrid
    Millard2012EquilibriumMuscle L_VL: max_isometric_force=14.9 optimal_fiber_length=0.01959318
        tendon_slack_length=0.01956975 pennation_angle_at_optimal=0.2548181
      PathPoint P1: femur_l (-0.001107219 -0.003623627 -0.005636753)
      PathPoint P2: tibia_l (0.002718848 0.03921416 -0.0005228554)
      PathWrap: wrap_object=femur_l_dist method=hybrid
      PathWrap pathwrap_0: wrap_object=femur_l_shaft_small method=hybrid
    Millard2012EquilibriumMuscle L_VI: max_isometric_force=2.6 optimal_fiber_length=0.01142289
        tendon_slack_length=0.01880685 pennation_angle_at_optimal=0.2495821
      PathPoint P1: femur_l (0.0008052505 -0.01167613 -0.003221002)
      PathPoint P2: tibia_l (0.002718848 0.03921416 -0.0005228554)
      PathWrap: wrap_object=femur_l_dist method=hybrid
      PathWrap pathwrap_0: wrap_object=femur_l_shaft_small method=hybrid
    Millard2012EquilibriumMuscle L_VM: max_isometric_force=6.1 optimal_fiber_length=0.01545839
        tendon_slack_length=0.01887419 pennation_angle_at_optimal=0.2024582
      PathPoint P1: femur_l (-0.0002013126 -0.007448567 -0.001207876)
      PathPoint P2: tibia_l (0.002718848 0.03921416 -0.0005228554)
      PathWrap: wrap_object=femur_l_dist method=hybrid
      PathWrap pathwrap_0: wrap_object=femur_l_shaft_small method=hybrid
    Millard2012EquilibriumMuscle L_MG: max_isometric_force=11.7 optimal_fiber_length=0.0149044
        tendon_slack_length=0.02795864 pennation_angle_at_optimal=0.2373648
      PathPoint P1: femur_l (-0.00271772 -0.02798245 0.002113782)
      PathPoint P2: foot_l (-0.003891589 0.0003891589 -0.0009728972)
    Millard2012EquilibriumMuscle L_LG: max_isometric_force=18.3 optimal_fiber_length=0.01282992
        tendon_slack_length=0.02944045 pennation_angle_at_optimal=0.1675516
      PathPoint P1: femur_l (-0.003019689 -0.02858639 -0.001711157)
      PathPoint P2: foot_l (-0.003891589 0.0003891589 -0.0009728972)
    Millard2012EquilibriumMuscle L_Pla: max_isometric_force=5.6 optimal_fiber_length=0.01282615
        tendon_slack_length=0.03010031 pennation_angle_at_optimal=0.1972222
      PathPoint P1: femur_l (-0.002315095 -0.02768048 -0.001107219)
      PathPoint P2: foot_l (-0.003891589 0.0003891589 -0.0009728972)
    Millard2012EquilibriumMuscle L_Sol: max_isometric_force=1.4 optimal_fiber_length=0.0162294
        tendon_slack_length=0.01968218 pennation_angle_at_optimal=0.07679449
      PathPoint P1: tibia_l (-0.003450846 0.03503131 -0.002509706)
      PathPoint P2: foot_l (-0.003891589 0.0003891589 -0.0009728972)
    Millard2012EquilibriumMuscle L_TA: max_isometric_force=8.6 optimal_fiber_length=0.01564856
        tendon_slack_length=0.02133003 pennation_angle_at_optimal=0.164061
      PathPoint P1: tibia_l (0.003450846 0.03513588 -0.002718848)
      PathPoint P2: foot_l (0.004669906 -0.002140374 0.000681028)
      PathWrap: wrap_object=ankle_l_sphere method=hybrid
      PathWrap pathwrap_0: wrap_object=ankle_l_torus method=hybrid
    Millard2012EquilibriumMuscle L_EDL: max_isometric_force=2.2 optimal_fiber_length=0.01404904
        tendon_slack_length=0.0285501 pennation_angle_at_optimal=0.1850049
      PathPoint P1: tibia_l (0.001254853 0.04099186 -0.00292799)
      PathPoint P2: foot_l (0.00330785 -0.001653925 -0.001070187)
      PathWrap: wrap_object=ankle_l_sphere method=hybrid
      PathWrap pathwrap_0: wrap_object=ankle_l_torus method=hybrid
    Millard2012EquilibriumMuscle L_TP: max_isometric_force=3.6 optimal_fiber_length=0.005526063
        tendon_slack_length=0.03196414 pennation_angle_at_optimal=0.09948377
      PathPoint P1: tibia_l (-0.001568566 0.0354496 -0.0001045711)
      PathPoint P2: foot_l (-0.000681028 -0.001653925 0.001070187)
      PathWrap: wrap_object=ankle_l_sphere method=hybrid
      PathWrap pathwrap_0: wrap_object=ankle_l_torus method=hybrid
    Millard2012EquilibriumMuscle L_FDL: max_isometric_force=11.1 optimal_fiber_length=0.009175677
        tendon_slack_length=0.03047433 pennation_angle_at_optimal=0.1937316
      PathPoint P1: tibia_l (-0.002614277 0.03701816 0)
      PathPoint P2: foot_l (-0.000681028 -0.001653925 0.001070187)
      PathWrap: wrap_object=ankle_l_sphere method=hybrid
      PathWrap pathwrap_0: wrap_object=ankle_l_torus method=hybrid
    Millard2012EquilibriumMuscle L_FHL: max_isometric_force=0.2 optimal_fiber_length=0.005630329
        tendon_slack_length=0.031841 pennation_angle_at_optimal=0.02268928
      PathPoint P1: tibia_l (-0.001568566 0.0354496 -0.0001045711)
      PathPoint P2: foot_l (-0.000681028 -0.001653925 0.001070187)
      PathWrap: wrap_object=ankle_l_sphere method=hybrid
      PathWrap pathwrap_0: wrap_object=ankle_l_torus method=hybrid
    Millard2012EquilibriumMuscle L_Per: max_isometric_force=7.7 optimal_fiber_length=0.009201806
        tendon_slack_length=0.02990112 pennation_angle_at_optimal=0.1099557
      PathPoint P1: tibia_l (-0.001986851 0.03691359 -0.003032561)
      PathPoint P2: foot_l (0.002724112 -0.002626822 -0.001653925)
      PathWrap: wrap_object=ankle_l_sphere method=hybrid
      PathWrap pathwrap_0: wrap_object=ankle_l_torus method=hybrid
    Millard2012EquilibriumMuscle L_Pop: max_isometric_force=2.9 optimal_fiber_length=0.006607126
        tendon_slack_length=0.009559836 pennation_angle_at_optimal=0.2426008
      PathPoint P1: femur_l (-0.002415751 -0.03100214 -0.001711157)
      PathPoint P2: tibia_l (0.0006274265 0.02833876 0.002405135)
      PathWrap: wrap_object=tibia_l_prox method=hybrid
    ObjectGroup hamstrings_r: members=(R_BFa R_BFp R_CF R_GA R_GP R_SM R_STa R_STp)
    ObjectGroup hip_r_cuffs: members=(R_GI R_GS R_OE R_OI R_Pir R_QF)
    ObjectGroup hip_r_flexors: members=(R_IP R_Pec R_TFL)
    ObjectGroup gluteals_r: members=(R_GMa R_GMe R_GMi)
    ObjectGroup adductors_r: members=(R_AB R_AL R_AM R_GA R_GP)
    ObjectGroup quadriceps_r: members=(R_RF R_VI R_VL R_VM)
    ObjectGroup calf_muscles_r: members=(R_LG R_MG R_Pla R_Sol)
    ObjectGroup anterior_crural_r: members=(R_EDL R_TA)
    ObjectGroup posterior_crural_r: members=(R_FDL R_FHL R_TP)
    ObjectGroup others_r: members=(R_Per R_Pop)
    ObjectGroup hamstrings_l: members=(L_BFa L_BFp L_CF L_GA L_GP L_SM L_STa L_STp)
    ObjectGroup hip_l_cuffs: members=(L_GI L_GS L_OE L_OI L_Pir L_QF)
    ObjectGroup hip_l_flexors: members=(L_IP L_Pec L_TFL)
    ObjectGroup gluteals_l: members=(L_GMa L_GMe L_GMi)
    ObjectGroup adductors_l: members=(L_AB L_AL L_AM L_GA L_GP)
    ObjectGroup quadriceps_l: members=(L_RF L_VI L_VL L_VM)
    ObjectGroup calf_muscles_l: members=(L_LG L_MG L_Pla L_Sol)
    ObjectGroup anterior_crural_l: members=(L_EDL L_TA)
    ObjectGroup posterior_crural_l: members=(L_FDL L_FHL L_TP)
    ObjectGroup others_l: members=(L_Per L_Pop)
  MarkerSet:
    Marker RASI: pelvis_r (0.02213399 0.003161998 0.002775566)
    Marker RHIP: pelvis_r (-0.0007904995 0.0007904995 0.009251887)
    Marker RKNE: femur_r (0 -0.03467924 0.002972507)
    Marker RANK: tibia_r (0 0 0.004182843) fixed=true
    Marker RTOE: foot_r (0.01560987 -0.005203289 0.005203289) fixed=true
    Marker TAIL: spine (-0.007151202 0.006960153 0)
    Marker SPL6: spine (0.02751428 0.0135622 0) fixed=true
    Marker LASI: pelvis_l (0.02213399 0.003161998 -0.002775566)
    Marker LHIP: pelvis_l (-0.0007904995 0.0007904995 -0.009251887)
    Marker LKNE: femur_l (0 -0.03522971 -0.003019689)
    Marker LANK: tibia_l (0 0 -0.004182843) fixed=true
    Marker LTOE: foot_l (0.01459346 -0.004864486 -0.004864486) fixed=true
