# OpenSim document version 40500
InverseKinematicsTool Walk05:
  results_directory: /home/hudson/RatHindlimb/data/BAA/BAA01/Baseline
  constraint_weight: Inf
  accuracy: 1e-5
  time_range: 2.87 3.45
  output_motion_file: data/BAA/BAA01/Baseline/Walk05_ik.mot
  report_errors: true
  marker_file: /home/hudson/RatHindlimb/data/BAA/BAA01/Baseline/Walk05.trc
  report_marker_locations: true
  IKTaskSet:
    IKMarkerTask RASI: apply=true weight=1
    IKMarkerTask RHIP: apply=true weight=1
    IKMarkerTask RKNE: apply=true weight=0.1
    IKMarkerTask RANK: apply=true weight=1
    IKMarkerTask RTOE: apply=true weight=1
    IKMarkerTask TAIL: apply=true weight=1
    IKMarkerTask SPL6: apply=true weight=1
    IKMarkerTask LASI: apply=true weight=1
    IKMarkerTask LHIP: apply=true weight=1
    IKMarkerTask LKNE: apply=true weight=0.1
    IKMarkerTask LANK: apply=true weight=1
    IKMarkerTask LTOE: apply=true weight=1
