# OpenSim document version 40500
Model RatHindlimbBilateral:
  gravity: 0 -9.80665 0
  credits: Model authors names..
  publications: List of publications related to model...
  length_units: m
  force_units: N
  Ground: meshes=ground.stl
  BodySet:
    Body spine: mass=0.12 [kg] mass_center=(0 0 0) inertia=(4.8e-6 4.8e-6 4.8e-6 0 0 0) meshes=spine.stl
    Body pelvis_r: mass=0.02 mass_center=(0 0 0) inertia=(4e-6 3.5e-6 3.5e-6 0 0 0) meshes=pelvis_r.stl
    Body femur_r: mass=0.02 mass_center=(0 -0.015 0) inertia=(1.62e-6 2.5e-7 1.62e-6 0 0 0) meshes=femur_r.stl
    Body tibia_r: mass=0.02 mass_center=(0 0.015 0) inertia=(1.62e-6 2.5e-7 1.62e-6 0 0 0) meshes=tibia_r.stl
    Body foot_r: mass=0.02 mass_center=(0.007 -0.005 0) inertia=(2.5e-7 1.62e-6 1.62e-6 0 0 0) meshes=foot_r.stl
    Body pelvis_l: mass=0.02 mass_center=(0 0 0) inertia=(4e-6 3.5e-6 3.5e-6 0 0 0) meshes=pelvis_r.stl
    Body femur_l: mass=0.02 mass_center=(0 -0.015 0) inertia=(1.62e-6 2.5e-7 1.62e-6 0 0 0) meshes=femur_r.stl
    Body tibia_l: mass=0.02 mass_center=(0 0.015 0) inertia=(1.62e-6 2.5e-7 1.62e-6 0 0 0) meshes=tibia_r.stl
    Body foot_l: mass=0.02 mass_center=(0.007 -0.005 0) inertia=(2.5e-7 1.62e-6 1.62e-6 0 0 0) meshes=foot_r.stl
  JointSet:
    CustomJoint ground_spine: socket_parent_frame=ground_offset socket_child_frame=spine_offset
      Coordinate sacrum_pitch: default_value=0.5235988 range=(-1.570796 1.570796) clamped=true
      Coordinate sacrum_roll: default_value=0 range=(-1.570796 1.570796) clamped=true
      Coordinate sacrum_yaw: default_value=0 range=(-1.570796 1.570796) clamped=true
      Coordinate sacrum_x: default_value=0 range=(-0.1 0.25) clamped=true
      Coordinate sacrum_y: default_value=0.05 range=(0 0.2) clamped=true
      Coordinate sacrum_z: default_value=0 range=(-0.1 0.1) clamped=true
      PhysicalOffsetFrame ground_offset: socket_parent=/ground translation=(0 0 0) [meters]
      PhysicalOffsetFrame spine_offset: socket_parent=/bodyset/spine translation=(0 0 0)
      SpatialTransform:
        TransformAxis rotation1: coordinates=sacrum_pitch axis=(0 0 1) LinearFunction(coefficients=1 0)
        TransformAxis rotation2: coordinates=sacrum_roll axis=(1 0 0) LinearFunction(coefficients=1 0)
        TransformAxis rotation3: coordinates=sacrum_yaw axis=(0 1 0) LinearFunction(coefficients=1 0)
        TransformAxis translation1: coordinates=sacrum_x axis=(1 0 0) LinearFunction(coefficients=1 0)
        TransformAxis translation2: coordinates=sacrum_y axis=(0 1 0) LinearFunction(coefficients=1 0)
        TransformAxis translation3: coordinates=sacrum_z axis=(0 0 1) LinearFunction(coefficients=1 0)
    CustomJoint sacroiliac_r: socket_parent_frame=spine_offset socket_child_frame=pelvis_r_offset
      Coordinate sacroiliac_r_flx: default_value=0.06457718 range=(-0.02301246 0.1515205) clamped=true locked=true
      PhysicalOffsetFrame spine_offset: socket_parent=/bodyset/spine translation=(0.005 -0.003 0.01)
      PhysicalOffsetFrame pelvis_r_offset: socket_parent=/bodyset/pelvis_r translation=(0 0 0)
      SpatialTransform: axes_held_at_zero=(rotation2 rotation3 translation1 translation2 translation3)
        TransformAxis rotation1: coordinates=sacroiliac_r_flx axis=(0 0 1) LinearFunction(coefficients=1 0)
    CustomJoint hip_r: socket_parent_frame=pelvis_r_offset socket_child_frame=femur_r_offset
      Coordinate hip_r_flx: default_value=0.6981317 range=(-0.8726646 1.22173) clamped=true
      Coordinate hip_r_add: default_value=-0.1745329 range=(-0.8726646 0.3490659) clamped=true
      Coordinate hip_r_int: default_value=0 range=(-0.8726646 0.6981317) clamped=true
      PhysicalOffsetFrame pelvis_r_offset: socket_parent=/bodyset/pelvis_r translation=(0 0 0)
      PhysicalOffsetFrame femur_r_offset: socket_parent=/bodyset/femur_r translation=(0 0 0)
      SpatialTransform: axes_held_at_zero=(translation1 translation2 translation3)
        TransformAxis rotation1: coordinates=hip_r_flx axis=(0 0 1) LinearFunction(coefficients=1 0)
        TransformAxis rotation2: coordinates=hip_r_add axis=(1 0 0) LinearFunction(coefficients=1 0)
        TransformAxis rotation3: coordinates=hip_r_int axis=(0 1 0) LinearFunction(coefficients=1 0)
    CustomJoint knee_r: socket_parent_frame=femur_r_offset socket_child_frame=tibia_r_offset
      Coordinate knee_r_flx: default_value=-2.094395 range=(-2.617994 -0.3490659) clamped=true
      PhysicalOffsetFrame femur_r_offset: socket_parent=/bodyset/femur_r translation=(0 0 0)
      PhysicalOffsetFrame tibia_r_offset: socket_parent=/bodyset/tibia_r translation=(-0.00057 0.0399598 0.0038162)
      SpatialTransform:
        TransformAxis rotation1: coordinates=knee_r_flx axis=(0 0 1) LinearFunction(coefficients=1 0)
        TransformAxis rotation2: coordinates=knee_r_flx axis=(1 0 0)
          SimmSpline: x=(-2.61799 -2.44346 -2.26893 -2.0944 -1.91986 -1.74533 -1.5708 -1.39626 -1.22173 -1.0472 -0.872665 -0.698132 -0.523599 -0.349066)
              y=(-0.0872665 -0.0750492 -0.0645772 -0.0523599 -0.0401426 -0.0296706 -0.0174533 -0.00523599 0.00523599 0.0174533 0.0296706 0.0401426 0.0523599 0.0645772)
        TransformAxis rotation3: coordinates=knee_r_flx axis=(0 1 0) Constant(value=0.261799)
        TransformAxis translation1: coordinates=knee_r_flx axis=(1 0 0)
          SimmSpline: x=(-2.61799 -2.44346 -2.26893 -2.0944 -1.91986 -1.74533 -1.5708 -1.39626 -1.22173 -1.0472 -0.872665 -0.698132 -0.523599 -0.349066)
              y=(-0.00523853 -0.00464648 -0.00404257 -0.00347254 -0.00297965 -0.00259079 -0.00229943 -0.00211001 -0.00199564 -0.00193207 -0.00187048 -0.00177935 -0.00163827 -0.0014134)
        TransformAxis translation2: coordinates=knee_r_flx axis=(0 1 0)
          SimmSpline: x=(-2.61799 -2.44346 -2.26893 -2.0944 -1.91986 -1.74533 -1.5708 -1.39626 -1.22173 -1.0472 -0.872665 -0.698132 -0.523599 -0.349066)
              y=(-0.0341684 -0.0342539 -0.0341856 -0.0339723 -0.0336511 -0.0332785 -0.0328898 -0.0325504 -0.0322825 -0.0321161 -0.0320632 -0.0321105 -0.0322397 -0.0324144)
        TransformAxis translation3: coordinates=knee_r_flx axis=(0 0 1)
          SimmSpline: x=(-2.61799 -2.44346 -2.26893 -2.0944 -1.91986 -1.74533 -1.5708 -1.39626 -1.22173 -1.0472 -0.872665 -0.698132 -0.523599 -0.349066)
              y=(0.00260302 0.00280341 0.00285365 0.00290375 0.00289358 0.00277318 0.00270235 0.00261105 0.0024695 0.00241714 0.0024041 0.0023809 0.00249641 0.00269104)
    CustomJoint ankle_r: socket_parent_frame=tibia_r_offset socket_child_frame=foot_r_offset
      Coordinate ankle_r_flx: default_value=0.8726646 range=(-0.5235988 1.047198) clamped=true
      Coordinate ankle_r_add: default_value=-0.08726646 range=(-0.08726646 0.6108652) clamped=true
      Coordinate ankle_r_int: default_value=0 range=(-0.8726646 0.2617994) clamped=true
      PhysicalOffsetFrame tibia_r_offset: socket_parent=/bodyset/tibia_r translation=(0 0 0)
      PhysicalOffsetFrame foot_r_offset: socket_parent=/bodyset/foot_r translation=(0 0 0)
      SpatialTransform:
        TransformAxis rotation1: coordinates=ankle_r_flx axis=(0 0 1) LinearFunction(coefficients=1 0)
        TransformAxis rotation2: coordinates=ankle_r_add axis=(1 0 0) LinearFunction(coefficients=1 0)
        TransformAxis rotation3: coordinates=ankle_r_int axis=(0 1 0) LinearFunction(coefficients=1 0)
        TransformAxis translation1: coordinates=ankle_r_flx axis=(1 0 0)
          SimmSpline: x=(-0.523599 -0.349066 -0.174533 0 0.174533 0.349066 0.523599 0.698132 0.872665 1.0472)
              y=(0 0 0 0 0 0 0 0 0 0)
        TransformAxis translation2: coordinates=ankle_r_flx axis=(0 1 0)
          SimmSpline: x=(-0.523599 -0.349066 -0.174533 0 0.174533 0.349066 0.523599 0.698132 0.872665 1.0472)
              y=(0 0 0 0 0 0 0 0 0 0)
        TransformAxis translation3: coordinates=ankle_r_flx axis=(0 0 1)
          SimmSpline: x=(-0.523599 -0.349066 -0.174533 0 0.174533 0.349066 0.523599 0.698132 0.872665 1.0472)
              y=(0 0 0 0 0 0 0 0 0 0)
    CustomJoint sacroiliac_l: socket_parent_frame=spine_offset socket_child_frame=pelvis_l_offset
      Coordinate sacroiliac_l_flx: default_value=0.06457718 range=(-0.02301246 0.1515205) clamped=true locked=true
      PhysicalOffsetFrame spine_offset: socket_parent=/bodyset/spine translation=(0.005 -0.003 -0.01)
      PhysicalOffsetFrame pelvis_l_offset: socket_parent=/bodyset/pelvis_l translation=(0 0 0)
      SpatialTransform: axes_held_at_zero=(rotation2 rotation3 translation1 translation2 translation3)
        TransformAxis rotation1: coordinates=sacroiliac_l_flx axis=(0 0 1) LinearFunction(coefficients=1 0)
    CustomJoint hip_l: socket_parent_frame=pelvis_l_offset socket_child_frame=femur_l_offset
      Coordinate hip_l_flx: default_value=0.6981317 range=(-0.8726646 1.22173) clamped=true
      Coordinate hip_l_add: default_value=-0.1745329 range=(-0.8726646 0.3490659) clamped=true
      Coordinate hip_l_int: default_value=0 range=(-0.8726646 0.6981317) clamped=true
      PhysicalOffsetFrame pelvis_l_offset: socket_parent=/bodyset/pelvis_l translation=(0 0 0)
      PhysicalOffsetFrame femur_l_offset: socket_parent=/bodyset/femur_l translation=(0 0 0)
      SpatialTransform: axes_held_at_zero=(translation1 translation2 translation3)
        TransformAxis rotation1: coordinates=hip_l_flx axis=(0 0 1) LinearFunction(coefficients=1 0)
        TransformAxis rotation2: coordinates=hip_l_add axis=(1 0 0) LinearFunction(coefficients=-1 0)
        TransformAxis rotation3: coordinates=hip_l_int axis=(0 1 0) LinearFunction(coefficients=-1 0)
    CustomJoint knee_l: socket_parent_frame=femur_l_offset socket_child_frame=tibia_l_offset
      Coordinate knee_l_flx: default_value=-2.094395 range=(-2.617994 -0.3490659) clamped=true
      PhysicalOffsetFrame femur_l_offset: socket_parent=/bodyset/femur_l translation=(0 0 0)
      PhysicalOffsetFrame tibia_l_offset: socket_parent=/bodyset/tibia_l translation=(-0.00057 0.0399598 -0.0038162)
      SpatialTransform:
        TransformAxis rotation1: coordinates=knee_l_flx axis=(0 0 1) LinearFunction(coefficients=1 0)
        TransformAxis rotation2: coordinates=knee_l_flx axis=(1 0 0)
          SimmSpline: x=(-2.61799 -2.44346 -2.26893 -2.0944 -1.91986 -1.74533 -1.5708 -1.39626 -1.22173 -1.0472 -0.872665 -0.698132 -0.523599 -0.349066)
              y=(0.0872665 0.0750492 0.0645772 0.0523599 0.0401426 0.0296706 0.0174533 0.00523599 -0.00523599 -0.0174533 -0.0296706 -0.0401426 -0.0523599 -0.0645772)
        TransformAxis rotation3: coordinates=knee_l_flx axis=(0 1 0) Constant(value=-0.261799)
        TransformAxis translation1: coordinates=knee_l_flx axis=(1 0 0)
          SimmSpline: x=(-2.61799 -2.44346 -2.26893 -2.0944 -1.91986 -1.74533 -1.5708 -1.39626 -1.22173 -1.0472 -0.872665 -0.698132 -0.523599 -0.349066)
              y=(-0.00523853 -0.00464648 -0.00404257 -0.00347254 -0.00297965 -0.00259079 -0.00229943 -0.00211001 -0.00199564 -0.00193207 -0.00187048 -0.00177935 -0.00163827 -0.0014134)
        TransformAxis translation2: coordinates=knee_l_flx axis=(0 1 0)
          SimmSpline: x=(-2.61799 -2.44346 -2.26893 -2.0944 -1.91986 -1.74533 -1.5708 -1.39626 -1.22173 -1.0472 -0.872665 -0.698132 -0.523599 -0.349066)
              y=(-0.0341684 -0.0342539 -0.0341856 -0.0339723 -0.0336511 -0.0332785 -0.0328898 -0.0325504 -0.0322825 -0.0321161 -0.0320632 -0.0321105 -0.0322397 -0.0324144)
        TransformAxis translation3: coordinates=knee_l_flx axis=(0 0 1)
          SimmSpline: x=(-2.61799 -2.44346 -2.26893 -2.0944 -1.91986 -1.74533 -1.5708 -1.39626 -1.22173 -1.0472 -0.872665 -0.698132 -0.523599 -0.349066)
              y=(-0.00260302 -0.00280341 -0.00285365 -0.00290375 -0.00289358 -0.00277318 -0.00270235 -0.00261105 -0.0024695 -0.00241714 -0.0024041 -0.0023809 -0.00249641 -0.00269104)
    CustomJoint ankle_l: socket_parent_frame=tibia_l_offset socket_child_frame=foot_l_offset
      Coordinate ankle_l_flx: default_value=0.8726646 range=(-0.5235988 1.047198) clamped=true
      Coordinate ankle_l_add: default_value=-0.08726646 range=(-0.08726646 0.6108652) clamped=true
      Coordinate ankle_l_int: default_value=0 range=(-0.8726646 0.2617994) clamped=true
      PhysicalOffsetFrame tibia_l_offset: socket_parent=/bodyset/tibia_l translation=(0 0 0)
      PhysicalOffsetFrame foot_l_offset: socket_parent=/bodyset/foot_l translation=(0 0 0)
      SpatialTransform:
        TransformAxis rotation1: coordinates=ankle_l_flx axis=(0 0 1) LinearFunction(coefficients=1 0)
        TransformAxis rotation2: coordinates=ankle_l_add axis=(1 0 0) LinearFunction(coefficients=-1 0)
        TransformAxis rotation3: coordinates=ankle_l_int axis=(0 1 0) LinearFunction(coefficients=-1 0)
        TransformAxis translation1: coordinates=ankle_l_flx axis=(1 0 0)
          SimmSpline: x=(-0.523599 -0.349066 -0.174533 0 0.174533 0.349066 0.523599 0.698132 0.872665 1.0472)
              y=(0 0 0 0 0 0 0 0 0 0)
        TransformAxis translation2: coordinates=ankle_l_flx axis=(0 1 0)
          SimmSpline: x=(-0.523599 -0.349066 -0.174533 0 0.174533 0.349066 0.523599 0.698132 0.872665 1.0472)
              y=(0 0 0 0 0 0 0 0 0 0)
        TransformAxis translation3: coordinates=ankle_l_flx axis=(0 0 1)
          SimmSpline: x=(-0.523599 -0.349066 -0.174533 0 0.174533 0.349066 0.523599 0.698132 0.872665 1.0472)
              y=(0 0 0 0 0 0 0 0 0 0)
  ForceSet:
    Millard2012EquilibriumMuscle [values shared by the 76 below unless stated]: min_control=0.01 max_control=1
        fiber_damping=0.1 default_activation=0.05 minimum_activation=0.01
      ActiveForceLengthCurve: minimum_value=0
      ForceVelocityCurve: concentric_slope_at_vmax=0 concentric_slope_near_vmax=0.25 isometric_slope=5
          eccentric_slope_at_vmax=0 eccentric_slope_near_vmax=0.15 max_eccentric_velocity_force_multiplier=1.4
      FiberForceLengthCurve
      TendonForceLengthCurve
    Millard2012EquilibriumMuscle R_BFa: max_isometric_force=3.4 optimal_fiber_length=0.0389 tendon_slack_length=0
        pennation_angle_at_optimal=0.00698132 [radians] ignore_tendon_compliance=true
      PathPoint R_BFa_pelvis_r_origin_1: pelvis_r (-0.01217486 0.009246433 -0.005781443)
      PathPoint R_BFa_pelvis_r_via_2: pelvis_r (-0.01228853 0.005084176 -0.001511519)
      PathPoint R_BFa_pelvis_r_via_3: pelvis_r (-0.01233545 0.001285 -0.0001208889)
      PathPoint R_BFa_tibia_r_insertion_4: tibia_r (-0.00297205 0.03250314 0.001356457)
    Millard2012EquilibriumMuscle R_BFp: max_isometric_force=12.5 optimal_fiber_length=0.0369
        tendon_slack_length=0.003014128 pennation_angle_at_optimal=0.127409
      PathPoint R_BFp_pelvis_r_origin_1: pelvis_r (-0.01489817 0.00358085 -0.001990871)
      PathPoint R_BFp_tibia_r_via_2: tibia_r (-0.003347734 0.02705096 0.0005851652)
      PathPoint R_BFp_tibia_r_insertion_3: tibia_r (0.002077828 0.02740987 0.0001304305)
    Millard2012EquilibriumMuscle R_CF: max_isometric_force=2.1 optimal_fiber_length=0.0372 tendon_slack_length=0
        pennation_angle_at_optimal=0 ignore_tendon_compliance=true
      PathPoint R_CF_pelvis_r_origin_1: pelvis_r (-0.007007314 0.009448493 -0.005645201)
      PathPoint R_CF_pelvis_r_via_2: pelvis_r (-0.00647922 0.005203847 -0.002557159)
      PathPoint R_CF_pelvis_r_via_3: pelvis_r (-0.005450917 0.001165429 -0.001087627)
      PathPoint R_CF_femur_r_insertion_4: femur_r (-0.00233532 -0.02783013 -0.0003357203)
    Millard2012EquilibriumMuscle R_STp: max_isometric_force=3.4 optimal_fiber_length=0.0389 tendon_slack_length=0
        pennation_angle_at_optimal=0.00698132 ignore_tendon_compliance=true
      PathPoint R_STp_pelvis_r_origin_1: pelvis_r (-0.01468434 0.002602004 -0.002088289)
      PathPoint R_STp_tibia_r_insertion_2: tibia_r (0.002008279 0.02760577 -0.002090325)
    Millard2012EquilibriumMuscle R_STa: max_isometric_force=12.5 optimal_fiber_length=0.0369
        tendon_slack_length=0.003027258 pennation_angle_at_optimal=0.127409
      PathPoint R_STa_pelvis_r_origin_1: pelvis_r (-0.0135086 0.00858129 -0.004937058)
      PathPoint R_STa_pelvis_r_via_2: pelvis_r (-0.01348732 0.005699432 -0.002594588)
      PathPoint R_STa_pelvis_r_via_3: pelvis_r (-0.01349767 0.003758754 -0.001524656)
      PathPoint R_STa_tibia_r_insertion_4: tibia_r (0.002008279 0.02760577 -0.002090325)
    Millard2012EquilibriumMuscle R_SM: max_isometric_force=10.3 optimal_fiber_length=0.035 tendon_slack_length=0
        pennation_angle_at_optimal=0 ignore_tendon_compliance=true
      PathPoint R_SM_pelvis_r_origin_1: pelvis_r (-0.0147235 -0.0002338422 -0.002797793)
      PathPoint R_SM_tibia_r_insertion_2: tibia_r (0.0005303704 0.03422706 -0.002697255)
    Millard2012EquilibriumMuscle R_QF: max_isometric_force=3 optimal_fiber_length=0.0108
        tendon_slack_length=0.002706987 pennation_angle_at_optimal=0.05061455
      PathPoint R_QF_pelvis_r_origin_1: pelvis_r (-0.01325516 -0.002400281 -0.003546603)
      PathPoint R_QF_femur_r_insertion_2: femur_r (-0.00285983 -0.001243949 0.005186687)
    Millard2012EquilibriumMuscle R_TFL: max_isometric_force=2.9 optimal_fiber_length=0.015
        tendon_slack_length=0.006389408 pennation_angle_at_optimal=0.148353
      PathPoint R_TFL_pelvis_r_origin_1: pelvis_r (0.01545252 0.0007290779 -0.001737707)
      PathPoint R_TFL_femur_r_insertion_2: femur_r (0.001342896 -0.02034841 0.001672282)
    Millard2012EquilibriumMuscle R_GMa: max_isometric_force=9.3 optimal_fiber_length=0.0192 tendon_slack_length=0
        pennation_angle_at_optimal=0.2111848 ignore_tendon_compliance=true
      PathPoint R_GMa_pelvis_r_origin_1: pelvis_r (0.01352632 0.002504598 -0.001282583)
      PathPoint R_GMa_femur_r_insertion_2: femur_r (-0.0006639967 -0.00857737 0.005756443)
    Millard2012EquilibriumMuscle R_GMe: max_isometric_force=18.8 optimal_fiber_length=0.0196 tendon_slack_length=0
        pennation_angle_at_optimal=0.2199115 ignore_tendon_compliance=true
      PathPoint R_GMe_pelvis_r_origin_1: pelvis_r (0.02457119 0.002527268 0.001783215)
      PathPoint R_GMe_femur_r_insertion_2: femur_r (0.001691065 0.001071407 0.005768603)
    Millard2012EquilibriumMuscle R_GMi: max_isometric_force=7.4 optimal_fiber_length=0.0116
        tendon_slack_length=0.0105582 pennation_angle_at_optimal=0.286234
      PathPoint R_GMi_pelvis_r_origin_1: pelvis_r (0.0221635 0.001049392 -0.0008341644)
      PathPoint R_GMi_femur_r_insertion_2: femur_r (0.001698129 4.489584e-5 0.005068433)
    Millard2012EquilibriumMuscle R_Pir: max_isometric_force=11.2 optimal_fiber_length=0.0106
        tendon_slack_length=0.002045296 pennation_angle_at_optimal=0.286234
      PathPoint R_Pir_pelvis_r_origin_1: pelvis_r (0.01211891 0.003236058 -0.0002566693)
      PathPoint R_Pir_femur_r_insertion_2: femur_r (0.00207348 0.001713699 0.005041368)
    Millard2012EquilibriumMuscle R_GP: max_isometric_force=2.4 optimal_fiber_length=0.0287
        tendon_slack_length=0.006445401 pennation_angle_at_optimal=0.05759587
      PathPoint R_GP_pelvis_r_origin_1: pelvis_r (-0.01396823 -0.004413517 -0.005234751)
      PathPoint R_GP_tibia_r_insertion_2: tibia_r (0.001998242 0.02843249 -0.002814683)
    Millard2012EquilibriumMuscle R_GA: max_isometric_force=1.6 optimal_fiber_length=0.0297
        tendon_slack_length=0.004216573 pennation_angle_at_optimal=0
      PathPoint R_GA_pelvis_r_origin_1: pelvis_r (-0.01344437 -0.008250392 -0.008581536)
      PathPoint R_GA_tibia_r_insertion_2: tibia_r (0.001552293 0.03082793 -0.002816602)
    Millard2012EquilibriumMuscle R_AL: max_isometric_force=1 optimal_fiber_length=0.0163 tendon_slack_length=0
        pennation_angle_at_optimal=0.1692969 ignore_tendon_compliance=true
      PathPoint R_AL_pelvis_r_origin_1: pelvis_r (-0.004591752 -0.005429107 -0.005844076)
      PathPoint R_AL_femur_r_insertion_2: femur_r (-0.002002732 -0.01517962 0.001669688)
    Millard2012EquilibriumMuscle R_AM: max_isometric_force=3 optimal_fiber_length=0.0279
        tendon_slack_length=0.004359022 pennation_angle_at_optimal=0
      PathPoint R_AM_pelvis_r_origin_1: pelvis_r (-0.01218539 -0.008296892 -0.008598131)
      PathPoint R_AM_tibia_r_insertion_2: tibia_r (0.0009030981 0.0324771 -0.002738507)
    Millard2012EquilibriumMuscle R_AB: max_isometric_force=12.2 optimal_fiber_length=0.0224 tendon_slack_length=0
        pennation_angle_at_optimal=0.2251475 ignore_tendon_compliance=true
      PathPoint R_AB_pelvis_r_origin_1: pelvis_r (-0.01160817 -0.007294874 -0.007929915)
      PathPoint R_AB_femur_r_insertion_2: femur_r (-0.001924809 -0.01719268 0.002101402)
    Millard2012EquilibriumMuscle R_Pec: max_isometric_force=3.7 optimal_fiber_length=0.0081
        tendon_slack_length=0.01072049 pennation_angle_at_optimal=0.09773844
      PathPoint R_Pec_pelvis_r_origin_1: pelvis_r (-0.01482111 -0.007718453 -0.007682633)
      PathPoint R_Pec_femur_r_insertion_2: femur_r (-0.00287201 -0.01031142 0.003813552)
    Millard2012EquilibriumMuscle R_IP: max_isometric_force=16.3 optimal_fiber_length=0.017
        tendon_slack_length=0.0002420792 pennation_angle_at_optimal=0.1500983
      PathPoint R_IP_pelvis_r_origin_1: pelvis_r (0.02031596 -0.001190607 -0.002422879)
      PathPoint R_IP_femur_r_insertion_2: femur_r (-0.0005974748 -0.004095867 0.00135809)
    Millard2012EquilibriumMuscle R_OE: max_isometric_force=7.2 optimal_fiber_length=0.0058
        tendon_slack_length=0.003461627 pennation_angle_at_optimal=0.2984513
      PathPoint R_OE_pelvis_r_origin_1: pelvis_r (-0.009026691 -0.001536456 -0.003252043)
      PathPoint R_OE_femur_r_insertion_2: femur_r (-0.002336445 -0.001215433 0.001756772)
    Millard2012EquilibriumMuscle R_OI: max_isometric_force=3 optimal_fiber_length=0.0044
        tendon_slack_length=0.008174966 pennation_angle_at_optimal=0.1221731
      PathPoint R_OI_pelvis_r_origin_1: pelvis_r (-0.01271471 -0.000119353 -0.002186578)
      PathPoint R_OI_femur_r_via_2: femur_r (-0.001071509 0.0001720278 0.003154296)
    Millard2012EquilibriumMuscle R_GS: max_isometric_force=0.4 optimal_fiber_length=0.006
        tendon_slack_length=0.01229147 pennation_angle_at_optimal=0.1884956
      PathPoint R_GS_pelvis_r_origin_1: pelvis_r (0.01784562 0.001547772 -0.001350231)
      PathPoint R_GS_femur_r_insertion_2: femur_r (-0.0001674421 -0.006034652 0.002077799)
    Millard2012EquilibriumMuscle R_GI: max_isometric_force=2.9 optimal_fiber_length=0.0041
        tendon_slack_length=0.008281332 pennation_angle_at_optimal=0.3298672
      PathPoint R_GI_pelvis_r_origin_1: pelvis_r (-0.01141022 0.005429278 -0.002706962)
      PathPoint R_GI_femur_r_insertion_2: femur_r (-0.00216784 -9.465281e-5 0.00200781)
    Millard2012EquilibriumMuscle R_RF: max_isometric_force=16.5 optimal_fiber_length=0.0119
        tendon_slack_length=0.02336566 pennation_angle_at_optimal=0.1972222
      PathPoint R_RF_pelvis_r_origin_1: pelvis_r (0.004599624 -0.0004586442 0.001049201)
      PathPoint R_RF_femur_r_via_2: femur_r (0.00303536 -0.03171479 -0.001465231)
      PathPoint R_RF_tibia_r_via_3: tibia_r (0.003706144 0.03985708 -0.001615632)
    Millard2012EquilibriumMuscle R_VL: max_isometric_force=14.9 optimal_fiber_length=0.0194
        tendon_slack_length=0.01962915 pennation_angle_at_optimal=0.2548181
      PathPoint R_VL_femur_r_origin_1: femur_r (-0.000569833 -0.00364222 0.006674743)
      PathPoint R_VL_femur_r_via_2: femur_r (0.0001285251 -0.03193823 0.001976869)
      PathPoint R_VL_tibia_r_via_3: tibia_r (0.002996267 0.04022664 0.0008880152)
      PathPoint R_VL_tibia_r_insertion_4: tibia_r (0.004952631 0.0355954 -0.0004079236)
    Millard2012EquilibriumMuscle R_VI: max_isometric_force=2.6 optimal_fiber_length=0.0113
        tendon_slack_length=0.02290389 pennation_angle_at_optimal=0.2495821
      PathPoint R_VI_femur_r_origin_1: femur_r (7.125413e-5 -0.01007851 0.004802875)
      PathPoint R_VI_femur_r_via_2: femur_r (0.002097793 -0.03284573 0.001212744)
      PathPoint R_VI_tibia_r_via_3: tibia_r (0.003254725 0.03991579 -0.0003762127)
      PathPoint R_VI_tibia_r_insertion_4: tibia_r (0.004952631 0.0355954 -0.0004079236)
    Millard2012EquilibriumMuscle R_VM: max_isometric_force=6.1 optimal_fiber_length=0.0153
        tendon_slack_length=0.02302631 pennation_angle_at_optimal=0.2024582
      PathPoint R_VM_femur_r_origin_1: femur_r (-0.0005446529 -0.005010672 0.001470708)
      PathPoint R_VM_femur_r_via_2: femur_r (0.001861536 -0.03174129 -0.003486555)
      PathPoint R_VM_tibia_r_via_3: tibia_r (0.003869094 0.03970912 -0.003553653)
      PathPoint R_VM_tibia_r_insertion_4: tibia_r (0.004952631 0.0355954 -0.0004079236)
    Millard2012EquilibriumMuscle R_MG: max_isometric_force=11.7 optimal_fiber_length=0.0143
        tendon_slack_length=0.03063076 pennation_angle_at_optimal=0.2373648
      PathPoint R_MG_femur_r_origin_1: femur_r (-0.0003565036 -0.03023269 -0.004372377)
      PathPoint R_MG_tibia_r_via_2: tibia_r (-0.0006102846 0.03447116 -0.004537933)
      PathPoint R_MG_tibia_r_via_3: tibia_r (-0.001012959 0.001807074 -0.001523894)
      PathPoint R_MG_foot_r_via_4: foot_r (-0.004364486 -0.0004150186 -0.0006108987)
      PathPoint R_MG_foot_r_insertion_5: foot_r (-0.004257096 -0.001428099 -8.032695e-5)
    Millard2012EquilibriumMuscle R_LG: max_isometric_force=18.3 optimal_fiber_length=0.0123
        tendon_slack_length=0.0331231 pennation_angle_at_optimal=0.1675516
      PathPoint R_LG_femur_r_origin_1: femur_r (-0.0008307283 -0.02965907 0.003068695)
      PathPoint R_LG_tibia_r_via_2: tibia_r (-0.003411416 0.03518768 0.002759405)
      PathPoint R_LG_tibia_r_via_3: tibia_r (-0.001332635 0.002549476 0.001297335)
      PathPoint R_LG_foot_r_via_4: foot_r (-0.004894254 -0.0002894355 0.0007861581)
      PathPoint R_LG_foot_r_insertion_5: foot_r (-0.004235756 -0.001270284 0.000886939)
    Millard2012EquilibriumMuscle R_Pla: max_isometric_force=5.6 optimal_fiber_length=0.0123
        tendon_slack_length=0.03289848 pennation_angle_at_optimal=0.1972222
      PathPoint R_Pla_femur_r_origin_1: femur_r (-0.0009476944 -0.02881597 0.002452695)
      PathPoint R_Pla_tibia_r_via_2: tibia_r (-0.003593991 0.0343827 0.002053964)
      PathPoint R_Pla_tibia_r_via_3: tibia_r (-0.00131222 0.002540911 0.0008953731)
      PathPoint R_Pla_foot_r_via_4: foot_r (-0.004887494 -0.0003441089 0.0003894728)
      PathPoint R_Pla_foot_r_insertion_5: foot_r (-0.004601932 -0.00146048 0.0003701435)
    Millard2012EquilibriumMuscle R_Sol: max_isometric_force=1.4 optimal_fiber_length=0.0156
        tendon_slack_length=0.02201685 pennation_angle_at_optimal=0.07679449
      PathPoint R_Sol_tibia_r_origin_1: tibia_r (-0.003794695 0.03442722 0.0003698398)
      PathPoint R_Sol_tibia_r_via_2: tibia_r (-0.001281575 0.002528053 0.000291988)
      PathPoint R_Sol_foot_r_via_3: foot_r (-0.004855123 -0.0003923701 7.707983e-5)
      PathPoint R_Sol_foot_r_insertion_4: foot_r (-0.004585194 -0.001473879 4.84638e-5)
    Millard2012EquilibriumMuscle R_TA: max_isometric_force=8.6 optimal_fiber_length=0.0149
        tendon_slack_length=0.02339519 pennation_angle_at_optimal=0.164061
      PathPoint R_TA_tibia_r_origin_1: tibia_r (0.003815336 0.03503993 -0.002032018)
      PathPoint R_TA_tibia_r_via_2: tibia_r (0.005441972 0.0254747 -0.001578988)
      PathPoint R_TA_tibia_r_via_3: tibia_r (0.001865014 0.004010844 -0.000692755)
      PathPoint R_TA_foot_r_via_4: foot_r (0.001996198 -0.001137769 -0.0008115393)
      PathPoint R_TA_foot_r_insertion_5: foot_r (0.004202379 -0.00291829 -0.001255735)
    Millard2012EquilibriumMuscle R_EDL: max_isometric_force=2.2 optimal_fiber_length=0.0134
        tendon_slack_length=0.04185674 pennation_angle_at_optimal=0.1850049
      PathPoint R_EDL_femur_r_origin_1: femur_r (-0.001157646 -0.03136773 0.002336906)
      PathPoint R_EDL_tibia_r_via_2: tibia_r (-0.0003336262 0.0375621 0.002694107)
      PathPoint R_EDL_tibia_r_via_3: tibia_r (0.001635858 0.003863152 0.001117945)
      PathPoint R_EDL_foot_r_via_4: foot_r (0.001574123 -0.001089779 0.0008694175)
      PathPoint R_EDL_foot_r_insertion_5: foot_r (0.01339039 -0.005855328 0.001507169)
    Millard2012EquilibriumMuscle R_TP: max_isometric_force=3.6 optimal_fiber_length=0.0053
        tendon_slack_length=0.03711043 pennation_angle_at_optimal=0.09948377
      PathPoint R_TP_tibia_r_origin_1: tibia_r (-0.001879778 0.0326057 -0.00148873)
      PathPoint R_TP_tibia_r_via_2: tibia_r (-0.001110503 0.001959859 -0.0009091664)
      PathPoint R_TP_foot_r_via_3: foot_r (-0.00501409 -0.0004841281 -0.0004970513)
      PathPoint R_TP_foot_r_via_4: foot_r (-0.002800895 -0.002098686 -0.0002505244)
      PathPoint R_TP_foot_r_insertion_5: foot_r (0.001301818 -0.003321758 -0.001255879)
    Millard2012EquilibriumMuscle R_FDL: max_isometric_force=11.1 optimal_fiber_length=0.0088
        tendon_slack_length=0.04666999 pennation_angle_at_optimal=0.1937316
      PathPoint R_FDL_tibia_r_origin_1: tibia_r (-0.002141732 0.0344002 -0.000896069)
      PathPoint R_FDL_tibia_r_via_2: tibia_r (-0.000986225 0.002410946 -0.0005411851)
      PathPoint R_FDL_foot_r_via_3: foot_r (-0.00490061 -0.0004281598 -0.0002783462)
      PathPoint R_FDL_foot_r_via_4: foot_r (-0.00301935 -0.001811786 -4.9272e-5)
      PathPoint R_FDL_foot_r_via_5: foot_r (-0.0004664771 -0.003244991 -0.0002752915)
      PathPoint R_FDL_foot_r_insertion_6: foot_r (0.01208848 -0.007452594 0.00167985)
    Millard2012EquilibriumMuscle R_FHL: max_isometric_force=0.2 optimal_fiber_length=0.0054
        tendon_slack_length=0.04736539 pennation_angle_at_optimal=0.02268928
      PathPoint R_FHL_tibia_r_origin_1: tibia_r (-0.0006847909 0.03234256 -0.001422431)
      PathPoint R_FHL_tibia_r_via_2: tibia_r (-0.001089913 0.002251627 -0.001267011)
      PathPoint R_FHL_foot_r_via_3: foot_r (-0.004655021 -0.0005899981 -0.0006006401)
      PathPoint R_FHL_foot_r_via_4: foot_r (-0.002766882 -0.002069895 -0.0006719501)
      PathPoint R_FHL_foot_r_via_5: foot_r (0.0002094102 -0.003386334 -0.0004709902)
      PathPoint R_FHL_foot_r_insertion_6: foot_r (0.01216095 -0.00740549 -0.0009222273)
    Millard2012EquilibriumMuscle R_Per: max_isometric_force=7.7 optimal_fiber_length=0.0088
        tendon_slack_length=0.0373448 pennation_angle_at_optimal=0.1099557
      PathPoint R_Per_tibia_r_origin_1: tibia_r (-0.002240942 0.03560281 0.002786968)
      PathPoint R_Per_tibia_r_via_2: tibia_r (-0.001351121 0.002557232 0.00166131)
      PathPoint R_Per_foot_r_via_3: foot_r (-0.00452309 -0.0003156808 0.001157108)
      PathPoint R_Per_foot_r_via_4: foot_r (-0.00247989 -0.0017431 0.001433977)
      PathPoint R_Per_foot_r_via_5: foot_r (-0.0002705156 -0.00299293 0.00176084)
      PathPoint R_Per_foot_r_insertion_6: foot_r (0.00242893 -0.004097917 0.0007277185)
    Millard2012EquilibriumMuscle R_Pop: max_isometric_force=2.9 optimal_fiber_length=0.0063
        tendon_slack_length=0.0129852 pennation_angle_at_optimal=0.2426008
      PathPoint R_Pop_femur_r_origin_1: femur_r (-0.0003347563 -0.03068599 0.002770484)
      PathPoint R_Pop_femur_r_via_2: femur_r (-0.002543801 -0.03000804 0.003141046)
      PathPoint R_Pop_tibia_r_via_3: tibia_r (-0.003242223 0.03493462 -0.0004768734)
      PathPoint R_Pop_tibia_r_insertion_4: tibia_r (0.001874304 0.02569243 -0.002199908)
    Millard2012EquilibriumMuscle L_BFa: max_isometric_force=3.4 optimal_fiber_length=0.0389 tendon_slack_length=0
        pennation_angle_at_optimal=0.00698132 ignore_tendon_compliance=true
      PathPoint L_BFa_pelvis_l_origin_1: pelvis_l (-0.01217486 0.009246433 0.005781443)
      PathPoint L_BFa_pelvis_l_via_2: pelvis_l (-0.01228853 0.005084176 0.001511519)
      PathPoint L_BFa_pelvis_l_via_3: pelvis_l (-0.01233545 0.001285 0.0001208889)
      PathPoint L_BFa_tibia_l_insertion_4: tibia_l (-0.00297205 0.03250314 -0.001356457)
    Millard2012EquilibriumMuscle L_BFp: max_isometric_force=12.5 optimal_fiber_length=0.0369
        tendon_slack_length=0.003014128 pennation_angle_at_optimal=0.127409
      PathPoint L_BFp_pelvis_l_origin_1: pelvis_l (-0.01489817 0.00358085 0.001990871)
      PathPoint L_BFp_tibia_l_via_2: tibia_l (-0.003347734 0.02705096 -0.0005851652)
      PathPoint L_BFp_tibia_l_insertion_3: tibia_l (0.002077828 0.02740987 -0.0001304305)
    Millard2012EquilibriumMuscle L_CF: max_isometric_force=2.1 optimal_fiber_length=0.0372 tendon_slack_length=0
        pennation_angle_at_optimal=0 ignore_tendon_compliance=true
      PathPoint L_CF_pelvis_l_origin_1: pelvis_l (-0.007007314 0.009448493 0.005645201)
      PathPoint L_CF_pelvis_l_via_2: pelvis_l (-0.00647922 0.005203847 0.002557159)
      PathPoint L_CF_pelvis_l_via_3: pelvis_l (-0.005450917 0.001165429 0.001087627)
      PathPoint L_CF_femur_l_insertion_4: femur_l (-0.00233532 -0.02783013 0.0003357203)
    Millard2012EquilibriumMuscle L_STp: max_isometric_force=3.4 optimal_fiber_length=0.0389 tendon_slack_length=0
        pennation_angle_at_optimal=0.00698132 ignore_tendon_compliance=true
      PathPoint L_STp_pelvis_l_origin_1: pelvis_l (-0.01468434 0.002602004 0.002088289)
      PathPoint L_STp_tibia_l_insertion_2: tibia_l (0.002008279 0.02760577 0.002090325)
    Millard2012EquilibriumMuscle L_STa: max_isometric_force=12.5 optimal_fiber_length=0.0369
        tendon_slack_length=0.003027258 pennation_angle_at_optimal=0.127409
      PathPoint L_STa_pelvis_l_origin_1: pelvis_l (-0.0135086 0.00858129 0.004937058)
      PathPoint L_STa_pelvis_l_via_2: pelvis_l (-0.01348732 0.005699432 0.002594588)
      PathPoint L_STa_pelvis_l_via_3: pelvis_l (-0.01349767 0.003758754 0.001524656)
      PathPoint L_STa_tibia_l_insertion_4: tibia_l (0.002008279 0.02760577 0.002090325)
    Millard2012EquilibriumMuscle L_SM: max_isometric_force=10.3 optimal_fiber_length=0.035 tendon_slack_length=0
        pennation_angle_at_optimal=0 ignore_tendon_compliance=true
      PathPoint L_SM_pelvis_l_origin_1: pelvis_l (-0.0147235 -0.0002338422 0.002797793)
      PathPoint L_SM_tibia_l_insertion_2: tibia_l (0.0005303704 0.03422706 0.002697255)
    Millard2012EquilibriumMuscle L_QF: max_isometric_force=3 optimal_fiber_length=0.0108
        tendon_slack_length=0.002706987 pennation_angle_at_optimal=0.05061455
      PathPoint L_QF_pelvis_l_origin_1: pelvis_l (-0.01325516 -0.002400281 0.003546603)
      PathPoint L_QF_femur_l_insertion_2: femur_l (-0.00285983 -0.001243949 -0.005186687)
    Millard2012EquilibriumMuscle L_TFL: max_isometric_force=2.9 optimal_fiber_length=0.015
        tendon_slack_length=0.006389408 pennation_angle_at_optimal=0.148353
      PathPoint L_TFL_pelvis_l_origin_1: pelvis_l (0.01545252 0.0007290779 0.001737707)
      PathPoint L_TFL_femur_l_insertion_2: femur_l (0.001342896 -0.02034841 -0.001672282)
    Millard2012EquilibriumMuscle L_GMa: max_isometric_force=9.3 optimal_fiber_length=0.0192 tendon_slack_length=0
        pennation_angle_at_optimal=0.2111848 ignore_tendon_compliance=true
      PathPoint L_GMa_pelvis_l_origin_1: pelvis_l (0.01352632 0.002504598 0.001282583)
      PathPoint L_GMa_femur_l_insertion_2: femur_l (-0.0006639967 -0.00857737 -0.005756443)
    Millard2012EquilibriumMuscle L_GMe: max_isometric_force=18.8 optimal_fiber_length=0.0196 tendon_slack_length=0
        pennation_angle_at_optimal=0.2199115 ignore_tendon_compliance=true
      PathPoint L_GMe_pelvis_l_origin_1: pelvis_l (0.02457119 0.002527268 -0.001783215)
      PathPoint L_GMe_femur_l_insertion_2: femur_l (0.001691065 0.001071407 -0.005768603)
    Millard2012EquilibriumMuscle L_GMi: max_isometric_force=7.4 optimal_fiber_length=0.0116
        tendon_slack_length=0.0105582 pennation_angle_at_optimal=0.286234
      PathPoint L_GMi_pelvis_l_origin_1: pelvis_l (0.0221635 0.001049392 0.0008341644)
      PathPoint L_GMi_femur_l_insertion_2: femur_l (0.001698129 4.489584e-5 -0.005068433)
    Millard2012EquilibriumMuscle L_Pir: max_isometric_force=11.2 optimal_fiber_length=0.0106
        tendon_slack_length=0.002045296 pennation_angle_at_optimal=0.286234
      PathPoint L_Pir_pelvis_l_origin_1: pelvis_l (0.01211891 0.003236058 0.0002566693)
      PathPoint L_Pir_femur_l_insertion_2: femur_l (0.00207348 0.001713699 -0.005041368)
    Millard2012EquilibriumMuscle L_GP: max_isometric_force=2.4 optimal_fiber_length=0.0287
        tendon_slack_length=0.006445401 pennation_angle_at_optimal=0.05759587
      PathPoint L_GP_pelvis_l_origin_1: pelvis_l (-0.01396823 -0.004413517 0.005234751)
      PathPoint L_GP_tibia_l_insertion_2: tibia_l (0.001998242 0.02843249 0.002814683)
    Millard2012EquilibriumMuscle L_GA: max_isometric_force=1.6 optimal_fiber_length=0.0297
        tendon_slack_length=0.004216573 pennation_angle_at_optimal=0
      PathPoint L_GA_pelvis_l_origin_1: pelvis_l (-0.01344437 -0.008250392 0.008581536)
      PathPoint L_GA_tibia_l_insertion_2: tibia_l (0.001552293 0.03082793 0.002816602)
    Millard2012EquilibriumMuscle L_AL: max_isometric_force=1 optimal_fiber_length=0.0163 tendon_slack_length=0
        pennation_angle_at_optimal=0.1692969 ignore_tendon_compliance=true
      PathPoint L_AL_pelvis_l_origin_1: pelvis_l (-0.004591752 -0.005429107 0.005844076)
      PathPoint L_AL_femur_l_insertion_2: femur_l (-0.002002732 -0.01517962 -0.001669688)
    Millard2012EquilibriumMuscle L_AM: max_isometric_force=3 optimal_fiber_length=0.0279
        tendon_slack_length=0.004359022 pennation_angle_at_optimal=0
      PathPoint L_AM_pelvis_l_origin_1: pelvis_l (-0.01218539 -0.008296892 0.008598131)
      PathPoint L_AM_tibia_l_insertion_2: tibia_l (0.0009030981 0.0324771 0.002738507)
    Millard2012EquilibriumMuscle L_AB: max_isometric_force=12.2 optimal_fiber_length=0.0224 tendon_slack_length=0
        pennation_angle_at_optimal=0.2251475 ignore_tendon_compliance=true
      PathPoint L_AB_pelvis_l_origin_1: pelvis_l (-0.01160817 -0.007294874 0.007929915)
      PathPoint L_AB_femur_l_insertion_2: femur_l (-0.001924809 -0.01719268 -0.002101402)
    Millard2012EquilibriumMuscle L_Pec: max_isometric_force=3.7 optimal_fiber_length=0.0081
        tendon_slack_length=0.01072049 pennation_angle_at_optimal=0.09773844
      PathPoint L_Pec_pelvis_l_origin_1: pelvis_l (-0.01482111 -0.007718453 0.007682633)
      PathPoint L_Pec_femur_l_insertion_2: femur_l (-0.00287201 -0.01031142 -0.003813552)
    Millard2012EquilibriumMuscle L_IP: max_isometric_force=16.3 optimal_fiber_length=0.017
        tendon_slack_length=0.0002420792 pennation_angle_at_optimal=0.1500983
      PathPoint L_IP_pelvis_l_origin_1: pelvis_l (0.02031596 -0.001190607 0.002422879)
      PathPoint L_IP_femur_l_insertion_2: femur_l (-0.0005974748 -0.004095867 -0.00135809)
    Millard2012EquilibriumMuscle L_OE: max_isometric_force=7.2 optimal_fiber_length=0.0058
        tendon_slack_length=0.003461627 pennation_angle_at_optimal=0.2984513
      PathPoint L_OE_pelvis_l_origin_1: pelvis_l (-0.009026691 -0.001536456 0.003252043)
      PathPoint L_OE_femur_l_insertion_2: femur_l (-0.002336445 -0.001215433 -0.001756772)
    Millard2012EquilibriumMuscle L_OI: max_isometric_force=3 optimal_fiber_length=0.0044
        tendon_slack_length=0.008174966 pennation_angle_at_optimal=0.1221731
      PathPoint L_OI_pelvis_l_origin_1: pelvis_l (-0.01271471 -0.000119353 0.002186578)
      PathPoint L_OI_femur_l_via_2: femur_l (-0.001071509 0.0001720278 -0.003154296)
    Millard2012EquilibriumMuscle L_GS: max_isometric_force=0.4 optimal_fiber_length=0.006
        tendon_slack_length=0.01229147 pennation_angle_at_optimal=0.1884956
      PathPoint L_GS_pelvis_l_origin_1: pelvis_l (0.01784562 0.001547772 0.001350231)
      PathPoint L_GS_femur_l_insertion_2: femur_l (-0.0001674421 -0.006034652 -0.002077799)
    Millard2012EquilibriumMuscle L_GI: max_isometric_force=2.9 optimal_fiber_length=0.0041
        tendon_slack_length=0.008281332 pennation_angle_at_optimal=0.3298672
      PathPoint L_GI_pelvis_l_origin_1: pelvis_l (-0.01141022 0.005429278 0.002706962)
      PathPoint L_GI_femur_l_insertion_2: femur_l (-0.00216784 -9.465281e-5 -0.00200781)
    Millard2012EquilibriumMuscle L_RF: max_isometric_force=16.5 optimal_fiber_length=0.0119
        tendon_slack_length=0.02336566 pennation_angle_at_optimal=0.1972222
      PathPoint L_RF_pelvis_l_origin_1: pelvis_l (0.004599624 -0.0004586442 -0.001049201)
      PathPoint L_RF_femur_l_via_2: femur_l (0.00303536 -0.03171479 0.001465231)
      PathPoint L_RF_tibia_l_via_3: tibia_l (0.003706144 0.03985708 0.001615632)
    Millard2012EquilibriumMuscle L_VL: max_isometric_force=14.9 optimal_fiber_length=0.0194
        tendon_slack_length=0.01962915 pennation_angle_at_optimal=0.2548181
      PathPoint L_VL_femur_l_origin_1: femur_l (-0.000569833 -0.00364222 -0.006674743)
      PathPoint L_VL_femur_l_via_2: femur_l (0.0001285251 -0.03193823 -0.001976869)
      PathPoint L_VL_tibia_l_via_3: tibia_l (0.002996267 0.04022664 -0.0008880152)
      PathPoint L_VL_tibia_l_insertion_4: tibia_l (0.004952631 0.0355954 0.0004079236)
    Millard2012EquilibriumMuscle L_VI: max_isometric_force=2.6 optimal_fiber_length=0.0113
        tendon_slack_length=0.02290389 pennation_angle_at_optimal=0.2495821
      PathPoint L_VI_femur_l_origin_1: femur_l (7.125413e-5 -0.01007851 -0.004802875)
      PathPoint L_VI_femur_l_via_2: femur_l (0.002097793 -0.03284573 -0.001212744)
      PathPoint L_VI_tibia_l_via_3: tibia_l (0.003254725 0.03991579 0.0003762127)
      PathPoint L_VI_tibia_l_insertion_4: tibia_l (0.004952631 0.0355954 0.0004079236)
    Millard2012EquilibriumMuscle L_VM: max_isometric_force=6.1 optimal_fiber_length=0.0153
        tendon_slack_length=0.02302631 pennation_angle_at_optimal=0.2024582
      PathPoint L_VM_femur_l_origin_1: femur_l (-0.0005446529 -0.005010672 -0.001470708)
      PathPoint L_VM_femur_l_via_2: femur_l (0.001861536 -0.03174129 0.003486555)
      PathPoint L_VM_tibia_l_via_3: tibia_l (0.003869094 0.03970912 0.003553653)
      PathPoint L_VM_tibia_l_insertion_4: tibia_l (0.004952631 0.0355954 0.0004079236)
    Millard2012EquilibriumMuscle L_MG: max_isometric_force=11.7 optimal_fiber_length=0.0143
        tendon_slack_length=0.03063076 pennation_angle_at_optimal=0.2373648
      PathPoint L_MG_femur_l_origin_1: femur_l (-0.0003565036 -0.03023269 0.004372377)
      PathPoint L_MG_tibia_l_via_2: tibia_l (-0.0006102846 0.03447116 0.004537933)
      PathPoint L_MG_tibia_l_via_3: tibia_l (-0.001012959 0.001807074 0.001523894)
      PathPoint L_MG_foot_l_via_4: foot_l (-0.004364486 -0.0004150186 0.0006108987)
      PathPoint L_MG_foot_l_insertion_5: foot_l (-0.004257096 -0.001428099 8.032695e-5)
    Millard2012EquilibriumMuscle L_LG: max_isometric_force=18.3 optimal_fiber_length=0.0123
        tendon_slack_length=0.0331231 pennation_angle_at_optimal=0.1675516
      PathPoint L_LG_femur_l_origin_1: femur_l (-0.0008307283 -0.02965907 -0.003068695)
      PathPoint L_LG_tibia_l_via_2: tibia_l (-0.003411416 0.03518768 -0.002759405)
      PathPoint L_LG_tibia_l_via_3: tibia_l (-0.001332635 0.002549476 -0.001297335)
      PathPoint L_LG_foot_l_via_4: foot_l (-0.004894254 -0.0002894355 -0.0007861581)
      PathPoint L_LG_foot_l_insertion_5: foot_l (-0.004235756 -0.001270284 -0.000886939)
    Millard2012EquilibriumMuscle L_Pla: max_isometric_force=5.6 optimal_fiber_length=0.0123
        tendon_slack_length=0.03289848 pennation_angle_at_optimal=0.1972222
      PathPoint L_Pla_femur_l_origin_1: femur_l (-0.0009476944 -0.02881597 -0.002452695)
      PathPoint L_Pla_tibia_l_via_2: tibia_l (-0.003593991 0.0343827 -0.002053964)
      PathPoint L_Pla_tibia_l_via_3: tibia_l (-0.00131222 0.002540911 -0.0008953731)
      PathPoint L_Pla_foot_l_via_4: foot_l (-0.004887494 -0.0003441089 -0.0003894728)
      PathPoint L_Pla_foot_l_insertion_5: foot_l (-0.004601932 -0.00146048 -0.0003701435)
    Millard2012EquilibriumMuscle L_Sol: max_isometric_force=1.4 optimal_fiber_length=0.0156
        tendon_slack_length=0.02201685 pennation_angle_at_optimal=0.07679449
      PathPoint L_Sol_tibia_l_origin_1: tibia_l (-0.003794695 0.03442722 -0.0003698398)
      PathPoint L_Sol_tibia_l_via_2: tibia_l (-0.001281575 0.002528053 -0.000291988)
      PathPoint L_Sol_foot_l_via_3: foot_l (-0.004855123 -0.0003923701 -7.707983e-5)
      PathPoint L_Sol_foot_l_insertion_4: foot_l (-0.004585194 -0.001473879 -4.84638e-5)
    Millard2012EquilibriumMuscle L_TA: max_isometric_force=8.6 optimal_fiber_length=0.0149
        tendon_slack_length=0.02339519 pennation_angle_at_optimal=0.164061
      PathPoint L_TA_tibia_l_origin_1: tibia_l (0.003815336 0.03503993 0.002032018)
      PathPoint L_TA_tibia_l_via_2: tibia_l (0.005441972 0.0254747 0.001578988)
      PathPoint L_TA_tibia_l_via_3: tibia_l (0.001865014 0.004010844 0.000692755)
      PathPoint L_TA_foot_l_via_4: foot_l (0.001996198 -0.001137769 0.0008115393)
      PathPoint L_TA_foot_l_insertion_5: foot_l (0.004202379 -0.00291829 0.001255735)
    Millard2012EquilibriumMuscle L_EDL: max_isometric_force=2.2 optimal_fiber_length=0.0134
        tendon_slack_length=0.04185674 pennation_angle_at_optimal=0.1850049
      PathPoint L_EDL_femur_l_origin_1: femur_l (-0.001157646 -0.03136773 -0.002336906)
      PathPoint L_EDL_tibia_l_via_2: tibia_l (-0.0003336262 0.0375621 -0.002694107)
      PathPoint L_EDL_tibia_l_via_3: tibia_l (0.001635858 0.003863152 -0.001117945)
      PathPoint L_EDL_foot_l_via_4: foot_l (0.001574123 -0.001089779 -0.0008694175)
      PathPoint L_EDL_foot_l_insertion_5: foot_l (0.01339039 -0.005855328 -0.001507169)
    Millard2012EquilibriumMuscle L_TP: max_isometric_force=3.6 optimal_fiber_length=0.0053
        tendon_slack_length=0.03711043 pennation_angle_at_optimal=0.09948377
      PathPoint L_TP_tibia_l_origin_1: tibia_l (-0.001879778 0.0326057 0.00148873)
      PathPoint L_TP_tibia_l_via_2: tibia_l (-0.001110503 0.001959859 0.0009091664)
      PathPoint L_TP_foot_l_via_3: foot_l (-0.00501409 -0.0004841281 0.0004970513)
      PathPoint L_TP_foot_l_via_4: foot_l (-0.002800895 -0.002098686 0.0002505244)
      PathPoint L_TP_foot_l_insertion_5: foot_l (0.001301818 -0.003321758 0.001255879)
    Millard2012EquilibriumMuscle L_FDL: max_isometric_force=11.1 optimal_fiber_length=0.0088
        tendon_slack_length=0.04666999 pennation_angle_at_optimal=0.1937316
      PathPoint L_FDL_tibia_l_origin_1: tibia_l (-0.002141732 0.0344002 0.000896069)
      PathPoint L_FDL_tibia_l_via_2: tibia_l (-0.000986225 0.002410946 0.0005411851)
      PathPoint L_FDL_foot_l_via_3: foot_l (-0.00490061 -0.0004281598 0.0002783462)
      PathPoint L_FDL_foot_l_via_4: foot_l (-0.00301935 -0.001811786 4.9272e-5)
      PathPoint L_FDL_foot_l_via_5: foot_l (-0.0004664771 -0.003244991 0.0002752915)
      PathPoint L_FDL_foot_l_insertion_6: foot_l (0.01208848 -0.007452594 -0.00167985)
    Millard2012EquilibriumMuscle L_FHL: max_isometric_force=0.2 optimal_fiber_length=0.0054
        tendon_slack_length=0.04736539 pennation_angle_at_optimal=0.02268928
      PathPoint L_FHL_tibia_l_origin_1: tibia_l (-0.0006847909 0.03234256 0.001422431)
      PathPoint L_FHL_tibia_l_via_2: tibia_l (-0.001089913 0.002251627 0.001267011)
      PathPoint L_FHL_foot_l_via_3: foot_l (-0.004655021 -0.0005899981 0.0006006401)
      PathPoint L_FHL_foot_l_via_4: foot_l (-0.002766882 -0.002069895 0.0006719501)
      PathPoint L_FHL_foot_l_via_5: foot_l (0.0002094102 -0.003386334 0.0004709902)
      PathPoint L_FHL_foot_l_insertion_6: foot_l (0.01216095 -0.00740549 0.0009222273)
    Millard2012EquilibriumMuscle L_Per: max_isometric_force=7.7 optimal_fiber_length=0.0088
        tendon_slack_length=0.0373448 pennation_angle_at_optimal=0.1099557
      PathPoint L_Per_tibia_l_origin_1: tibia_l (-0.002240942 0.03560281 -0.002786968)
      PathPoint L_Per_tibia_l_via_2: tibia_l (-0.001351121 0.002557232 -0.00166131)
      PathPoint L_Per_foot_l_via_3: foot_l (-0.00452309 -0.0003156808 -0.001157108)
      PathPoint L_Per_foot_l_via_4: foot_l (-0.00247989 -0.0017431 -0.001433977)
      PathPoint L_Per_foot_l_via_5: foot_l (-0.0002705156 -0.00299293 -0.00176084)
      PathPoint L_Per_foot_l_insertion_6: foot_l (0.00242893 -0.004097917 -0.0007277185)
    Millard2012EquilibriumMuscle L_Pop: max_isometric_force=2.9 optimal_fiber_length=0.0063
        tendon_slack_length=0.0129852 pennation_angle_at_optimal=0.2426008
      PathPoint L_Pop_femur_l_origin_1: femur_l (-0.0003347563 -0.03068599 -0.002770484)
      PathPoint L_Pop_femur_l_via_2: femur_l (-0.002543801 -0.03000804 -0.003141046)
      PathPoint L_Pop_tibia_l_via_3: tibia_l (-0.003242223 0.03493462 0.0004768734)
      PathPoint L_Pop_tibia_l_insertion_4: tibia_l (0.001874304 0.02569243 0.002199908)
    ObjectGroup hamstrings: members=(R_BFa R_BFp R_CF R_GA R_GP R_SM R_STa R_STp)
    ObjectGroup hip_r_cuffs: members=(R_GI R_GS R_OE R_OI R_Pir R_QF)
    ObjectGroup hip_r_flexors: members=(R_IP R_Pec R_TFL)
    ObjectGroup gluteals: members=(R_GMa R_GMe R_GMi)
    ObjectGroup adductors: members=(R_AB R_AL R_AM R_GA R_GP)
    ObjectGroup quadriceps: members=(R_RF R_VI R_VL R_VM)
    ObjectGroup calf_muscles: members=(R_LG R_MG R_Pla R_Sol)
    ObjectGroup anterior_crural: members=(R_EDL R_TA)
    ObjectGroup posterior_crural: members=(R_FDL R_FHL R_TP)
    ObjectGroup others: members=(R_Per R_Pop)
  MarkerSet:
    Marker RASI: pelvis_r (0.028 0.004 0.003)
    Marker RHIP: pelvis_r (-0.001 0.001 0.01)
    Marker RKNE: femur_r (0 -0.035 0.003)
    Marker RANK: tibia_r (0 0 0.004) fixed=true
    Marker RTOE: foot_r (0.015 -0.005 0.005) fixed=true
    Marker TAIL: spine (-0.00797135 0.00775839 0)
    Marker SPL6: spine (0.0306698 0.0151176 0) fixed=true
    Marker LASI: pelvis_l (0.028 0.004 -0.003)
    Marker LHIP: pelvis_l (-0.001 0.001 -0.01)
    Marker LKNE: femur_l (0 -0.035 -0.003)
    Marker LANK: tibia_l (0 0 -0.004) fixed=true
    Marker LTOE: foot_l (0.015 -0.005 -0.005) fixed=true
