# OpenSim document version 40600
ForceSet:
  CoordinateActuator sacrum_pitch: coordinate=sacrum_pitch optimal_force=1
  CoordinateActuator sacrum_roll: coordinate=sacrum_roll optimal_force=1
  CoordinateActuator sacrum_yaw: coordinate=sacrum_yaw optimal_force=1
  CoordinateActuator sacrum_x: coordinate=sacrum_x optimal_force=1
  CoordinateActuator sacrum_y: coordinate=sacrum_y optimal_force=1
  CoordinateActuator sacrum_z: coordinate=sacrum_z optimal_force=1
  CoordinateActuator hip_r_flx: coordinate=hip_r_flx optimal_force=1
  CoordinateActuator hip_r_add: coordinate=hip_r_add optimal_force=1
  CoordinateActuator hip_r_int: coordinate=hip_r_int optimal_force=1
  CoordinateActuator knee_r_flx: coordinate=knee_r_flx optimal_force=1
  CoordinateActuator ankle_r_flx: coordinate=ankle_r_flx optimal_force=1
  CoordinateActuator ankle_r_add: coordinate=ankle_r_add optimal_force=1
  CoordinateActuator ankle_r_int: coordinate=ankle_r_int optimal_force=1
  CoordinateActuator hip_l_flx: coordinate=hip_l_flx optimal_force=1
  CoordinateActuator hip_l_add: coordinate=hip_l_add optimal_force=1
  CoordinateActuator hip_l_int: coordinate=hip_l_int optimal_force=1
  CoordinateActuator knee_l_flx: coordinate=knee_l_flx optimal_force=1
  CoordinateActuator ankle_l_flx: coordinate=ankle_l_flx optimal_force=1
  CoordinateActuator ankle_l_add: coordinate=ankle_l_add optimal_force=1
  CoordinateActuator ankle_l_int: coordinate=ankle_l_int optimal_force=1
