# OpenSim document version 40600
CMC_TaskSet:
  CMC_Joint [values shared by the 22 below unless stated]: weight=(1 0 0) wrt_body=-1 express_body=-1
      active=(true false false) kp=(100 1 1) kv=(20 1 1) ka=(1 1 1) r0=(0 0 0) r1=(0 0 0) r2=(0 0 0) limit=0
  CMC_Joint sacrum_pitch: coordinate=sacrum_pitch
  CMC_Joint sacrum_roll: coordinate=sacrum_roll
  CMC_Joint sacrum_yaw: coordinate=sacrum_yaw
  CMC_Joint sacrum_x: coordinate=sacrum_x
  CMC_Joint sacrum_y: coordinate=sacrum_y
  CMC_Joint sacrum_z: coordinate=sacrum_z
  CMC_Joint sacroiliac_r_flx: coordinate=sacroiliac_r_flx
  CMC_Joint hip_r_flx: coordinate=hip_r_flx
  CMC_Joint hip_r_add: coordinate=hip_r_add
  CMC_Joint hip_r_int: coordinate=hip_r_int
  CMC_Joint knee_r_flx: coordinate=knee_r_flx
  CMC_Joint ankle_r_flx: coordinate=ankle_r_flx
  CMC_Joint ankle_r_add: coordinate=ankle_r_add
  CMC_Joint ankle_r_int: coordinate=ankle_r_int
  CMC_Joint sacroiliac_l_flx: coordinate=sacroiliac_l_flx
  CMC_Joint hip_l_flx: coordinate=hip_l_flx
  CMC_Joint hip_l_add: coordinate=hip_l_add
  CMC_Joint hip_l_int: coordinate=hip_l_int
  CMC_Joint knee_l_flx: coordinate=knee_l_flx
  CMC_Joint ankle_l_flx: coordinate=ankle_l_flx
  CMC_Joint ankle_l_add: coordinate=ankle_l_add
  CMC_Joint ankle_l_int: coordinate=ankle_l_int
