# OpenSim document version 40600
ForceSet:
  Millard2012EquilibriumMuscle [values shared by the 38 below unless stated]: min_control=0.01 max_control=1
      fiber_damping=0.1 default_activation=0.05 minimum_activation=0.01
    ActiveForceLengthCurve: minimum_value=0
    ForceVelocityCurve: concentric_slope_at_vmax=0 concentric_slope_near_vmax=0.25 isometric_slope=5
        eccentric_slope_at_vmax=0 eccentric_slope_near_vmax=0.15 max_eccentric_velocity_force_multiplier=1.4
    FiberForceLengthCurve
    TendonForceLengthCurve
  Millard2012EquilibriumMuscle L_BFa: max_isometric_force=3.39 optimal_fiber_length=0.0397
      tendon_slack_length=0.008511372 pennation_angle_at_optimal=0 [radians]
    PathPoint L_BFa_pelvis_l_origin_1: pelvis_l (-0.01217486 0.009246433 -0.005781443)
    PathPoint L_BFa_pelvis_l_via_2: pelvis_l (-0.01228853 0.005084176 -0.001511519)
    PathPoint L_BFa_pelvis_l_via_3: pelvis_l (-0.01233545 0.001285 -0.0001208889)
    PathPoint L_BFa_tibia_l_insertion_4: tibia_l (-0.00297205 0.03250314 0.001356457)
  Millard2012EquilibriumMuscle L_BFp: max_isometric_force=12.49 optimal_fiber_length=0.0376
      tendon_slack_length=0.006346312 pennation_angle_at_optimal=0.122173
    PathPoint L_BFp_pelvis_l_origin_1: pelvis_l (-0.01489817 0.00358085 -0.001990871)
    PathPoint L_BFp_tibia_l_via_2: tibia_l (-0.003347734 0.02705096 0.0005851652)
    PathPoint L_BFp_tibia_l_insertion_3: tibia_l (0.002077828 0.02740987 0.0001304305)
  Millard2012EquilibriumMuscle L_CF: max_isometric_force=2.06 optimal_fiber_length=0.0379 tendon_slack_length=0
      pennation_angle_at_optimal=0 ignore_tendon_compliance=true
    PathPoint L_CF_pelvis_l_origin_1: pelvis_l (-0.007007314 0.009448493 -0.005645201)
    PathPoint L_CF_pelvis_l_via_2: pelvis_l (-0.00647922 0.005203847 -0.002557159)
    PathPoint L_CF_pelvis_l_via_3: pelvis_l (-0.005450917 0.001165429 -0.001087627)
    PathPoint L_CF_femur_l_insertion_4: femur_l (-0.00233532 -0.02783013 -0.0003357203)
  Millard2012EquilibriumMuscle L_STp: max_isometric_force=4.54 optimal_fiber_length=0.0436 tendon_slack_length=0
      pennation_angle_at_optimal=0 ignore_tendon_compliance=true
    PathPoint L_STp_pelvis_l_origin_1: pelvis_l (-0.01468434 0.002602004 -0.002088289)
    PathPoint L_STp_tibia_l_insertion_2: tibia_l (0.002008279 0.02760577 -0.002090325)
  Millard2012EquilibriumMuscle L_STa: max_isometric_force=1.39 optimal_fiber_length=0.0341
      tendon_slack_length=0.01324871 pennation_angle_at_optimal=0
    PathPoint L_STa_pelvis_l_origin_1: pelvis_l (-0.0135086 0.00858129 -0.004937058)
    PathPoint L_STa_pelvis_l_via_2: pelvis_l (-0.01348732 0.005699432 -0.002594588)
    PathPoint L_STa_pelvis_l_via_3: pelvis_l (-0.01349767 0.003758754 -0.001524656)
    PathPoint L_STa_tibia_l_insertion_4: tibia_l (0.002008279 0.02760577 -0.002090325)
  Millard2012EquilibriumMuscle L_SM: max_isometric_force=10.22 optimal_fiber_length=0.0357
      tendon_slack_length=0.005831992 pennation_angle_at_optimal=0
    PathPoint L_SM_pelvis_l_origin_1: pelvis_l (-0.0147235 -0.0002338422 -0.002797793)
    PathPoint L_SM_tibia_l_insertion_2: tibia_l (0.0005303704 0.03422706 -0.002697255)
  Millard2012EquilibriumMuscle L_QF: max_isometric_force=3 optimal_fiber_length=0.011 tendon_slack_length=0.00390839
      pennation_angle_at_optimal=0.05235988
    PathPoint L_QF_pelvis_l_origin_1: pelvis_l (-0.01325516 -0.002400281 -0.003546603)
    PathPoint L_QF_femur_l_insertion_2: femur_l (-0.00285983 -0.001243949 0.005186687)
  Millard2012EquilibriumMuscle L_TFL: max_isometric_force=3.89 optimal_fiber_length=0.0206
      tendon_slack_length=0.0003436383 pennation_angle_at_optimal=0.1919862
    PathPoint L_TFL_pelvis_l_origin_1: pelvis_l (0.01545252 0.0007290779 -0.001737707)
    PathPoint L_TFL_femur_l_insertion_2: femur_l (0.001342896 -0.02034841 0.001672282)
  Millard2012EquilibriumMuscle L_GMa: max_isometric_force=9.23 optimal_fiber_length=0.0196 tendon_slack_length=0
      pennation_angle_at_optimal=0.2094395 ignore_tendon_compliance=true
    PathPoint L_GMa_pelvis_l_origin_1: pelvis_l (0.01352632 0.002504598 -0.001282583)
    PathPoint L_GMa_femur_l_insertion_2: femur_l (-0.0006639967 -0.00857737 0.005756443)
  Millard2012EquilibriumMuscle L_GMe: max_isometric_force=18.74 optimal_fiber_length=0.0199
      tendon_slack_length=0.007698557 pennation_angle_at_optimal=0.2094395
    PathPoint L_GMe_pelvis_l_origin_1: pelvis_l (0.02457119 0.002527268 0.001783215)
    PathPoint L_GMe_femur_l_insertion_2: femur_l (0.001691065 0.001071407 0.005768603)
  Millard2012EquilibriumMuscle L_GMi: max_isometric_force=7.39 optimal_fiber_length=0.0118
      tendon_slack_length=0.01248806 pennation_angle_at_optimal=0.2792527
    PathPoint L_GMi_pelvis_l_origin_1: pelvis_l (0.0221635 0.001049392 -0.0008341644)
    PathPoint L_GMi_femur_l_insertion_2: femur_l (0.001698129 4.489584e-5 0.005068433)
  Millard2012EquilibriumMuscle L_Pir: max_isometric_force=11.14 optimal_fiber_length=0.0108
      tendon_slack_length=0.00404376 pennation_angle_at_optimal=0.2792527
    PathPoint L_Pir_pelvis_l_origin_1: pelvis_l (0.01211891 0.003236058 -0.0002566693)
    PathPoint L_Pir_femur_l_insertion_2: femur_l (0.00207348 0.001713699 0.005041368)
  Millard2012EquilibriumMuscle L_GP: max_isometric_force=2.35 optimal_fiber_length=0.0293
      tendon_slack_length=0.006394055 pennation_angle_at_optimal=0.05235988
    PathPoint L_GP_pelvis_l_origin_1: pelvis_l (-0.01396823 -0.004413517 -0.005234751)
    PathPoint L_GP_tibia_l_insertion_2: tibia_l (0.001998242 0.02843249 -0.002814683)
  Millard2012EquilibriumMuscle L_GA: max_isometric_force=1.55 optimal_fiber_length=0.0303
      tendon_slack_length=0.005267913 pennation_angle_at_optimal=0
    PathPoint L_GA_pelvis_l_origin_1: pelvis_l (-0.01344437 -0.008250392 -0.008581536)
    PathPoint L_GA_tibia_l_insertion_2: tibia_l (0.001552293 0.03082793 -0.002816602)
  Millard2012EquilibriumMuscle L_AL: max_isometric_force=1.039 optimal_fiber_length=0.0166 tendon_slack_length=0
      pennation_angle_at_optimal=0.1570796 ignore_tendon_compliance=true
    PathPoint L_AL_pelvis_l_origin_1: pelvis_l (-0.004591752 -0.005429107 -0.005844076)
    PathPoint L_AL_femur_l_insertion_2: femur_l (-0.002002732 -0.01517962 0.001669688)
  Millard2012EquilibriumMuscle L_AM: max_isometric_force=3.02 optimal_fiber_length=0.0284
      tendon_slack_length=0.007029298 pennation_angle_at_optimal=0
    PathPoint L_AM_pelvis_l_origin_1: pelvis_l (-0.01218539 -0.008296892 -0.008598131)
    PathPoint L_AM_tibia_l_insertion_2: tibia_l (0.0009030981 0.0324771 -0.002738507)
  Millard2012EquilibriumMuscle L_AB: max_isometric_force=12.21 optimal_fiber_length=0.0228
      tendon_slack_length=0.004824646 pennation_angle_at_optimal=0.2094395
    PathPoint L_AB_pelvis_l_origin_1: pelvis_l (-0.01160817 -0.007294874 -0.007929915)
    PathPoint L_AB_femur_l_insertion_2: femur_l (-0.001924809 -0.01719268 0.002101402)
  Millard2012EquilibriumMuscle L_Pec: max_isometric_force=4.93 optimal_fiber_length=0.0109
      tendon_slack_length=0.01264116 pennation_angle_at_optimal=0.122173
    PathPoint L_Pec_pelvis_l_origin_1: pelvis_l (-0.01482111 -0.007718453 -0.007682633)
    PathPoint L_Pec_femur_l_insertion_2: femur_l (-0.00287201 -0.01031142 0.003813552)
  Millard2012EquilibriumMuscle L_IP: max_isometric_force=11.28 optimal_fiber_length=0.0238 tendon_slack_length=0
      pennation_angle_at_optimal=0.2617994 ignore_tendon_compliance=true
    PathPoint L_IP_pelvis_l_origin_1: pelvis_l (0.02031596 -0.001190607 -0.002422879)
    PathPoint L_IP_femur_l_insertion_2: femur_l (-0.0005974748 -0.004095867 0.00135809)
  Millard2012EquilibriumMuscle L_OE: max_isometric_force=7.17 optimal_fiber_length=0.006
      tendon_slack_length=0.004019772 pennation_angle_at_optimal=0.2792527
    PathPoint L_OE_pelvis_l_origin_1: pelvis_l (-0.009026691 -0.001536456 -0.003252043)
    PathPoint L_OE_femur_l_insertion_2: femur_l (-0.002336445 -0.001215433 0.001756772)
  Millard2012EquilibriumMuscle L_OI: max_isometric_force=3.01 optimal_fiber_length=0.0045
      tendon_slack_length=0.008274504 pennation_angle_at_optimal=0.122173
    PathPoint L_OI_pelvis_l_origin_1: pelvis_l (-0.01271471 -0.000119353 -0.002186578)
    PathPoint L_OI_femur_l_via_2: femur_l (-0.001071509 0.0001720278 0.003154296)
  Millard2012EquilibriumMuscle L_GS: max_isometric_force=0.37 optimal_fiber_length=0.0061
      tendon_slack_length=0.01233842 pennation_angle_at_optimal=0.1745329
    PathPoint L_GS_pelvis_l_origin_1: pelvis_l (0.01784562 0.001547772 -0.001350231)
    PathPoint L_GS_femur_l_insertion_2: femur_l (-0.0001674421 -0.006034652 0.002077799)
  Millard2012EquilibriumMuscle L_GI: max_isometric_force=2.85 optimal_fiber_length=0.0042
      tendon_slack_length=0.008594905 pennation_angle_at_optimal=0.3141593
    PathPoint L_GI_pelvis_l_origin_1: pelvis_l (-0.01141022 0.005429278 -0.002706962)
    PathPoint L_GI_femur_l_insertion_2: femur_l (-0.00216784 -9.465281e-5 0.00200781)
  Millard2012EquilibriumMuscle L_RF: max_isometric_force=16.47 optimal_fiber_length=0.0122
      tendon_slack_length=0.02829375 pennation_angle_at_optimal=0.1919862
    PathPoint L_RF_pelvis_l_origin_1: pelvis_l (0.004599624 -0.0004586442 0.001049201)
    PathPoint L_RF_femur_l_via_2: femur_l (0.00303536 -0.03171479 -0.001465231)
    PathPoint L_RF_tibia_l_via_3: tibia_l (0.003706144 0.03985708 -0.001615632)
  Millard2012EquilibriumMuscle L_VL: max_isometric_force=14.87 optimal_fiber_length=0.0198
      tendon_slack_length=0.02447427 pennation_angle_at_optimal=0.2443461
    PathPoint L_VL_femur_l_origin_1: femur_l (-0.000569833 -0.00364222 0.006674743)
    PathPoint L_VL_femur_l_via_2: femur_l (0.0001285251 -0.03193823 0.001976869)
    PathPoint L_VL_tibia_l_via_3: tibia_l (0.002996267 0.04022664 0.0008880152)
    PathPoint L_VL_tibia_l_insertion_4: tibia_l (0.004952631 0.0355954 -0.0004079236)
  Millard2012EquilibriumMuscle L_VI: max_isometric_force=2.55 optimal_fiber_length=0.0116
      tendon_slack_length=0.02695442 pennation_angle_at_optimal=0.2443461
    PathPoint L_VI_femur_l_origin_1: femur_l (7.125413e-5 -0.01007851 0.004802875)
    PathPoint L_VI_femur_l_via_2: femur_l (0.002097793 -0.03284573 0.001212744)
    PathPoint L_VI_tibia_l_via_3: tibia_l (0.003254725 0.03991579 -0.0003762127)
    PathPoint L_VI_tibia_l_insertion_4: tibia_l (0.004952631 0.0355954 -0.0004079236)
  Millard2012EquilibriumMuscle L_VM: max_isometric_force=6.08 optimal_fiber_length=0.0156
      tendon_slack_length=0.02781887 pennation_angle_at_optimal=0.1919862
    PathPoint L_VM_femur_l_origin_1: femur_l (-0.0005446529 -0.005010672 0.001470708)
    PathPoint L_VM_femur_l_via_2: femur_l (0.001861536 -0.03174129 -0.003486555)
    PathPoint L_VM_tibia_l_via_3: tibia_l (0.003869094 0.03970912 -0.003553653)
    PathPoint L_VM_tibia_l_insertion_4: tibia_l (0.004952631 0.0355954 -0.0004079236)
  Millard2012EquilibriumMuscle L_MG: max_isometric_force=11.64 optimal_fiber_length=0.0146
      tendon_slack_length=0.03321933 pennation_angle_at_optimal=0.2268928
    PathPoint L_MG_femur_l_origin_1: femur_l (-0.0003565036 -0.03023269 -0.004372377)
    PathPoint L_MG_tibia_l_via_2: tibia_l (-0.0006102846 0.03447116 -0.004537933)
    PathPoint L_MG_tibia_l_via_3: tibia_l (-0.001012959 0.001807074 -0.001523894)
    PathPoint L_MG_foot_l_via_4: foot_l (-0.004364486 -0.0004150186 -0.0006108987)
    PathPoint L_MG_foot_l_insertion_5: foot_l (-0.004257096 -0.001428099 -8.032695e-5)
  Millard2012EquilibriumMuscle L_LG: max_isometric_force=18.26 optimal_fiber_length=0.0125
      tendon_slack_length=0.03347674 pennation_angle_at_optimal=0.1570796
    PathPoint L_LG_femur_l_origin_1: femur_l (-0.0008307283 -0.02965907 0.003068695)
    PathPoint L_LG_tibia_l_via_2: tibia_l (-0.003411416 0.03518768 0.002759405)
    PathPoint L_LG_tibia_l_via_3: tibia_l (-0.001332635 0.002549476 0.001297335)
    PathPoint L_LG_foot_l_via_4: foot_l (-0.004894254 -0.0002894355 0.0007861581)
    PathPoint L_LG_foot_l_insertion_5: foot_l (-0.004235756 -0.001270284 0.000886939)
  Millard2012EquilibriumMuscle L_Pla: max_isometric_force=5.61 optimal_fiber_length=0.0125
      tendon_slack_length=0.03308655 pennation_angle_at_optimal=0.1919862
    PathPoint L_Pla_femur_l_origin_1: femur_l (-0.0009476944 -0.02881597 0.002452695)
    PathPoint L_Pla_tibia_l_via_2: tibia_l (-0.003593991 0.0343827 0.002053964)
    PathPoint L_Pla_tibia_l_via_3: tibia_l (-0.00131222 0.002540911 0.0008953731)
    PathPoint L_Pla_foot_l_via_4: foot_l (-0.004887494 -0.0003441089 0.0003894728)
    PathPoint L_Pla_foot_l_insertion_5: foot_l (-0.004601932 -0.00146048 0.0003701435)
  Millard2012EquilibriumMuscle L_Sol: max_isometric_force=1.42 optimal_fiber_length=0.016
      tendon_slack_length=0.02448815 pennation_angle_at_optimal=0.06981317
    PathPoint L_Sol_tibia_l_origin_1: tibia_l (-0.003794695 0.03442722 0.0003698398)
    PathPoint L_Sol_tibia_l_via_2: tibia_l (-0.001281575 0.002528053 0.000291988)
    PathPoint L_Sol_foot_l_via_3: foot_l (-0.004855123 -0.0003923701 7.707983e-5)
    PathPoint L_Sol_foot_l_insertion_4: foot_l (-0.004585194 -0.001473879 4.84638e-5)
  Millard2012EquilibriumMuscle L_TA: max_isometric_force=8.6 optimal_fiber_length=0.0152 tendon_slack_length=0.02513184
      pennation_angle_at_optimal=0.1570796
    PathPoint L_TA_tibia_l_origin_1: tibia_l (0.003815336 0.03503993 -0.002032018)
    PathPoint L_TA_tibia_l_via_2: tibia_l (0.005441972 0.0254747 -0.001578988)
    PathPoint L_TA_tibia_l_via_3: tibia_l (0.001865014 0.004010844 -0.000692755)
    PathPoint L_TA_foot_l_via_4: foot_l (0.001996198 -0.001137769 -0.0008115393)
    PathPoint L_TA_foot_l_insertion_5: foot_l (0.004202379 -0.00291829 -0.001255735)
  Millard2012EquilibriumMuscle L_EDL: max_isometric_force=2.21 optimal_fiber_length=0.0137
      tendon_slack_length=0.04347452 pennation_angle_at_optimal=0.1745329
    PathPoint L_EDL_femur_l_origin_1: femur_l (-0.001157646 -0.03136773 0.002336906)
    PathPoint L_EDL_tibia_l_via_2: tibia_l (-0.0003336262 0.0375621 0.002694107)
    PathPoint L_EDL_tibia_l_via_3: tibia_l (0.001635858 0.003863152 0.001117945)
    PathPoint L_EDL_foot_l_via_4: foot_l (0.001574123 -0.001089779 0.0008694175)
    PathPoint L_EDL_foot_l_insertion_5: foot_l (0.01339039 -0.005855328 0.001507169)
  Millard2012EquilibriumMuscle L_TP: max_isometric_force=3.54 optimal_fiber_length=0.0054
      tendon_slack_length=0.03856053 pennation_angle_at_optimal=0.08726646
    PathPoint L_TP_tibia_l_origin_1: tibia_l (-0.001879778 0.0326057 -0.00148873)
    PathPoint L_TP_tibia_l_via_2: tibia_l (-0.001110503 0.001959859 -0.0009091664)
    PathPoint L_TP_foot_l_via_3: foot_l (-0.00501409 -0.0004841281 -0.0004970513)
    PathPoint L_TP_foot_l_via_4: foot_l (-0.002800895 -0.002098686 -0.0002505244)
    PathPoint L_TP_foot_l_insertion_5: foot_l (0.001301818 -0.003321758 -0.001255879)
  Millard2012EquilibriumMuscle L_FDL: max_isometric_force=11.02 optimal_fiber_length=0.009
      tendon_slack_length=0.04863526 pennation_angle_at_optimal=0.1919862
    PathPoint L_FDL_tibia_l_origin_1: tibia_l (-0.002141732 0.0344002 -0.000896069)
    PathPoint L_FDL_tibia_l_via_2: tibia_l (-0.000986225 0.002410946 -0.0005411851)
    PathPoint L_FDL_foot_l_via_3: foot_l (-0.00490061 -0.0004281598 -0.0002783462)
    PathPoint L_FDL_foot_l_via_4: foot_l (-0.00301935 -0.001811786 -4.9272e-5)
    PathPoint L_FDL_foot_l_via_5: foot_l (-0.0004664771 -0.003244991 -0.0002752915)
    PathPoint L_FDL_foot_l_insertion_6: foot_l (0.01208848 -0.007452594 0.00167985)
  Millard2012EquilibriumMuscle L_FHL: max_isometric_force=0.44 optimal_fiber_length=0.0108
      tendon_slack_length=0.04427625 pennation_angle_at_optimal=0.03490659
    PathPoint L_FHL_tibia_l_origin_1: tibia_l (-0.0006847909 0.03234256 -0.001422431)
    PathPoint L_FHL_tibia_l_via_2: tibia_l (-0.001089913 0.002251627 -0.001267011)
    PathPoint L_FHL_foot_l_via_3: foot_l (-0.004655021 -0.0005899981 -0.0006006401)
    PathPoint L_FHL_foot_l_via_4: foot_l (-0.002766882 -0.002069895 -0.0006719501)
    PathPoint L_FHL_foot_l_via_5: foot_l (0.0002094102 -0.003386334 -0.0004709902)
    PathPoint L_FHL_foot_l_insertion_6: foot_l (0.01216095 -0.00740549 -0.0009222273)
  Millard2012EquilibriumMuscle L_Per: max_isometric_force=3.96 optimal_fiber_length=0.0076
      tendon_slack_length=0.03987563 pennation_angle_at_optimal=0.1570796
    PathPoint L_Per_tibia_l_origin_1: tibia_l (-0.002240942 0.03560281 0.002786968)
    PathPoint L_Per_tibia_l_via_2: tibia_l (-0.001351121 0.002557232 0.00166131)
    PathPoint L_Per_foot_l_via_3: foot_l (-0.00452309 -0.0003156808 0.001157108)
    PathPoint L_Per_foot_l_via_4: foot_l (-0.00247989 -0.0017431 0.001433977)
    PathPoint L_Per_foot_l_via_5: foot_l (-0.0002705156 -0.00299293 0.00176084)
    PathPoint L_Per_foot_l_insertion_6: foot_l (0.00242893 -0.004097917 0.0007277185)
  Millard2012EquilibriumMuscle L_Pop: max_isometric_force=2.92 optimal_fiber_length=0.0065
      tendon_slack_length=0.01248847 pennation_angle_at_optimal=0.2268928
    PathPoint L_Pop_femur_l_origin_1: femur_l (-0.0003347563 -0.03068599 0.002770484)
    PathPoint L_Pop_femur_l_via_2: femur_l (-0.002543801 -0.03000804 0.003141046)
    PathPoint L_Pop_tibia_l_via_3: tibia_l (-0.003242223 0.03493462 -0.0004768734)
    PathPoint L_Pop_tibia_l_insertion_4: tibia_l (0.001874304 0.02569243 -0.002199908)
  ObjectGroup hamstrings: members=(L_BFa L_BFp L_CF L_GA L_GP L_SM L_STa L_STp)
  ObjectGroup hip_r_cuffs: members=(L_GI L_GS L_OE L_OI L_Pir L_QF)
  ObjectGroup hip_r_flexors: members=(L_IP L_Pec L_TFL)
  ObjectGroup gluteals: members=(L_GMa L_GMe L_GMi)
  ObjectGroup adductors: members=(L_AB L_AL L_AM L_GA L_GP)
  ObjectGroup quadriceps: members=(L_RF L_VI L_VL L_VM)
  ObjectGroup calf_muscles: members=(L_LG L_MG L_Pla L_Sol)
  ObjectGroup anterior_crural: members=(L_EDL L_TA)
  ObjectGroup posterior_crural: members=(L_FDL L_FHL L_TP)
  ObjectGroup others: members=(L_Per L_Pop)
