# OpenSim document version 40000
MarkerSet:
  Marker RASI: pelvis_r (0.028 0.004 0.003)
  Marker RHIP: pelvis_r (-0.001 0.001 0.01)
  Marker RKNE: femur_r (0 -0.035 0.003)
  Marker RANK: tibia_r (0 0 0.004) fixed=true
  Marker RTOE: foot_r (0.015 -0.005 0.005) fixed=true
  Marker TAIL: spine (-0.00797135 0.00775839 0)
  Marker SPL6: spine (0.0306698 0.0151176 0) fixed=true
  Marker LASI: pelvis_l (0.028 0.004 -0.003)
  Marker LHIP: pelvis_l (-0.001 0.001 -0.01)
  Marker LKNE: femur_l (0 -0.035 -0.003)
  Marker LANK: tibia_l (0 0 -0.004) fixed=true
  Marker LTOE: foot_l (0.015 -0.005 -0.005) fixed=true
