# OpenSim document version 40600
Model RatHindlimbRight:
  gravity: 0 -9.80665 0
  credits: Model authors names..
  publications: List of publications related to model...
  length_units: mm
  force_units: N
  Ground: meshes=ground.vtp
  BodySet:
    Body spine: mass=0.12 [kg] mass_center=(0 0 0) inertia=(4.8e-6 4.8e-6 4.8e-6 0 0 0) meshes=spine.vtp
    Body pelvis: mass=0.02 mass_center=(0 0 0) inertia=(4e-6 3.5e-6 3.5e-6 0 0 0) meshes=pelvis.vtp
      WrapCylinder hip_cylinder_small: xyz_body_rotation=(0 1.48353 0) translation=(0.01 0.002 -0.0045) quadrant=-x
          radius=0.005 length=0.06
      WrapCylinder hip_cylinder_small2: xyz_body_rotation=(0 1.48353 0) translation=(0.01 0.001 -0.0045) quadrant=all
          radius=0.005 length=0.06
      WrapCylinder hip_cylinder_large2: xyz_body_rotation=(0 1.48353 0) translation=(0.01 0.004 0.003) quadrant=-x
          radius=0.0025 length=0.06
    Body femur: mass=0.02 mass_center=(0 -0.015 0) inertia=(1.62e-6 2.5e-7 1.62e-6 0 0 0) meshes=femur.vtp
      WrapCylinder femur_prox: xyz_body_rotation=(0 0.436332 0) translation=(0.001 -0.006 0) quadrant=-x radius=0.0046
          length=0.05
      WrapCylinder femur_prox2: xyz_body_rotation=(0 0.436332 0) translation=(0.001 -0.006 0) quadrant=all
          radius=0.0046 length=0.05
      WrapTorus femur_dist: xyz_body_rotation=(1.72489 0 0.0977454) translation=(0.00543 -0.03003 -0.00046)
          quadrant=all inner_radius=0.004 outer_radius=0.006
      WrapCylinder femur_shaft_large: xyz_body_rotation=(1.72489 0 -0.785398) translation=(-0.00064 -0.015595 0.00185)
          quadrant=y radius=0.0027 length=0.03058
      WrapCylinder femur_shaft_small: xyz_body_rotation=(1.72489 0 0.0977454) translation=(-0.00064 -0.015095 0.00185)
          quadrant=all radius=0.0018 length=0.02958
    Body tibia: mass=0.02 mass_center=(0 0.015 0) inertia=(1.62e-6 2.5e-7 1.62e-6 0 0 0) meshes=tibia.vtp
      WrapSphere tibia_prox: translation=(0.00062 0.0346 -0.001) quadrant=all radius=0.005
      WrapCylinder tibia_shaft: xyz_body_rotation=(1.5708 0 0) translation=(0 0.0241 0) quadrant=all radius=0.0035
          length=0.0282
      WrapCylinder tibia_shaft2: xyz_body_rotation=(1.5708 0 0) translation=(0 0.0241 0) quadrant=-y radius=0.0035
          length=0.0282
      WrapSphere ankle_sphere: translation=(0.00119 0.00233 0.00015) quadrant=all radius=0.0025
      WrapTorus ankle_torus: xyz_body_rotation=(1.5708 0 0) translation=(0.00119 0.00233 0.00015) quadrant=all
          inner_radius=0.001 outer_radius=0.004
    Body foot: mass=0.02 mass_center=(0.007 -0.005 0) inertia=(2.5e-7 1.62e-6 1.62e-6 0 0 0) meshes=foot.vtp
  JointSet:
    CustomJoint ground_spine: socket_parent_frame=ground_offset socket_child_frame=spine_offset
      Coordinate sacrum_pitch: default_value=0.5235988 range=(-1.570796 1.570796) clamped=true
      Coordinate sacrum_roll: default_value=0 range=(-1.570796 1.570796) clamped=true
      Coordinate sacrum_yaw: default_value=0 range=(-1.570796 1.570796) clamped=true
      Coordinate sacrum_x: default_value=0 range=(-0.1 0.25) clamped=true
      Coordinate sacrum_y: default_value=0.05 range=(0 0.2) clamped=true
      Coordinate sacrum_z: default_value=0 range=(-0.1 0.1) clamped=true
      PhysicalOffsetFrame ground_offset: socket_parent=/ground translation=(0 0 0) [meters]
      PhysicalOffsetFrame spine_offset: socket_parent=/bodyset/spine translation=(0 0 0)
      SpatialTransform:
        TransformAxis rotation1: coordinates=sacrum_pitch axis=(0 0 1) LinearFunction(coefficients=1 0)
        TransformAxis rotation2: coordinates=sacrum_roll axis=(1 0 0) LinearFunction(coefficients=1 0)
        TransformAxis rotation3: coordinates=sacrum_yaw axis=(0 1 0) LinearFunction(coefficients=1 0)
        TransformAxis translation1: coordinates=sacrum_x axis=(1 0 0) LinearFunction(coefficients=1 0)
        TransformAxis translation2: coordinates=sacrum_y axis=(0 1 0) LinearFunction(coefficients=1 0)
        TransformAxis translation3: coordinates=sacrum_z axis=(0 0 1) LinearFunction(coefficients=1 0)
    CustomJoint sacroiliac: socket_parent_frame=spine_offset socket_child_frame=pelvis_offset
      Coordinate sacroiliac_flx: default_value=0.06457718 range=(-0.02301246 0.1515205) clamped=true locked=true
      PhysicalOffsetFrame spine_offset: socket_parent=/bodyset/spine translation=(0.005 -0.003 0.01)
      PhysicalOffsetFrame pelvis_offset: socket_parent=/bodyset/pelvis translation=(0 0 0)
      SpatialTransform: axes_held_at_zero=(rotation2 rotation3 translation1 translation2 translation3)
        TransformAxis rotation1: coordinates=sacroiliac_flx axis=(0 0 1) LinearFunction(coefficients=1 0)
    CustomJoint hip: socket_parent_frame=pelvis_offset socket_child_frame=femur_offset
      Coordinate hip_flx: default_value=-0.0381878 range=(-0.8726646 1.22173) clamped=true
      Coordinate hip_add: default_value=-0.1745329 range=(-0.8726646 0.3490659) clamped=true
      Coordinate hip_int: default_value=0 range=(-0.8726646 0.6981317) clamped=true
      PhysicalOffsetFrame pelvis_offset: socket_parent=/bodyset/pelvis translation=(0 0 0)
      PhysicalOffsetFrame femur_offset: socket_parent=/bodyset/femur translation=(0 0 0)
      SpatialTransform: axes_held_at_zero=(translation1 translation2 translation3)
        TransformAxis rotation1: coordinates=hip_flx axis=(0 0 1) LinearFunction(coefficients=1 0)
        TransformAxis rotation2: coordinates=hip_add axis=(1 0 0) LinearFunction(coefficients=1 0)
        TransformAxis rotation3: coordinates=hip_int axis=(0 1 0) LinearFunction(coefficients=1 0)
    CustomJoint knee: socket_parent_frame=femur_offset socket_child_frame=tibia_offset
      Coordinate knee_flx: default_value=-2.094395 range=(-2.617994 -0.3490659) clamped=true
      PhysicalOffsetFrame femur_offset: socket_parent=/bodyset/femur translation=(0 0 0)
      PhysicalOffsetFrame tibia_offset: socket_parent=/bodyset/tibia translation=(0 0 0)
      SpatialTransform:
        TransformAxis rotation1: coordinates=knee_flx axis=(0 0 1) LinearFunction(coefficients=1 0)
        TransformAxis rotation2: coordinates=knee_flx axis=(1 0 0)
          SimmSpline: x=(-2.61799 -2.44346 -2.26893 -2.0944 -1.91986 -1.74533 -1.5708 -1.39626 -1.22173 -1.0472 -0.872665 -0.698132 -0.523599 -0.349066)
              y=(-0.0872665 -0.0750492 -0.0645772 -0.0523599 -0.0401426 -0.0296706 -0.0174533 -0.00523599 0.00523599 0.0174533 0.0296706 0.0401426 0.0523599 0.0645772)
        TransformAxis rotation3: coordinates=knee_flx axis=(0 1 0)
          SimmSpline: x=(-2.61799 -2.44346 -2.26893 -2.0944 -1.91986 -1.74533 -1.5708 -1.39626 -1.22173 -1.0472 -0.872665 -0.698132 -0.523599 -0.349066)
              y=(0.261799 0.261799 0.261799 0.261799 0.261799 0.261799 0.261799 0.261799 0.261799 0.261799 0.261799 0.261799 0.261799 0.261799)
        TransformAxis translation1: coordinates=knee_flx axis=(1 0 0)
          SimmSpline: x=(-2.61799 -2.44346 -2.26893 -2.0944 -1.91986 -1.74533 -1.5708 -1.39626 -1.22173 -1.0472 -0.872665 -0.698132 -0.523599 -0.349066)
              y=(-0.02492 -0.0301 -0.03449 -0.03798 -0.04049 -0.04196 -0.04232 -0.04156 -0.03968 -0.0367 -0.03267 -0.02769 -0.02188 -0.01539)
        TransformAxis translation2: coordinates=knee_flx axis=(0 1 0)
          SimmSpline: x=(-2.61799 -2.44346 -2.26893 -2.0944 -1.91986 -1.74533 -1.5708 -1.39626 -1.22173 -1.0472 -0.872665 -0.698132 -0.523599 -0.349066)
              y=(0.00082 -0.00322 -0.00805 -0.01353 -0.01952 -0.02588 -0.03244 -0.03905 -0.04552 -0.05167 -0.05732 -0.06229 -0.0664 -0.0695)
        TransformAxis translation3: coordinates=knee_flx axis=(0 0 1)
          SimmSpline: x=(-2.61799 -2.44346 -2.26893 -2.0944 -1.91986 -1.74533 -1.5708 -1.39626 -1.22173 -1.0472 -0.872665 -0.698132 -0.523599 -0.349066)
              y=(0.00227 0.00198 0.00161 0.00117 0.00067 0.00013 -0.00043 -0.00101 -0.00157 -0.00211 -0.00261 -0.00305 -0.00342 -0.00371)
    CustomJoint ankle: socket_parent_frame=tibia_offset socket_child_frame=foot_offset
      Coordinate ankle_flx: default_value=0.8726646 range=(-0.5235988 1.047198) clamped=true
      Coordinate ankle_add: default_value=-0.08726646 range=(-0.08726646 0.6108652) clamped=true
      Coordinate ankle_int: default_value=0 range=(-0.8726646 0.2617994) clamped=true
      PhysicalOffsetFrame tibia_offset: socket_parent=/bodyset/tibia translation=(0 0 0)
      PhysicalOffsetFrame foot_offset: socket_parent=/bodyset/foot translation=(0 0 0)
      SpatialTransform:
        TransformAxis rotation1: coordinates=ankle_flx axis=(0 0 1) LinearFunction(coefficients=1 0)
        TransformAxis rotation2: coordinates=ankle_add axis=(1 0 0) LinearFunction(coefficients=1 0)
        TransformAxis rotation3: coordinates=ankle_int axis=(0 1 0) LinearFunction(coefficients=1 0)
        TransformAxis translation1: coordinates=ankle_flx axis=(1 0 0)
          SimmSpline: x=(-0.523599 -0.349066 -0.174533 0 0.174533 0.349066 0.523599 0.698132 0.872665 1.0472)
              y=(0 0 0 0 0 0 0 0 0 0)
        TransformAxis translation2: coordinates=ankle_flx axis=(0 1 0)
          SimmSpline: x=(-0.523599 -0.349066 -0.174533 0 0.174533 0.349066 0.523599 0.698132 0.872665 1.0472)
              y=(0 0 0 0 0 0 0 0 0 0)
        TransformAxis translation3: coordinates=ankle_flx axis=(0 0 1)
          SimmSpline: x=(-0.523599 -0.349066 -0.174533 0 0.174533 0.349066 0.523599 0.698132 0.872665 1.0472)
              y=(0 0 0 0 0 0 0 0 0 0)
  ForceSet:
    Millard2012EquilibriumMuscle [values shared by the 40 below unless stated]: min_control=0.01 max_control=1
        fiber_damping=0.1 default_activation=0.05 minimum_activation=0.01
      ActiveForceLengthCurve: minimum_value=0
      ForceVelocityCurve: concentric_slope_at_vmax=0 concentric_slope_near_vmax=0.25 isometric_slope=5
          eccentric_slope_at_vmax=0 eccentric_slope_near_vmax=0.15 max_eccentric_velocity_force_multiplier=1.4
      FiberForceLengthCurve
      TendonForceLengthCurve
    Millard2012EquilibriumMuscle Young_BFa2: max_isometric_force=3.4 optimal_fiber_length=0.0389
        tendon_slack_length=0.02196166 pennation_angle_at_optimal=0.00698132 [radians]
      PathPoint P1: pelvis (-0.009023593 0.004984631 0.01387276)
      PathPoint: pelvis (-0.013 0.004 -0.002)
      PathPoint pathpoint_0: pelvis (-0.013 0.0004 -0.001)
      PathPoint Young_BFa-P2: tibia (0.00179348 0.05676435 -0.00391653)
    Millard2012EquilibriumMuscle Young_BFa: max_isometric_force=3.4 optimal_fiber_length=0.0389
        tendon_slack_length=0.02196166 pennation_angle_at_optimal=0.00698132
      PathPoint P1: pelvis (-0.012 0.009 -0.006)
      PathPoint: pelvis (-0.013 0.004 -0.002)
      PathPoint pathpoint_0: pelvis (-0.013 0.0004 -0.001)
      PathPoint P2: tibia (-0.004368329 0.03405703 0.005209099)
    Millard2012EquilibriumMuscle BFa: max_isometric_force=3.4 optimal_fiber_length=0.0389
        tendon_slack_length=0.02196166 pennation_angle_at_optimal=0.00698132
      PathPoint P1: spine (-0.0024 0.0045 0.0031)
      PathPoint P2: femur (-0.0001 -0.0302 0.0016)
      PathWrap: wrap_object=hip_cylinder_large2 method=hybrid
      PathWrap pathwrap_0: wrap_object=femur_prox method=hybrid
    Millard2012EquilibriumMuscle BFp: max_isometric_force=12.5 optimal_fiber_length=0.0369
        tendon_slack_length=0.001580198 pennation_angle_at_optimal=0.127409
      PathPoint P1: pelvis (-0.0131 0.0024 -0.0023)
      PathPoint P2: tibia (0.0035 0.0239 0.0026)
      PathWrap: wrap_object=femur_prox method=hybrid
      PathWrap pathwrap_0: wrap_object=tibia_shaft method=hybrid
    Millard2012EquilibriumMuscle CF: max_isometric_force=2.1 optimal_fiber_length=0.0372 tendon_slack_length=0.01486601
        pennation_angle_at_optimal=0
      PathPoint P1: spine (-0.0039 0.0063 0.0035)
      PathPoint P2: femur (-0.0025 -0.0262 -0.002)
      PathWrap: wrap_object=hip_cylinder_small method=hybrid
      PathWrap pathwrap_0: wrap_object=femur_prox method=hybrid
    Millard2012EquilibriumMuscle STp: max_isometric_force=3.4 optimal_fiber_length=0.0389
        tendon_slack_length=0.02030047 pennation_angle_at_optimal=0.00698132
      PathPoint P1: spine (-0.0056 0.0041 0.0037)
      PathPoint P2: tibia (0.0047 0.0231 0)
      PathWrap: wrap_object=femur_prox2 method=hybrid
      PathWrap pathwrap_0: wrap_object=tibia_shaft2 method=hybrid
      PathWrap pathwrap_1: wrap_object=hip_cylinder_small method=hybrid
    Millard2012EquilibriumMuscle STa: max_isometric_force=12.5 optimal_fiber_length=0.0369
        tendon_slack_length=0.003469065 pennation_angle_at_optimal=0.127409
      PathPoint P1: pelvis (-0.0145 0.0012 -0.0009)
      PathPoint P2: tibia (0.0047 0.0231 0)
      PathWrap: wrap_object=femur_prox method=hybrid
      PathWrap pathwrap_0: wrap_object=tibia_shaft2 method=hybrid
    Millard2012EquilibriumMuscle SM: max_isometric_force=10.3 optimal_fiber_length=0.035 tendon_slack_length=0
        pennation_angle_at_optimal=0 ignore_tendon_compliance=true
      PathPoint P1: pelvis (-0.0137 -0.0011 -0.0037)
      PathPoint P2: tibia (0.0022 0.035 -0.0026)
      PathWrap: wrap_object=tibia_shaft2 method=hybrid
    Millard2012EquilibriumMuscle QF: max_isometric_force=3 optimal_fiber_length=0.0108 tendon_slack_length=0
        pennation_angle_at_optimal=0.05061455 ignore_tendon_compliance=true
      PathPoint P1: pelvis (-0.0106 -0.0007 -0.0024)
      PathPoint P2: femur (-0.0029 -0.0044 0.0011)
      PathWrap: wrap_object=femur_shaft_small method=hybrid
    Millard2012EquilibriumMuscle TFL: max_isometric_force=2.9 optimal_fiber_length=0.015 tendon_slack_length=0.0076059
        pennation_angle_at_optimal=0.148353
      PathPoint P1: pelvis (0.0213 0.0006 0.0026)
      PathPoint P2: femur (0.0057 -0.0178 0.0031)
    Millard2012EquilibriumMuscle GMa: max_isometric_force=9.3 optimal_fiber_length=0.0192
        tendon_slack_length=0.008317502 pennation_angle_at_optimal=0.2111848
      PathPoint P1: spine (0.0202 0.0056 0.0041)
      PathPoint P2: femur (-0.0015 -0.0098 0.0064)
      PathWrap: wrap_object=hip_cylinder_large2 method=hybrid
    Millard2012EquilibriumMuscle GMe: max_isometric_force=18.8 optimal_fiber_length=0.0196 tendon_slack_length=0
        pennation_angle_at_optimal=0.2199115 ignore_tendon_compliance=true
      PathPoint P1: pelvis (0.0202 0.004 -0.0001)
      PathPoint P2: femur (-0.0027 -0.0033 0.0064)
      PathWrap: wrap_object=hip_cylinder_small2 method=hybrid
      PathWrap pathwrap_0: wrap_object=femur_shaft_large method=hybrid
    Millard2012EquilibriumMuscle GMi: max_isometric_force=7.4 optimal_fiber_length=0.0116 tendon_slack_length=0
        pennation_angle_at_optimal=0.286234 ignore_tendon_compliance=true
      PathPoint P1: pelvis (0.013 0.0009 0.0004)
      PathPoint P2: femur (-0.0004 -0.0001 0.0048)
    Millard2012EquilibriumMuscle Pir: max_isometric_force=11.2 optimal_fiber_length=0.0106 tendon_slack_length=0
        pennation_angle_at_optimal=0.286234 ignore_tendon_compliance=true
      PathPoint P1: pelvis (0.0114 0.0042 -0.0007)
      PathPoint P2: femur (-0.0014 0.0009 0.004)
    Millard2012EquilibriumMuscle GP: max_isometric_force=2.4 optimal_fiber_length=0.0287
        tendon_slack_length=0.008101279 pennation_angle_at_optimal=0.05759587
      PathPoint P1: pelvis (-0.0148 -0.0055 -0.0063)
      PathPoint P2: tibia (0.0049 0.0266 -0.0018)
      PathWrap: wrap_object=tibia_shaft2 method=hybrid
    Millard2012EquilibriumMuscle GA: max_isometric_force=1.6 optimal_fiber_length=0.0297
        tendon_slack_length=0.004175889 pennation_angle_at_optimal=0
      PathPoint P1: pelvis (-0.0065 -0.0059 -0.0061)
      PathPoint P2: tibia (0.0032 0.0289 -0.0017)
      PathWrap: wrap_object=tibia_shaft2 method=hybrid
    Millard2012EquilibriumMuscle AL: max_isometric_force=1 optimal_fiber_length=0.0163 tendon_slack_length=0
        pennation_angle_at_optimal=0.1692969 ignore_tendon_compliance=true
      PathPoint P1: pelvis (-0.0045 -0.005 -0.0053)
      PathPoint P2: femur (-0.0016 -0.017 0.0011)
    Millard2012EquilibriumMuscle AM: max_isometric_force=3 optimal_fiber_length=0.0279 tendon_slack_length=0
        pennation_angle_at_optimal=0 ignore_tendon_compliance=true
      PathPoint P1: pelvis (-0.0061 -0.0053 -0.0056)
      PathPoint P2: femur (-0.0006 -0.03 -0.0031)
    Millard2012EquilibriumMuscle AB: max_isometric_force=12.2 optimal_fiber_length=0.0224 tendon_slack_length=0
        pennation_angle_at_optimal=0.2251475 ignore_tendon_compliance=true
      PathPoint P1: pelvis (-0.0107 -0.0058 -0.0066)
      PathPoint P2: femur (-0.0016 -0.0164 0.0035)
    Millard2012EquilibriumMuscle Pec: max_isometric_force=3.7 optimal_fiber_length=0.0081
        tendon_slack_length=0.002449795 pennation_angle_at_optimal=0.09773844
      PathPoint P1: pelvis (0.0009 -0.0034 -0.0033)
      PathPoint P2: femur (-0.0018 -0.0107 0.0019)
    Millard2012EquilibriumMuscle IP: max_isometric_force=16.3 optimal_fiber_length=0.017 tendon_slack_length=0.03284685
        pennation_angle_at_optimal=0.1500983
      PathPoint P1: spine (0.0537 0.005 0.003)
      PathPoint P2: femur (-0.0021 -0.0053 0.0001)
    Millard2012EquilibriumMuscle OE: max_isometric_force=7.2 optimal_fiber_length=0.0058
        tendon_slack_length=0.004283164 pennation_angle_at_optimal=0.2984513
      PathPoint P1: pelvis (-0.0089 -0.0027 -0.0031)
      PathPoint P2: femur (-0.0016 0.0005 0.0035)
    Millard2012EquilibriumMuscle OI: max_isometric_force=3 optimal_fiber_length=0.0044 tendon_slack_length=0.00337929
        pennation_angle_at_optimal=0.1221731
      PathPoint P1: pelvis (-0.0063 0.0048 -0.0026)
      PathPoint P2: femur (-0.0019 0.0007 0.0024)
    Millard2012EquilibriumMuscle GS: max_isometric_force=0.4 optimal_fiber_length=0.006 tendon_slack_length=0
        pennation_angle_at_optimal=0.1884956 ignore_tendon_compliance=true
      PathPoint P1: pelvis (0.0029 0.0014 -0.0022)
      PathPoint P2: femur (-0.0011 0.0015 0.0024)
    Millard2012EquilibriumMuscle GI: max_isometric_force=2.9 optimal_fiber_length=0.0041
        tendon_slack_length=0.001757186 pennation_angle_at_optimal=0.3298672
      PathPoint P1: pelvis (-0.0056 0.0024 -0.0013)
      PathPoint P2: femur (-0.0031 -0.0007 0.0021)
    Millard2012EquilibriumMuscle RF: max_isometric_force=16.5 optimal_fiber_length=0.0119
        tendon_slack_length=0.02817074 pennation_angle_at_optimal=0.1972222
      PathPoint P1: pelvis (0.0045 -0.0001 0.0015)
      PathPoint P2: tibia (0.0026 0.0375 0.0005)
      PathWrap: wrap_object=femur_dist method=hybrid
      PathWrap pathwrap_0: wrap_object=femur_shaft_small method=hybrid
    Millard2012EquilibriumMuscle VL: max_isometric_force=14.9 optimal_fiber_length=0.0194
        tendon_slack_length=0.01805669 pennation_angle_at_optimal=0.2548181
      PathPoint P1: femur (-0.0011 -0.0036 0.0056)
      PathPoint P2: tibia (0.0026 0.0375 0.0005)
      PathWrap: wrap_object=femur_dist method=hybrid
      PathWrap pathwrap_0: wrap_object=femur_shaft_small method=hybrid
    Millard2012EquilibriumMuscle VI: max_isometric_force=2.6 optimal_fiber_length=0.0113 tendon_slack_length=0.0178516
        pennation_angle_at_optimal=0.2495821
      PathPoint P1: femur (0.0008 -0.0116 0.0032)
      PathPoint P2: tibia (0.0026 0.0375 0.0005)
      PathWrap: wrap_object=femur_dist method=hybrid
      PathWrap pathwrap_0: wrap_object=femur_shaft_small method=hybrid
    Millard2012EquilibriumMuscle VM: max_isometric_force=6.1 optimal_fiber_length=0.0153 tendon_slack_length=0.01763079
        pennation_angle_at_optimal=0.2024582
      PathPoint P1: femur (-0.0002 -0.0074 0.0012)
      PathPoint P2: tibia (0.0026 0.0375 0.0005)
      PathWrap: wrap_object=femur_dist method=hybrid
      PathWrap pathwrap_0: wrap_object=femur_shaft_small method=hybrid
    Millard2012EquilibriumMuscle MG: max_isometric_force=11.7 optimal_fiber_length=0.0143
        tendon_slack_length=0.02580617 pennation_angle_at_optimal=0.2373648
      PathPoint P1: femur (-0.0027 -0.0278 -0.0021)
      PathPoint P2: foot (-0.004 0.0004 0.001)
    Millard2012EquilibriumMuscle LG: max_isometric_force=18.3 optimal_fiber_length=0.0123
        tendon_slack_length=0.02736439 pennation_angle_at_optimal=0.1675516
      PathPoint P1: femur (-0.003 -0.0284 0.0017)
      PathPoint P2: foot (-0.004 0.0004 0.001)
    Millard2012EquilibriumMuscle Pla: max_isometric_force=5.6 optimal_fiber_length=0.0123
        tendon_slack_length=0.02777571 pennation_angle_at_optimal=0.1972222
      PathPoint P1: femur (-0.0023 -0.0275 0.0011)
      PathPoint P2: foot (-0.004 0.0004 0.001)
    Millard2012EquilibriumMuscle Sol: max_isometric_force=1.4 optimal_fiber_length=0.0156 tendon_slack_length=0.0177251
        pennation_angle_at_optimal=0.07679449
      PathPoint P1: tibia (-0.0033 0.0335 0.0024)
      PathPoint P2: foot (-0.004 0.0004 0.001)
    Millard2012EquilibriumMuscle TA: max_isometric_force=8.6 optimal_fiber_length=0.0149 tendon_slack_length=0.01922818
        pennation_angle_at_optimal=0.164061
      PathPoint P1: tibia (0.0033 0.0336 0.0026)
      PathPoint P2: foot (0.0048 -0.0022 -0.0007)
      PathWrap: wrap_object=ankle_sphere method=hybrid
      PathWrap pathwrap_0: wrap_object=ankle_torus method=hybrid
    Millard2012EquilibriumMuscle EDL: max_isometric_force=2.2 optimal_fiber_length=0.0134 tendon_slack_length=0.0265833
        pennation_angle_at_optimal=0.1850049
      PathPoint P1: tibia (0.0012 0.0392 0.0028)
      PathPoint P2: foot (0.0034 -0.0017 0.0011)
      PathWrap: wrap_object=ankle_sphere method=hybrid
      PathWrap pathwrap_0: wrap_object=ankle_torus method=hybrid
    Millard2012EquilibriumMuscle TP: max_isometric_force=3.6 optimal_fiber_length=0.0053 tendon_slack_length=0.02962293
        pennation_angle_at_optimal=0.09948377
      PathPoint P1: tibia (-0.0015 0.0339 0.0001)
      PathPoint P2: foot (-0.0007 -0.0017 -0.0011)
      PathWrap: wrap_object=ankle_sphere method=hybrid
      PathWrap pathwrap_0: wrap_object=ankle_torus method=hybrid
    Millard2012EquilibriumMuscle FDL: max_isometric_force=11.1 optimal_fiber_length=0.0088
        tendon_slack_length=0.02746208 pennation_angle_at_optimal=0.1937316
      PathPoint P1: tibia (-0.0025 0.0354 0)
      PathPoint P2: foot (-0.0007 -0.0017 -0.0011)
      PathWrap: wrap_object=ankle_sphere method=hybrid
      PathWrap pathwrap_0: wrap_object=ankle_torus method=hybrid
    Millard2012EquilibriumMuscle FHL: max_isometric_force=0.2 optimal_fiber_length=0.0054
        tendon_slack_length=0.02952669 pennation_angle_at_optimal=0.02268928
      PathPoint P1: tibia (-0.0015 0.0339 0.0001)
      PathPoint P2: foot (-0.0007 -0.0017 -0.0011)
      PathWrap: wrap_object=ankle_sphere method=hybrid
      PathWrap pathwrap_0: wrap_object=ankle_torus method=hybrid
    Millard2012EquilibriumMuscle Per: max_isometric_force=7.7 optimal_fiber_length=0.0088
        tendon_slack_length=0.02828336 pennation_angle_at_optimal=0.1099557
      PathPoint P1: tibia (-0.0019 0.0353 0.0029)
      PathPoint P2: foot (0.0028 -0.0027 0.0017)
      PathWrap: wrap_object=ankle_sphere method=hybrid
      PathWrap pathwrap_0: wrap_object=ankle_torus method=hybrid
    Millard2012EquilibriumMuscle Pop: max_isometric_force=2.9 optimal_fiber_length=0.0063
        tendon_slack_length=0.008787732 pennation_angle_at_optimal=0.2426008
      PathPoint P1: femur (-0.0024 -0.0308 0.0017)
      PathPoint P2: tibia (0.0006 0.0271 -0.0023)
      PathWrap: wrap_object=tibia_prox method=hybrid
    ObjectGroup hamstrings: members=(BFa BFp CF GA GP SM STa STp)
    ObjectGroup hip_cuffs: members=(GI GS OE OI Pir QF)
    ObjectGroup hip_flexors: members=(IP Pec TFL)
    ObjectGroup gluteals: members=(GMa GMe GMi)
    ObjectGroup adductors: members=(AB AL AM GA GP)
    ObjectGroup quadriceps: members=(RF VI VL VM)
    ObjectGroup calf_muscles: members=(LG MG Pla Sol)
    ObjectGroup anterior_crural: members=(EDL TA)
    ObjectGroup posterior_crural: members=(FDL FHL TP)
    ObjectGroup others: members=(Per Pop)
  MarkerSet:
    Marker R_Iliac_Crest: pelvis (0.028 0.004 0.01)
    Marker R_Hip: pelvis (-0.005 0.005 0.01)
    Marker R_Knee: femur (0 -0.035 0)
    Marker R_Ankle: tibia (0 0 0.004)
    Marker R_Toe: foot (0.015 -0.005 0.005)
