# OpenSim document version 40000
Model RatHindlimbRight:
  gravity: 0 -9.80665 0
  credits: Model authors names..
  publications: List of publications related to model...
  length_units: mm
  force_units: N
  Ground: meshes=ground.vtp
  BodySet:
    Body spine: mass=0.12 [kg] mass_center=(0 0 0) inertia=(4.8e-6 4.8e-6 4.8e-6 0 0 0) meshes=spine_y2j.stl
    Body pelvis_r: mass=0.02 mass_center=(0 0 0) inertia=(4e-6 3.5e-6 3.5e-6 0 0 0) meshes=pelvis_r_y2j.stl
      WrapCylinder hip_cylinder_small: xyz_body_rotation=(0 1.48353 0) translation=(0.01 0.002 -0.0045) quadrant=-x
          radius=0.005 length=0.06
      WrapCylinder hip_cylinder_small2: xyz_body_rotation=(0 1.48353 0) translation=(0.01 0.001 -0.0045) quadrant=all
          radius=0.005 length=0.06
      WrapCylinder hip_cylinder_large2: xyz_body_rotation=(0 1.48353 0) translation=(0.01 0.004 0.003) quadrant=-x
          radius=0.0025 length=0.06
    Body femur_r: mass=0.02 mass_center=(0 -0.015 0) inertia=(1.62e-6 2.5e-7 1.62e-6 0 0 0) meshes=femur_r_y2j.stl
      WrapCylinder femur_r_prox: xyz_body_rotation=(0 0.436332 0) translation=(0.001 -0.006 0) quadrant=-x
          radius=0.0046 length=0.05
      WrapCylinder femur_r_prox2: xyz_body_rotation=(0 0.436332 0) translation=(0.001 -0.006 0) quadrant=all
          radius=0.0046 length=0.05
      WrapTorus femur_r_dist: xyz_body_rotation=(1.72489 0 0.0977454) translation=(0.00543 -0.03003 -0.00046)
          quadrant=all inner_radius=0.004 outer_radius=0.006
      WrapCylinder femur_r_shaft_large: xyz_body_rotation=(1.72489 0 -0.785398)
          translation=(-0.00064 -0.015595 0.00185) quadrant=y radius=0.0027 length=0.03058
      WrapCylinder femur_r_shaft_small: xyz_body_rotation=(1.72489 0 0.0977454)
          translation=(-0.00064 -0.015095 0.00185) quadrant=all radius=0.0018 length=0.02958
    Body tibia_r: mass=0.02 mass_center=(0 0.015 0) inertia=(1.62e-6 2.5e-7 1.62e-6 0 0 0) meshes=tibia_r_y2j.stl
      WrapSphere tibia_r_prox: translation=(0.00062 0.0346 -0.001) quadrant=all radius=0.005
      WrapCylinder tibia_r_shaft: xyz_body_rotation=(1.5708 0 0) translation=(0 0.0241 0) quadrant=all radius=0.0035
          length=0.0282
      WrapCylinder tibia_r_shaft2: xyz_body_rotation=(1.5708 0 0) translation=(0 0.0241 0) quadrant=-y radius=0.0035
          length=0.0282
      WrapSphere ankle_sphere: translation=(0.00119 0.00233 0.00015) quadrant=all radius=0.0025
      WrapTorus ankle_torus: xyz_body_rotation=(1.5708 0 0) translation=(0.00119 0.00233 0.00015) quadrant=all
          inner_radius=0.001 outer_radius=0.004
    Body foot_r: mass=0.02 mass_center=(0.007 -0.005 0) inertia=(2.5e-7 1.62e-6 1.62e-6 0 0 0) meshes=foot_r_y2j.stl
    Body pelvis_l: mass=0.02 mass_center=(0 0 0) inertia=(4e-6 3.5e-6 3.5e-6 0 0 0) meshes=pelvis_r_y2j.stl
      WrapCylinder hip_cylinder_small: xyz_body_rotation=(0 1.48353 0) translation=(0.01 0.002 -0.0045) quadrant=-x
          radius=0.005 length=0.06
      WrapCylinder hip_cylinder_small2: xyz_body_rotation=(0 1.48353 0) translation=(0.01 0.001 -0.0045) quadrant=all
          radius=0.005 length=0.06
      WrapCylinder hip_cylinder_large2: xyz_body_rotation=(0 1.48353 0) translation=(0.01 0.004 0.003) quadrant=-x
          radius=0.0025 length=0.06
  JointSet:
    CustomJoint ground_spine: socket_parent_frame=ground_offset socket_child_frame=spine_offset
      Coordinate sacrum_pitch: default_value=0.5235988 range=(-1.570796 1.570796) clamped=true
      Coordinate sacrum_roll: default_value=0 range=(-1.570796 1.570796) clamped=true
      Coordinate sacrum_yaw: default_value=0 range=(-1.570796 1.570796) clamped=true
      Coordinate sacrum_x: default_value=0 range=(-0.1 0.25) clamped=true
      Coordinate sacrum_y: default_value=0.05 range=(0 0.2) clamped=true
      Coordinate sacrum_z: default_value=0 range=(-0.1 0.1) clamped=true
      PhysicalOffsetFrame ground_offset: socket_parent=/ground translation=(0 0 0) [meters]
      PhysicalOffsetFrame spine_offset: socket_parent=/bodyset/spine translation=(0 0 0)
      SpatialTransform:
        TransformAxis rotation1: coordinates=sacrum_pitch axis=(0 0 1) LinearFunction(coefficients=1 0)
        TransformAxis rotation2: coordinates=sacrum_roll axis=(1 0 0) LinearFunction(coefficients=1 0)
        TransformAxis rotation3: coordinates=sacrum_yaw axis=(0 1 0) LinearFunction(coefficients=1 0)
        TransformAxis translation1: coordinates=sacrum_x axis=(1 0 0) LinearFunction(coefficients=1 0)
        TransformAxis translation2: coordinates=sacrum_y axis=(0 1 0) LinearFunction(coefficients=1 0)
        TransformAxis translation3: coordinates=sacrum_z axis=(0 0 1) LinearFunction(coefficients=1 0)
    CustomJoint sacroiliac: socket_parent_frame=spine_offset socket_child_frame=pelvis_r_offset
      Coordinate sacroiliac_flx: default_value=0.06457718 range=(-0.02301246 0.1515205) clamped=true locked=true
      PhysicalOffsetFrame spine_offset: socket_parent=/bodyset/spine translation=(0.005 -0.003 0.01)
      PhysicalOffsetFrame pelvis_r_offset: socket_parent=/bodyset/pelvis_r translation=(0 0 0)
      SpatialTransform: axes_held_at_zero=(rotation2 rotation3 translation1 translation2 translation3)
        TransformAxis rotation1: coordinates=sacroiliac_flx axis=(0 0 1) LinearFunction(coefficients=1 0)
    CustomJoint hip: socket_parent_frame=pelvis_r_offset socket_child_frame=femur_r_offset
      Coordinate hip_flx: default_value=0.6981317 range=(-0.8726646 1.22173) clamped=true
      Coordinate hip_add: default_value=-0.1745329 range=(-0.8726646 0.3490659) clamped=true
      Coordinate hip_int: default_value=0 range=(-0.8726646 0.6981317) clamped=true
      PhysicalOffsetFrame pelvis_r_offset: socket_parent=/bodyset/pelvis_r translation=(0 0 0)
      PhysicalOffsetFrame femur_r_offset: socket_parent=/bodyset/femur_r translation=(0 0 0)
      SpatialTransform: axes_held_at_zero=(translation1 translation2 translation3)
        TransformAxis rotation1: coordinates=hip_flx axis=(0 0 1) LinearFunction(coefficients=1 0)
        TransformAxis rotation2: coordinates=hip_add axis=(1 0 0) LinearFunction(coefficients=1 0)
        TransformAxis rotation3: coordinates=hip_int axis=(0 1 0) LinearFunction(coefficients=1 0)
    CustomJoint knee: socket_parent_frame=femur_r_offset socket_child_frame=tibia_r_offset
      Coordinate knee_flx: default_value=-2.094395 range=(-2.617994 -0.3490659) clamped=true
      PhysicalOffsetFrame femur_r_offset: socket_parent=/bodyset/femur_r translation=(0 0 0)
      PhysicalOffsetFrame tibia_r_offset: socket_parent=/bodyset/tibia_r translation=(0 0 0)
      SpatialTransform:
        TransformAxis rotation1: coordinates=knee_flx axis=(0 0 1) LinearFunction(coefficients=1 0)
        TransformAxis rotation2: coordinates=knee_flx axis=(1 0 0)
          SimmSpline: x=(-2.61799 -2.44346 -2.26893 -2.0944 -1.91986 -1.74533 -1.5708 -1.39626 -1.22173 -1.0472 -0.872665 -0.698132 -0.523599 -0.349066)
              y=(-0.0872665 -0.0750492 -0.0645772 -0.0523599 -0.0401426 -0.0296706 -0.0174533 -0.00523599 0.00523599 0.0174533 0.0296706 0.0401426 0.0523599 0.0645772)
        TransformAxis rotation3: coordinates=knee_flx axis=(0 1 0)
          SimmSpline: x=(-2.61799 -2.44346 -2.26893 -2.0944 -1.91986 -1.74533 -1.5708 -1.39626 -1.22173 -1.0472 -0.872665 -0.698132 -0.523599 -0.349066)
              y=(0.261799 0.261799 0.261799 0.261799 0.261799 0.261799 0.261799 0.261799 0.261799 0.261799 0.261799 0.261799 0.261799 0.261799)
        TransformAxis translation1: coordinates=knee_flx axis=(1 0 0)
          SimmSpline: x=(-2.61799 -2.44346 -2.26893 -2.0944 -1.91986 -1.74533 -1.5708 -1.39626 -1.22173 -1.0472 -0.872665 -0.698132 -0.523599 -0.349066)
              y=(-0.02492 -0.0301 -0.03449 -0.03798 -0.04049 -0.04196 -0.04232 -0.04156 -0.03968 -0.0367 -0.03267 -0.02769 -0.02188 -0.01539)
        TransformAxis translation2: coordinates=knee_flx axis=(0 1 0)
          SimmSpline: x=(-2.61799 -2.44346 -2.26893 -2.0944 -1.91986 -1.74533 -1.5708 -1.39626 -1.22173 -1.0472 -0.872665 -0.698132 -0.523599 -0.349066)
              y=(0.00082 -0.00322 -0.00805 -0.01353 -0.01952 -0.02588 -0.03244 -0.03905 -0.04552 -0.05167 -0.05732 -0.06229 -0.0664 -0.0695)
        TransformAxis translation3: coordinates=knee_flx axis=(0 0 1)
          SimmSpline: x=(-2.61799 -2.44346 -2.26893 -2.0944 -1.91986 -1.74533 -1.5708 -1.39626 -1.22173 -1.0472 -0.872665 -0.698132 -0.523599 -0.349066)
              y=(0.00227 0.00198 0.00161 0.00117 0.00067 0.00013 -0.00043 -0.00101 -0.00157 -0.00211 -0.00261 -0.00305 -0.00342 -0.00371)
    CustomJoint ankle: socket_parent_frame=tibia_r_offset socket_child_frame=foot_r_offset
      Coordinate ankle_flx: default_value=0.8726646 range=(-0.5235988 1.047198) clamped=true
      Coordinate ankle_add: default_value=-0.08726646 range=(-0.08726646 0.6108652) clamped=true
      Coordinate ankle_int: default_value=0 range=(-0.8726646 0.2617994) clamped=true
      PhysicalOffsetFrame tibia_r_offset: socket_parent=/bodyset/tibia_r translation=(0 0 0)
      PhysicalOffsetFrame foot_r_offset: socket_parent=/bodyset/foot_r translation=(0 0 0)
      SpatialTransform:
        TransformAxis rotation1: coordinates=ankle_flx axis=(0 0 1) LinearFunction(coefficients=1 0)
        TransformAxis rotation2: coordinates=ankle_add axis=(1 0 0) LinearFunction(coefficients=1 0)
        TransformAxis rotation3: coordinates=ankle_int axis=(0 1 0) LinearFunction(coefficients=1 0)
        TransformAxis translation1: coordinates=ankle_flx axis=(1 0 0)
          SimmSpline: x=(-0.523599 -0.349066 -0.174533 0 0.174533 0.349066 0.523599 0.698132 0.872665 1.0472)
              y=(0 0 0 0 0 0 0 0 0 0)
        TransformAxis translation2: coordinates=ankle_flx axis=(0 1 0)
          SimmSpline: x=(-0.523599 -0.349066 -0.174533 0 0.174533 0.349066 0.523599 0.698132 0.872665 1.0472)
              y=(0 0 0 0 0 0 0 0 0 0)
        TransformAxis translation3: coordinates=ankle_flx axis=(0 0 1)
          SimmSpline: x=(-0.523599 -0.349066 -0.174533 0 0.174533 0.349066 0.523599 0.698132 0.872665 1.0472)
              y=(0 0 0 0 0 0 0 0 0 0)
    FreeJoint free_pelvis_l: socket_parent_frame=/ground socket_child_frame=/bodyset/pelvis_l
      Coordinate free_pelvis_l_coord_0
      Coordinate free_pelvis_l_coord_1
      Coordinate free_pelvis_l_coord_2
      Coordinate free_pelvis_l_coord_3
      Coordinate free_pelvis_l_coord_4
      Coordinate free_pelvis_l_coord_5
  ForceSet:
    Millard2012EquilibriumMuscle [values shared by the 38 below unless stated]: min_control=0.01 max_control=1
        fiber_damping=0.1 default_activation=0.05 minimum_activation=0.01
      ActiveForceLengthCurve: minimum_value=0
      ForceVelocityCurve: concentric_slope_at_vmax=0 concentric_slope_near_vmax=0.25 isometric_slope=5
          eccentric_slope_at_vmax=0 eccentric_slope_near_vmax=0.15 max_eccentric_velocity_force_multiplier=1.4
      FiberForceLengthCurve
      TendonForceLengthCurve
    Millard2012EquilibriumMuscle BFa: max_isometric_force=3.4 optimal_fiber_length=0.0389
        tendon_slack_length=0.02196166 pennation_angle_at_optimal=0.00698132 [radians]
      PathPoint BFa_pelvis_r_origin_1: pelvis_r (-0.01322972 0.009805491 -0.006316595)
      PathPoint BFa_pelvis_r_via_2: pelvis_r (-0.01337877 0.005347386 -0.001707541)
      PathPoint BFa_pelvis_r_via_3: pelvis_r (-0.01341359 0.0012675 -0.0001952988)
      PathPoint BFa_tibia_r_insertion_4: tibia_r (-0.003484531 0.03201168 0.00152993)
    Millard2012EquilibriumMuscle BFp: max_isometric_force=12.5 optimal_fiber_length=0.0369
        tendon_slack_length=0.001580198 pennation_angle_at_optimal=0.127409
      PathPoint BFp_pelvis_r_origin_1: pelvis_r (-0.01616224 0.003702339 -0.00225771)
      PathPoint BFp_tibia_r_via_2: tibia_r (-0.003655768 0.02629027 0.0005794109)
      PathPoint BFp_tibia_r_insertion_3: tibia_r (0.002030288 0.02689894 0.0001287836)
    Millard2012EquilibriumMuscle CF: max_isometric_force=2.1 optimal_fiber_length=0.0372 tendon_slack_length=0.01486601
        pennation_angle_at_optimal=0
      PathPoint CF_pelvis_r_origin_1: pelvis_r (-0.007677275 0.01007531 -0.006088509)
      PathPoint CF_pelvis_r_via_2: pelvis_r (-0.007116509 0.005529749 -0.00273974)
      PathPoint CF_pelvis_r_via_3: pelvis_r (-0.005994015 0.001203736 -0.001124374)
      PathPoint CF_femur_r_insertion_4: femur_r (-0.002268425 -0.02791027 -0.000618424)
    Millard2012EquilibriumMuscle STp: max_isometric_force=3.4 optimal_fiber_length=0.0389
        tendon_slack_length=0.02030047 pennation_angle_at_optimal=0.00698132
      PathPoint STp_pelvis_r_origin_1: pelvis_r (-0.01592098 0.002651394 -0.002354517)
      PathPoint STp_tibia_r_insertion_2: tibia_r (0.00195451 0.02715858 -0.002200433)
    Millard2012EquilibriumMuscle STa: max_isometric_force=12.5 optimal_fiber_length=0.0369
        tendon_slack_length=0.003469065 pennation_angle_at_optimal=0.127409
      PathPoint STa_pelvis_r_origin_1: pelvis_r (-0.01467077 0.009080581 -0.005426817)
      PathPoint STa_pelvis_r_via_2: pelvis_r (-0.01465663 0.005992137 -0.002894192)
      PathPoint STa_pelvis_r_via_3: pelvis_r (-0.01466553 0.003909816 -0.001734835)
      PathPoint STa_tibia_r_insertion_4: tibia_r (0.00195451 0.02715858 -0.002200433)
    Millard2012EquilibriumMuscle SM: max_isometric_force=10.3 optimal_fiber_length=0.035 tendon_slack_length=0
        pennation_angle_at_optimal=0 ignore_tendon_compliance=true
      PathPoint SM_pelvis_r_origin_1: pelvis_r (-0.01592343 -0.0004018622 -0.003104956)
      PathPoint SM_tibia_r_insertion_2: tibia_r (0.0001342826 0.03406778 -0.002674871)
    Millard2012EquilibriumMuscle QF: max_isometric_force=3 optimal_fiber_length=0.0108 tendon_slack_length=0
        pennation_angle_at_optimal=0.05061455 ignore_tendon_compliance=true
      PathPoint QF_pelvis_r_origin_1: pelvis_r (-0.01431093 -0.002720268 -0.003876692)
      PathPoint QF_femur_r_insertion_2: femur_r (-0.003135717 -0.00154175 0.004902892)
    Millard2012EquilibriumMuscle TFL: max_isometric_force=2.9 optimal_fiber_length=0.015 tendon_slack_length=0.0076059
        pennation_angle_at_optimal=0.148353
      PathPoint TFL_pelvis_r_origin_1: pelvis_r (0.01649812 0.0009415501 -0.00148761)
      PathPoint TFL_femur_r_insertion_2: femur_r (0.001116495 -0.02060285 0.002134525)
    Millard2012EquilibriumMuscle GMa: max_isometric_force=9.3 optimal_fiber_length=0.0192
        tendon_slack_length=0.008317502 pennation_angle_at_optimal=0.2111848
      PathPoint GMa_pelvis_r_origin_1: pelvis_r (0.01440187 0.002833643 -0.001037185)
      PathPoint GMa_femur_r_insertion_2: femur_r (-0.001317572 -0.008882873 0.005821569)
    Millard2012EquilibriumMuscle GMe: max_isometric_force=18.8 optimal_fiber_length=0.0196 tendon_slack_length=0
        pennation_angle_at_optimal=0.2199115 ignore_tendon_compliance=true
      PathPoint GMe_pelvis_r_origin_1: pelvis_r (0.02622906 0.00298272 0.00243583)
      PathPoint GMe_femur_r_insertion_2: femur_r (0.001236943 0.0006205322 0.006392343)
    Millard2012EquilibriumMuscle GMi: max_isometric_force=7.4 optimal_fiber_length=0.0116 tendon_slack_length=0
        pennation_angle_at_optimal=0.286234 ignore_tendon_compliance=true
      PathPoint GMi_pelvis_r_origin_1: pelvis_r (0.02369673 0.001357483 -0.0004103219)
      PathPoint GMi_femur_r_insertion_2: femur_r (0.001354151 -0.0003953143 0.005703013)
    Millard2012EquilibriumMuscle Pir: max_isometric_force=11.2 optimal_fiber_length=0.0106 tendon_slack_length=0
        pennation_angle_at_optimal=0.286234 ignore_tendon_compliance=true
      PathPoint Pir_pelvis_r_origin_1: pelvis_r (0.01286478 0.003610721 4.015021e-5)
      PathPoint Pir_femur_r_insertion_2: femur_r (0.001770674 0.001249388 0.005767034)
    Millard2012EquilibriumMuscle GP: max_isometric_force=2.4 optimal_fiber_length=0.0287
        tendon_slack_length=0.008101279 pennation_angle_at_optimal=0.05759587
      PathPoint GP_pelvis_r_origin_1: pelvis_r (-0.01503058 -0.004900044 -0.005694071)
      PathPoint GP_tibia_r_insertion_2: tibia_r (0.001912077 0.02804489 -0.002940729)
    Millard2012EquilibriumMuscle GA: max_isometric_force=1.6 optimal_fiber_length=0.0297
        tendon_slack_length=0.004175889 pennation_angle_at_optimal=0
      PathPoint GA_pelvis_r_origin_1: pelvis_r (-0.0143754 -0.009035981 -0.009266835)
      PathPoint GA_tibia_r_insertion_2: tibia_r (0.001346251 0.03054253 -0.002883321)
    Millard2012EquilibriumMuscle AL: max_isometric_force=1 optimal_fiber_length=0.0163 tendon_slack_length=0
        pennation_angle_at_optimal=0.1692969 ignore_tendon_compliance=true
      PathPoint AL_pelvis_r_origin_1: pelvis_r (-0.004928207 -0.005900755 -0.006194865)
      PathPoint AL_femur_r_insertion_2: femur_r (-0.001991821 -0.01537787 0.001518908)
    Millard2012EquilibriumMuscle AM: max_isometric_force=3 optimal_fiber_length=0.0279 tendon_slack_length=0
        pennation_angle_at_optimal=0 ignore_tendon_compliance=true
      PathPoint AM_pelvis_r_origin_1: pelvis_r (-0.0130209 -0.009073415 -0.009264361)
      PathPoint AM_tibia_r_insertion_2: tibia_r (0.0005970567 0.03224615 -0.00276148)
    Millard2012EquilibriumMuscle AB: max_isometric_force=12.2 optimal_fiber_length=0.0224 tendon_slack_length=0
        pennation_angle_at_optimal=0.2251475 ignore_tendon_compliance=true
      PathPoint AB_pelvis_r_origin_1: pelvis_r (-0.01242092 -0.007987046 -0.008541232)
      PathPoint AB_femur_r_insertion_2: femur_r (-0.002057502 -0.01737883 0.001934869)
    Millard2012EquilibriumMuscle Pec: max_isometric_force=3.7 optimal_fiber_length=0.0081
        tendon_slack_length=0.002449795 pennation_angle_at_optimal=0.09773844
      PathPoint Pec_pelvis_r_origin_1: pelvis_r (-0.0158755 -0.00847373 -0.008324664)
      PathPoint Pec_femur_r_insertion_2: femur_r (-0.00312683 -0.01053139 0.003478232)
    Millard2012EquilibriumMuscle IP: max_isometric_force=16.3 optimal_fiber_length=0.017 tendon_slack_length=0.03284685
        pennation_angle_at_optimal=0.1500983
      PathPoint IP_pelvis_r_origin_1: pelvis_r (0.02175788 -0.001077104 -0.002137842)
      PathPoint IP_femur_r_insertion_2: femur_r (-0.0002565976 -0.004422029 0.001600475)
    Millard2012EquilibriumMuscle OE: max_isometric_force=7.2 optimal_fiber_length=0.0058
        tendon_slack_length=0.004283164 pennation_angle_at_optimal=0.2984513
      PathPoint OE_pelvis_r_origin_1: pelvis_r (-0.009777415 -0.001747509 -0.003496422)
      PathPoint OE_femur_r_insertion_2: femur_r (-0.001946152 -0.001515468 0.001671366)
    Millard2012EquilibriumMuscle OI: max_isometric_force=3 optimal_fiber_length=0.0044 tendon_slack_length=0.00337929
        pennation_angle_at_optimal=0.1221731
      PathPoint OI_pelvis_r_origin_1: pelvis_r (-0.01377433 -0.0002558202 -0.002416151)
      PathPoint OI_femur_r_via_2: femur_r (-0.0009551249 -0.0001812399 0.003294243)
    Millard2012EquilibriumMuscle GS: max_isometric_force=0.4 optimal_fiber_length=0.006 tendon_slack_length=0
        pennation_angle_at_optimal=0.1884956 ignore_tendon_compliance=true
      PathPoint GS_pelvis_r_origin_1: pelvis_r (0.01905702 0.001847754 -0.001036524)
      PathPoint GS_femur_r_insertion_2: femur_r (-3.50381e-5 -0.006360664 0.002366952)
    Millard2012EquilibriumMuscle GI: max_isometric_force=2.9 optimal_fiber_length=0.0041
        tendon_slack_length=0.001757186 pennation_angle_at_optimal=0.3298672
      PathPoint GI_pelvis_r_origin_1: pelvis_r (-0.01241864 0.005721972 -0.002980613)
      PathPoint GI_femur_r_insertion_2: femur_r (-0.001800938 -0.0004094834 0.00195963)
    Millard2012EquilibriumMuscle RF: max_isometric_force=16.5 optimal_fiber_length=0.0119
        tendon_slack_length=0.02817074 pennation_angle_at_optimal=0.1972222
      PathPoint RF_pelvis_r_origin_1: pelvis_r (0.004795275 -0.0004322564 0.001341441)
      PathPoint RF_femur_r_via_2: femur_r (0.003068458 -0.0319159 -0.0006903385)
      PathPoint RF_tibia_r_via_3: tibia_r (0.003239061 0.04008165 -0.001384305)
    Millard2012EquilibriumMuscle VL: max_isometric_force=14.9 optimal_fiber_length=0.0194
        tendon_slack_length=0.01805669 pennation_angle_at_optimal=0.2548181
      PathPoint VL_femur_r_origin_1: femur_r (-0.00127121 -0.003993288 0.006780543)
      PathPoint VL_femur_r_via_2: femur_r (-0.0004458203 -0.03206626 0.002079095)
      PathPoint VL_tibia_r_via_3: tibia_r (0.002472398 0.04037701 0.001253996)
      PathPoint VL_tibia_r_insertion_4: tibia_r (0.004718857 0.03562576 -0.000219232)
    Millard2012EquilibriumMuscle VI: max_isometric_force=2.6 optimal_fiber_length=0.0113 tendon_slack_length=0.0178516
        pennation_angle_at_optimal=0.2495821
      PathPoint VI_femur_r_origin_1: femur_r (-0.0004554393 -0.01038978 0.005025495)
      PathPoint VI_femur_r_via_2: femur_r (0.001594776 -0.03302088 0.001717352)
      PathPoint VI_tibia_r_via_3: tibia_r (0.00275953 0.04009333 -8.17198e-5)
      PathPoint VI_tibia_r_insertion_4: tibia_r (0.004718857 0.03562576 -0.000219232)
    Millard2012EquilibriumMuscle VM: max_isometric_force=6.1 optimal_fiber_length=0.0153 tendon_slack_length=0.01763079
        pennation_angle_at_optimal=0.2024582
      PathPoint VM_femur_r_origin_1: femur_r (-0.0002529523 -0.005331522 0.001711684)
      PathPoint VM_femur_r_via_2: femur_r (0.002327421 -0.03190025 -0.002888745)
      PathPoint VM_tibia_r_via_3: tibia_r (0.003420833 0.03998236 -0.003424341)
      PathPoint VM_tibia_r_insertion_4: tibia_r (0.004718857 0.03562576 -0.000219232)
    Millard2012EquilibriumMuscle MG: max_isometric_force=11.7 optimal_fiber_length=0.0143
        tendon_slack_length=0.02580617 pennation_angle_at_optimal=0.2373648
      PathPoint MG_femur_r_origin_1: femur_r (0.0003887868 -0.03033572 -0.004175022)
      PathPoint MG_tibia_r_via_2: tibia_r (-0.001069551 0.03432486 -0.004606995)
      PathPoint MG_tibia_r_via_3: tibia_r (-0.0001720897 -7.220749e-5 -0.002271307)
      PathPoint MG_foot_r_via_4: foot_r (-0.002629312 -0.0007204712 -0.0006568382)
      PathPoint MG_foot_r_insertion_5: foot_r (-0.002581743 -0.001878428 -0.000213927)
    Millard2012EquilibriumMuscle LG: max_isometric_force=18.3 optimal_fiber_length=0.0123
        tendon_slack_length=0.02736439 pennation_angle_at_optimal=0.1675516
      PathPoint LG_femur_r_origin_1: femur_r (-0.001531531 -0.02978154 0.002972712)
      PathPoint LG_tibia_r_via_2: tibia_r (-0.004058511 0.03477732 0.003071196)
      PathPoint LG_tibia_r_via_3: tibia_r (-0.0005447498 0.0006224348 0.0007115546)
      PathPoint LG_foot_r_via_4: foot_r (-0.003321182 -0.0007502352 0.000807188)
      PathPoint LG_foot_r_insertion_5: foot_r (-0.002641579 -0.001835169 0.0008423379)
    Millard2012EquilibriumMuscle Pla: max_isometric_force=5.6 optimal_fiber_length=0.0123
        tendon_slack_length=0.02777571 pennation_angle_at_optimal=0.1972222
      PathPoint Pla_femur_r_origin_1: femur_r (-0.001499719 -0.02893938 0.002358591)
      PathPoint Pla_tibia_r_via_2: tibia_r (-0.004215922 0.03394254 0.002308711)
      PathPoint Pla_tibia_r_via_3: tibia_r (-0.0005220057 0.0006245341 0.0002889513)
      PathPoint Pla_foot_r_via_4: foot_r (-0.003279743 -0.0007576887 0.0003766566)
      PathPoint Pla_foot_r_insertion_5: foot_r (-0.002993617 -0.001960715 0.0002336153)
    Millard2012EquilibriumMuscle Sol: max_isometric_force=1.4 optimal_fiber_length=0.0156 tendon_slack_length=0.0177251
        pennation_angle_at_optimal=0.07679449
      PathPoint Sol_tibia_r_origin_1: tibia_r (-0.004424593 0.03402416 0.0005391921)
      PathPoint Sol_tibia_r_via_2: tibia_r (-0.0004878646 0.0006276854 -0.0003454179)
      PathPoint Sol_foot_r_via_3: foot_r (-0.003218105 -0.0007699812 3.924578e-5)
      PathPoint Sol_foot_r_insertion_4: foot_r (-0.002947262 -0.001933949 -0.0001104742)
    Millard2012EquilibriumMuscle TA: max_isometric_force=8.6 optimal_fiber_length=0.0149 tendon_slack_length=0.01922818
        pennation_angle_at_optimal=0.164061
      PathPoint TA_tibia_r_origin_1: tibia_r (0.003550539 0.03503775 -0.001944053)
      PathPoint TA_tibia_r_via_2: tibia_r (0.005647021 0.0250468 -0.001705729)
      PathPoint TA_tibia_r_via_3: tibia_r (0.002759696 0.002337731 -0.001332121)
      PathPoint TA_foot_r_via_4: foot_r (0.004219491 -0.001667422 -0.0004205083)
      PathPoint TA_foot_r_insertion_5: foot_r (0.006596868 -0.003587188 -0.0009401528)
    Millard2012EquilibriumMuscle EDL: max_isometric_force=2.2 optimal_fiber_length=0.0134 tendon_slack_length=0.0265833
        pennation_angle_at_optimal=0.1850049
      PathPoint EDL_femur_r_origin_1: femur_r (-0.00175163 -0.03146427 0.002179944)
      PathPoint EDL_tibia_r_via_2: tibia_r (-0.0009216344 0.03739747 0.003073254)
      PathPoint EDL_tibia_r_via_3: tibia_r (0.002520693 0.002127081 0.0005663628)
      PathPoint EDL_foot_r_via_4: foot_r (0.003616679 -0.001820471 0.00134594)
      PathPoint EDL_foot_r_insertion_5: foot_r (0.01617952 -0.007379433 0.002414442)
    Millard2012EquilibriumMuscle TP: max_isometric_force=3.6 optimal_fiber_length=0.0053 tendon_slack_length=0.02962293
        pennation_angle_at_optimal=0.09948377
      PathPoint TP_tibia_r_origin_1: tibia_r (-0.002334542 0.03223637 -0.001454037)
      PathPoint TP_tibia_r_via_2: tibia_r (-0.0002822216 6.858866e-5 -0.001621682)
      PathPoint TP_foot_r_via_3: foot_r (-0.003340008 -0.000789046 -0.0006000144)
      PathPoint TP_foot_r_via_4: foot_r (-0.001013117 -0.002620568 -0.0003590793)
      PathPoint TP_foot_r_insertion_5: foot_r (0.003466809 -0.003929254 -0.001242307)
    Millard2012EquilibriumMuscle FDL: max_isometric_force=11.1 optimal_fiber_length=0.0088
        tendon_slack_length=0.02746208 pennation_angle_at_optimal=0.1937316
      PathPoint FDL_tibia_r_origin_1: tibia_r (-0.002684061 0.03409519 -0.0007864049)
      PathPoint FDL_tibia_r_via_2: tibia_r (-0.0001708707 0.0005379629 -0.001223054)
      PathPoint FDL_foot_r_via_3: foot_r (-0.003236179 -0.0007609074 -0.0003491928)
      PathPoint FDL_foot_r_via_4: foot_r (-0.001260242 -0.002332291 -0.0001250079)
      PathPoint FDL_foot_r_via_5: foot_r (0.001477996 -0.003918825 -0.0003360477)
      PathPoint FDL_foot_r_insertion_6: foot_r (0.01473013 -0.009073318 0.002277088)
    Millard2012EquilibriumMuscle FHL: max_isometric_force=0.2 optimal_fiber_length=0.0054
        tendon_slack_length=0.02952669 pennation_angle_at_optimal=0.02268928
      PathPoint FHL_tibia_r_origin_1: tibia_r (-0.001068667 0.03200682 -0.001387049)
      PathPoint FHL_tibia_r_via_2: tibia_r (-0.0002716051 0.0003849769 -0.001990281)
      PathPoint FHL_foot_r_via_3: foot_r (-0.002946514 -0.0009003048 -0.0006938313)
      PathPoint FHL_foot_r_via_4: foot_r (-0.0009384296 -0.002536203 -0.0008027287)
      PathPoint FHL_foot_r_via_5: foot_r (0.002219937 -0.004066054 -0.0005057773)
      PathPoint FHL_foot_r_insertion_6: foot_r (0.01504057 -0.00868818 -0.0004912042)
    Millard2012EquilibriumMuscle Per: max_isometric_force=7.7 optimal_fiber_length=0.0088
        tendon_slack_length=0.02828336 pennation_angle_at_optimal=0.1099557
      PathPoint Per_tibia_r_origin_1: tibia_r (-0.002845862 0.03526007 0.003114639)
      PathPoint Per_tibia_r_via_2: tibia_r (-0.0005653445 0.0006205339 0.001094219)
      PathPoint Per_foot_r_via_3: foot_r (-0.002955248 -0.0008379628 0.001232002)
      PathPoint Per_foot_r_via_4: foot_r (-0.000810172 -0.002467523 0.001515397)
      PathPoint Per_foot_r_via_5: foot_r (0.001512954 -0.003918379 0.001889846)
      PathPoint Per_foot_r_insertion_6: foot_r (0.004487484 -0.005053165 0.0008720615)
    Millard2012EquilibriumMuscle Pop: max_isometric_force=2.9 optimal_fiber_length=0.0063
        tendon_slack_length=0.008787732 pennation_angle_at_optimal=0.2426008
      PathPoint Pop_femur_r_origin_1: femur_r (-0.00101877 -0.03081356 0.002771102)
      PathPoint Pop_femur_r_via_2: femur_r (-0.003220788 -0.03007817 0.002700429)
      PathPoint Pop_tibia_r_via_3: tibia_r (-0.003862841 0.03460107 -0.0003359328)
      PathPoint Pop_tibia_r_insertion_4: tibia_r (0.001891794 0.02514655 -0.002364709)
    ObjectGroup hamstrings: members=(BFa BFp CF GA GP SM STa STp)
    ObjectGroup hip_cuffs: members=(GI GS OE OI Pir QF)
    ObjectGroup hip_flexors: members=(IP Pec TFL)
    ObjectGroup gluteals: members=(GMa GMe GMi)
    ObjectGroup adductors: members=(AB AL AM GA GP)
    ObjectGroup quadriceps: members=(RF VI VL VM)
    ObjectGroup calf_muscles: members=(LG MG Pla Sol)
    ObjectGroup anterior_crural: members=(EDL TA)
    ObjectGroup posterior_crural: members=(FDL FHL TP)
    ObjectGroup others: members=(Per Pop)
  MarkerSet:
    Marker R_Iliac_Crest: pelvis_r (0.028 0.004 -0.01)
    Marker R_Hip: pelvis_r (-0.005 0.005 -0.01)
    Marker R_Knee: femur_r (0 -0.035 0)
    Marker R_Ankle: tibia_r (0 0 0.004)
    Marker R_Toe: foot_r (0.015 -0.005 0.005)
    Marker R_Iliac_Crest_0: pelvis_l (0.028 0.004 -0.01)
    Marker R_Hip_0: pelvis_l (-0.005 0.005 -0.01)
